σ := 1
N := 500
n := 0 .. N
A_0 := 0.4
Δt := 1
FT(s, T) := S(f) ← integral(s(t)*exp(-1j*2*π*f*t), t = -T/2 .. T/2)
g(t) := 1/(σ*sqrt(2*π))*e^(-t^2/σ^2)
f_d := 2
df := f_d/N = 0.004
ff[n] := df*n
s2(t) := A_0*sqrt(2*e)*t/Δt*e^(-(t/Δt)^2)
f_0 := 0
dt := 1/f_d
SSS(f) := σ*sqrt(π)*e^(-(π*f*σ)^2)
s(t) := cos(2*π*f_0*t)*g(t)
S := FT(s, 50*σ)
SS := sqrt(2)*vectorize(S(ff))
S2(f) := A_0*sqrt(2*π*e)*f*Δt^2*e^(-(Δt*f)^2/2)
S_1(f) == A*σ*sqrt(π)*e^(-(π*f*σ)^2)
f_s := sqrt(-ln(1/(σ*sqrt(2*π))))/(π*σ) = 0.305136
sqrt(2)*S(1/(6*σ)) = 0.760214
1/(σ*sqrt(2*π))
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S(f) == □
