Ki(k) :=
    k_0 ← k/(1 + sqrt(1 - k*k))
    k_0*k_0
K(k) :=
    ki ← Ki(k)
    (1 + ki)*K(ki) if k - ki > 0
    π/2 otherwise
sn(u, k) :=
    ki ← Ki(k)
    sin(u*π/2) if k - ki ≤ 0
    otherwise
        w ← sn(u, ki)
        (1 + ki)/(1/w + ki*w)
cd(u, k) :=
    ki ← Ki(k)
    cos(u*π/2) if k - ki ≤ 0
    otherwise
        w ← cd(u, ki)
        (1 + ki)/(1/w + ki*w)
z(φ, k) := integral(1/sqrt(1 - (k*sin(θ))^2), θ = 0 .. φ)
T(k) := K(sqrt(1 - k*k))
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sn_inv(sn, k) :=
    ki ← Ki(k)
    sn_inv(2*sn/((1 + ki)*(1 + sqrt(1 - k*k*sn*sn))), ki) if k - ki > 0
    2*asin(sn)/π
sn_1(u, k) := sn(u/K(k), k)
cd_inv(cn, k) :=
    ki ← Ki(k)
    cd_inv(2*cn/((1 + ki)*(1 + sqrt(1 - k*k*cn*cn))), ki) if k - ki > 0
    2*acos(cn)/π
cd_1(u, k) := cd(u/K(k), k)
z(0.3, 0.7) = 0.302209
sin(0.302) = 0.29743
φ_1(z, k) := asin(sn(z, k))
sn(0.302/z(0.3, 0.7), 0.7) = 1
k_0 := 0.1
x_0 := K(k_0) = 1.57475
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sn(40/x_0, k_0) = 0.808862
φ_1(z, k) := asin(sn(z, k))
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am(x, m) :=
    b ← sqrt(1 - m)
    a ← 1
    ca[10] ← 0
    for i ∈ 1 .. 10
        [a, b] ← [(a + b)/2, sqrt(a*b)]
        ca[i] ← (a - b)/(2*a)
    t ← 1024*a*x
    for i ∈ 10 .. 0
        s ← ca[i]*sin(t)
        s ← t + asin(s)
        t ← s/2
    t
