α := 0.9
ω_0 := 0.4*π = 1.25664
B := 0.1*π = 0.314159
|k_2 + k_1*(1 + k_2)*z^-1 + z^-2|/|1 + k_1*(1 + k_2)*z^-1 + k_2*z^-2| == □
k_1 := -cos(ω_0) = -0.309017
k_2 := (1 - sin(B))/cos(B) = 0.726543
A_2(z) := (k_2 + k_1*(1 + k_2)*z^-1 + z^-2)/(1 + k_1*(1 + k_2)*z^-1 + k_2*z^-2)
1/2*(((1 + (1 - sin(B))/cos(B)) + (1 - (1 - sin(B))/cos(B))*α) - 2*cos(ω_0)*(1 + (1 - sin(B))/cos(B))*z^-1 + ((1 + (1 - sin(B))/cos(B)) - (1 - (1 - sin(B))/cos(B))*α)*z^-2)/(1 - cos(ω_0)*(1 + (1 - sin(B))/cos(B))*z^-1 + (1 - sin(B))/cos(B)*z^-2)
H(z) := 0.5*((1 + α) + (1 - α)*A_2(z))
H(e^(1i*ω_0)) = 0.9
1/2*((cos(B) + 1 - sin(B) + α*cos(B) - α + α*sin(B)) - 2*cos(ω_0)*(cos(B) + 1 - sin(B))*z^-1 + (cos(B) + 1 - sin(B) - α*cos(B) + α - α*sin(B))*z^-2)/(cos(B) - cos(ω_0)*(cos(B) + 1 - sin(B))*z^-1 + (1 - sin(B))*z^-2)
K(ω) := |H(e^(1i*ω))|
K(ω_0 - B/2) = 0.952658
((1 + k_2) + 2*k_1*(1 + k_2)*z^-1 + (1 + k_2)*z^-2)/(1 + k_1*(1 + k_2)*z^-1 + k_2*z^-2)
H1(z) := 1/2*(((1 + k_2) + (1 - k_2)*α) + 2*k_1*(1 + k_2)*z^-1 + ((1 + k_2) - (1 - k_2)*α)*z^-2)/(1 + k_1*(1 + k_2)*z^-1 + k_2*z^-2)
H1(z) := 1/2*((cos(B) + 1 - sin(B) + α*cos(B) - α + α*sin(B)) - 2*cos(ω_0)*(cos(B) + 1 - sin(B))*z^-1 + (cos(B) + 1 - sin(B) - α*cos(B) + α - α*sin(B))*z^-2)/(cos(B) - cos(ω_0)*(cos(B) + 1 - sin(B))*z^-1 + (1 - sin(B))*z^-2)
K1(ω) := |H1(e^(1i*ω))|
K1(w_0) =  # error: Эта переменная не определена.
