# Рассчёт Эллиптического фильтра
# https://ru.dsplib.org/content/filter_ellip_ap/filter_ellip_ap.html
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db(x) := 10^(x/20)
db_P(x) := 10^(x/10)
to_db(x) := 20*log(|x|)
to_dbP(x) := 10*log(|x|)
roundup(x) := Trunc(x, 1) + (Trunc(x, 1) ≠ x)
abs(z) := |z|
samples := 100
n := 0 .. samples - 1
circle_x[n] := cos(2*π/(samples - 1)*n)
circle_y[n] := sin(2*π/(samples - 1)*n)
Ki(k) :=
    k_0 ← k/(1 + sqrt(1 - k*k))
    k_0*k_0
K(k) :=
    ki ← Ki(k)
    (1 + ki)*K(ki) if k - ki > 0
    π/2 otherwise
T(k) := K(sqrt(1 - k*k))
sn(u, k) :=
    ki ← Ki(k)
    sin(u*π/2) if k - ki ≤ 0
    otherwise
        w ← sn(u, ki)
        (1 + ki)/(1/w + ki*w)
cd(u, k) :=
    ki ← Ki(k)
    cos(u*π/2) if k - ki ≤ 0
    otherwise
        w ← cd(u, ki)
        (1 + ki)/(1/w + ki*w)
sn_inv(sn, k) :=
    ki ← Ki(k)
    sn_inv(2*sn/((1 + ki)*(1 + sqrt(1 - k*k*sn*sn))), ki) if k - ki > 0
    2*asin(sn)/π
cd_inv(cn, k) :=
    ki ← Ki(k)
    cd_inv(2*cn/((1 + ki)*(1 + sqrt(1 - k*k*cn*cn))), ki) if k - ki > 0
    2*acos(cn)/π
K(0.66667) = 1.80967
T(0.66667) = 1.90424
K(0.0028615) = 1.5708
T(0.0028615) = 7.24272
Z(p_0, f_d) := (2*f_d + p_0)/(2*f_d - p_0)
z2p(z_0, f_d) := 2*f_d*(1 - z_0^-1)/(1 + z_0^-1)
cd(0.6, 0.93) = 0.761809
sn(0.6, 0.93) = 0.917919
# 0.917918 | 0.761809423
f_d := 5000
# Гц - частота дискретизации
dt := 1/f_d = 0.0002
tt[n] := n*dt
h(t, H) := 1/f_d*integral(H(f)*e^(1i*2*π*f*t), f = -f_d/2 .. f_d/2)
df := f_d/samples = 50
f_pl := 4*1/(2*π) = 0.63662
f_sl := 5*1/(2*π) = 0.795775
f_sh := 9*1/(2*π) = 1.43239
f_ph := 12*1/(2*π) = 1.90986
ω_pl := 2*π*f_pl = 4
ω_sl := 2*π*f_sl = 5
ω_sh := 2*π*f_sh = 9
ω_ph := 2*π*f_ph = 12
ω_c := ω_sl*ω_sh = 45
Δω := ω_sh - ω_sl = 4
ω_sh_ := ω_c/ω_ph = 3.75
f_0 :=
    ω_p ←
        ω_ph if ω_c/ω_ph > ω_pl
        ω_pl otherwise
    1/(2*π)*|Δω*ω_p/(ω_c - ω_p^2)|
    = 0.0878096  # Гц - частота подавления
ω_0 := 2*π*f_0 = 0.551724  # Нормированная полоса среза
f_1 := 1/(2*π) = 0.159155  # Гц - частота пропускания
ω_1 := 2*π*f_1 = 1  # Нормированная полоса заграждения
f_p := ω_0*f_d/(2*π) = 439.048  # Гц - частота пропускания
f_s := ω_1*f_d/(2*π) = 795.775  # Гц - частота подавления
ω_p := 2*π*f_p/f_d = 0.175619*π
# Нормированная полоса среза
ω_p = 0.551724
ω_s := 2*π*f_s/f_d = 0.31831*π
# Нормированная полоса заграждения
ω_s = 1
R_p := 1
G_p := (-R_p) db = 0.891251  # Неравномерность в полосе пропускания (дБ)
R_s := 40
G_s := (-R_s) db = 0.01  # Уровень подавления в полосе заграждения (дБ)
Ω(T_d, ω) := 2/T_d*tan(ω/2)  # Преобразование частот аналогового фильтра в частоты цифрового
f_analog(f_digital., f_d) := f_d/π*tan(π*f_digital./f_d)
f_digit(f_analog, f_d) := f_d/π*atan(π*f_analog/f_d)
F_p := f_analog(f_p, f_d) = 450.535
F_p = 0.090107 f_d
f_digit(F_p, f_d) = 439.048
F_s := f_analog(f_s, f_d) = 869.467
F_s = 0.173893 f_d
Ω_p := 2*π*F_p = 2830.8  # Частота среза аналогового фильтра
Ω_s := 2*π*F_s = 5463.02  # Частота заграждения аналогового фильтра
# Порядок фильтра
ε_p := sqrt(10^(R_p/10) - 1) = 0.508847
ε_s := sqrt(10^(R_s/10) - 1) = 99.995
1/ε_s = 0.0100005
G_s = 0.01
ε_s/ε_p = 196.513
Ω_s/Ω_p = 1.92986
k_ω := ω_p/ω_s = 0.551724
k_ε := ε_p/ε_s = 0.00508873
# Порядок фильтра
N := T(k_ε)*K(k_ω)/(K(k_ε)*T(k_ω)) = 3.5213
N := ceil(N) = 4
# Число парных полюсов | Наличие/отсутсвтие центрального полюса
L := Trunc(N/2, 1) = 2
r := mod(N, 2) = 0
2*L + r = 4
u(n) := (2*n - 1)/N
un := matrix(L, 1, f(n, m) ← u(n + 1))
transpose(un) = [0.25, 0.75]
m := sqrt(1 - k_ε^2) = 0.999987
k_p := m^N*product(sn(u(n), m)^4, n = 1 .. L) = 0.751393
k_ω := sqrt(1 - k_p^2) = 0.659855
# Нули
zeros := 1i/(k_ω*cd(un, k_ω)) = [1.60955i; 3.52529i]
Im(zeros) = [1.60955; 3.52529]
F_p/f_d = 0.090107
F_s/f_d = 0.173893
υ_0 := -1i/N*sn_inv(1i/ε_p, k_ε) = 0.227269
# Полюса
conj(z) := Re(z) - 1i*Im(z)
p_p :=
    pp[0] ← 1i*sn(1i*υ_0, k_ω) if r > 0
    for n ∈ 0 .. L - 1
        pp[2*n + r] ← 1i*cd(un[n] - 1i*υ_0, k_ω)
        pp[2*n + 1 + r] ← conj(pp[2*n + r])
    pp
G_p := 1/sqrt(1 + ε_p^2) = 0.891251
p_p = [-0.105283 + 0.993713i; -0.105283 - 0.993713i; -0.364298 + 0.478605i; -0.364298 - 0.478605i]
p_0 := stack(zeros, conj(zeros)) = [1.60955i; 3.52529i; -1.60955i; -3.52529i]
G_0 := 1
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G_0 := product(-p_0[i], i = 0 .. rows(p_0) - 1)/product(-p_p[i], i = 0 .. rows(p_p) - 1) = 89.1229
H_0(p) := G_p^(1 - r)/G_0*product(p - p_0[i], i = 0 .. rows(p_0) - 1)/product(p - p_p[i], i = 0 .. rows(p_p) - 1)
Ω_p = 2830.8
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F_s/F_p = 1.92986
# Масштабируем передаточную функцию фильтра на требуемую частоту пропускания
Ω_p := 2*π*F_p
Ω_p = 2830.8
H(p) := H_0(p/Ω_p)
# Делаем преобразование плоскости p в плоскость z путём подстановки p == 2*f_d*(1 - z^-1)/(1 + z^-1)
H_z(z) := H(2*f_d*(1 - z^-1)/(1 + z^-1))
Polinom(P, p) := product(p - P[i], i = 0 .. rows(P) - 1)
# Масштабируем нули и полюса
p_01 := p_0*Ω_p
p_p1 := p_p*Ω_p
p_01 = [4556.31i; 9979.37i; -4556.31i; -9979.37i]
p_0 = [1.60955i; 3.52529i; -1.60955i; -3.52529i]
p_p1 = [-298.035 + 2813i; -298.035 - 2813i; -1031.25 + 1354.83i; -1031.25 - 1354.83i]
p_p = [-0.105283 + 0.993713i; -0.105283 - 0.993713i; -0.364298 + 0.478605i; -0.364298 - 0.478605i]
G_01 := product(|p_01[i]|, i = 0 .. rows(p_01) - 1)/product(|p_p1[i]|, i = 0 .. rows(p_p1) - 1) = 89.1229
H_01(p) := G_p^(1 - r)/G_01*product(p - p_01[i], i = 0 .. rows(p_01) - 1)/product(p - p_p1[i], i = 0 .. rows(p_p1) - 1)
H_z1(z) := H_01(2*f_d*(1 - z^-1)/(1 + z^-1))
H_02(p) := G_p^(1 - r)/G_01*Polinom(p_01, p)/Polinom(p_p1, p)
H_z22(z) := H_02(2*f_d*(1 - z^-1)/(1 + z^-1))
# Преобразуем нули и полюса в плоскость Z(p, f_d) := (2*f_d + p)/(2*f_d - p)
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z_0 := vectorize(Z(p_01, f_d))
z_p := vectorize(Z(p_p1, f_d))
z_0 :=
    stack(-1, z_0) if r > 0
    z_0 otherwise
G_0z := 2^r*product(1 - z_0[n], n = r .. rows(z_0) - 1)/product(1 - z_p[n], n = 0 .. rows(z_p) - 1) = 52.053
z_0 = [0.656178 + 0.754606i; 0.00206539 + 0.999998i; 0.656178 - 0.754606i; 0.00206539 - 0.999998i]
z_p = [0.807268 + 0.493671i; 0.807268 - 0.493671i; 0.786089 + 0.219363i; 0.786089 - 0.219363i]
H_z2(z) := G_p^(1 - r)/G_0z*product(1 - z_0[n]*z^-1, n = 0 .. rows(z_0) - 1)/product(1 - z_p[n]*z^-1, n = 0 .. rows(z_p) - 1)
H_z2(1) = 0.891251
abs(H_z2(e^(1i*2*π*F_s/f_d))) = 0.0095769
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arg(z_0) = [0.272172; 0.499343; -0.272172; -0.499343]*π
FF := [0; F_p; F_s; f_d/2]
ff := [0; f_p; f_s; f_d/2]
vectorize(H_z2(e^(1i*2*π*ff/f_d))) = [0.891251; -0.666354 + 0.591862i; -0.00840505 - 0.00508464i; 0.0100003]
vectorize(|H_z2(e^(1i*2*π*ff/f_d))|) = [0.891251; 0.891251; 0.00982336; 0.0100003]
vectorize(|H_z2(e^(1i*2*π*FF/f_d))|) = [0.891251; 0.763577; 0.0095769; 0.0100003]
H1(p) := H_01(p)
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20*log(abs(H_z(e^(1i*2*π*f_s/f_d)))) = -40.1548
hh_z2 := vectorize(h(tt, H(f) ← H_z2(e^(1i*2*π*f/f_d))))
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ff := 0, f_s/100 .. f_s
|H_z(e^(1i*2*π*f_p/f_d))| = 0.891251
20*log(|H_z(e^(1i*2*π*f_p/f_d))|) = -1
|H_z(e^(1i*2*π*f_s/f_d))| = 0.00982336
20*log(|H_z(e^(1i*2*π*f_s/f_d))|) = -40.1548
Φ(f) := integral(d/df1(arg(H_z(e^(1i*2*π*f1/f_d)))/π), f1 = 0 .. f)
|H_z(e^(1i*2*π*(f_p + f_s)/2/f_d))| = 0.023053
20*log(|H_z(e^(1i*2*π*(f_p + f_s)/2/f_d))|) = -32.7455
(f_p + f_s)/2 = 617.411
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