# https://ru.dsplib.org/content/filter_butter_ap/filter_butter_ap.html
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f_d := 10  # Гц - частота пропускания
# Гц - частота дискретизации
dt := 1/f_d = 0.1
db(x) := 10^(x/20)
db_P(x) := 10^(x/10)
to_db(x) := 20*log(|x|)
to_dbP(x) := 10*log(|x|)
roundup(x) := Trunc(x, 1) + (Trunc(x, 1) ≠ x)
abs(z) := |z|
samples := 100
n := 0 .. samples - 1
circle_x[n] := cos(2*π/(samples - 1)*n)
circle_y[n] := sin(2*π/(samples - 1)*n)
Z(p_0, f_d) := (2*f_d + p_0)/(2*f_d - p_0)
PolynomP(p, P) := product(p - P[n], n = 0 .. rows(P) - 1)
PolynomZ(z, Z) := product(1 - Z[n]*z^-1, n = 0 .. rows(Z) - 1)
HP(p, P_0, P_p) := PolynomP(p, P_0)/PolynomP(p, P_p)
HZ(z, Z_0, Z_p) := PolynomZ(z, Z_0)/PolynomZ(z, Z_p)
Z(p_0, f_d) := (2*f_d + p_0)/(2*f_d - p_0)
z2p(z_0, f_d) := 2*f_d*(1 - z_0^-1)/(1 + z_0^-1)
PolynomP(p, P) := product(p - P[n], n = 0 .. rows(P) - 1)
PolynomZ(z, Z) := product(1 - Z[n]*z^-1, n = 0 .. rows(Z) - 1)
HP(p, P_0, P_p) := PolynomP(p, P_0)/PolynomP(p, P_p)
HZ(z, Z_0, Z_p) := PolynomZ(z, Z_0)/PolynomZ(z, Z_p)
h(t, H) := 1/f_d*integral(H(f)*e^(1i*2*π*f*t), f = -f_d/2 .. f_d/2)
Ω(T_d, ω) := 2/T_d*tan(ω/2)  # Преобразование частот аналогового фильтра в частоты цифрового
f_analog(f_digital., f_d) := f_d/π*tan(π*f_digital./f_d)
f_digit(f_analog, f_d) := f_d/π*atan(π*f_analog/f_d)
tt[n] := n*dt
kHz := 10^3
conj(z) := Re(z) - 1i*Im(z)
f_pl := 2/(2*π) = 0.31831
f_sl := 4/(2*π) = 0.63662
f_sh := 12/(2*π) = 1.90986
f_ph := 15/(2*π) = 2.38732
Root2PolynomP(P) :=
    N ← rows(P) + 1
    a[N - 1] ← 0
    [a[0]; a[1]] ← [-P[0]; 1]
    for n ∈ 2 .. N - 1
        a[n] ← 1
        root ← P[n - 1]
        for i ∈ n - 1 .. 1
            a[i] ← a[i - 1] - a[i]*root
        a[0] ← -a[0]*root
    a
Root2PolynomZ(Z) :=
    N ← rows(Z) + 1
    [a[N - 1]; a[N - 2]] ← [-Z[0]; 1]
    for k ∈ 2 .. N - 1
        a[N - 1 - k] ← a[N - 1 - k + 1]
        for i ∈ k - 1 .. 1
            a[N - 1 - i] ← a[N - 1 - (i - 1)] - a[N - 1 - i]*Z[k - 1]
        a[N - 1] ← -a[N - 1]*Z[k - 1]
    a
ω_pl := 2*π*f_pl = 2
ω_sl := 2*π*f_sl = 4
ω_sh := 2*π*f_sh = 12
ω_ph := 2*π*f_ph = 15
ω_c := ω_sl*ω_sh = 48
Δω := ω_sh - ω_sl = 8
Ω(T_d, ω) := 2/T_d*tan(ω/2)  # Преобразование частот аналогового фильтра в частоты цифрового
F_pl := f_analog(f_pl, f_d) = 0.319375
F_sl := f_analog(f_sl, f_d) = 0.645246
F_sh := f_analog(f_sh, f_d) = 2.17768
F_ph := f_analog(f_ph, f_d) = 2.96536
F_pl/f_pl - 1 = 0.334672 %
F_sl/f_sl - 1 = 1.35502 %
F_sh/f_sh - 1 = 14.0228 %
F_ph/f_ph - 1 = 24.2129 %
Ω_pl := 2*π*F_pl = 2.00669
Ω_sl := 2*π*F_sl = 4.0542
Ω_sh := 2*π*F_sh = 13.6827
Ω_ph := 2*π*F_ph = 18.6319
Ω_c := Ω_sl*Ω_sh = 55.4726
ΔΩ := Ω_sh - Ω_sl = 9.62854
Ω_0 :=
    Ω_p ←
        Ω_ph if Ω_c/Ω_ph > Ω_pl
        Ω_pl otherwise
    |ΔΩ*Ω_p/(Ω_c - Ω_p^2)|
    = 0.615059
ω_0 :=
    ω_p ←
        ω_ph if ω_c/ω_ph > ω_pl
        ω_pl otherwise
    |Δω*ω_p/(ω_c - ω_p^2)|
    = 0.677966
f_0 := ω_0/(2*π) = 0.107902
F_0 := Ω_0/(2*π) = 0.0978897
Ω_1 := 1
ω_1 := 1
F_1 := Ω_1/(2*π) = 0.159155
f_1 := ω_1/(2*π) = 0.159155
R_p := 1  # Неравномерность в полосе пропускания (дБ)
G_p := (-R_p) db = 0.891251
R_s := 40  # Уровень подавления в полосе заграждения (дБ)
G_s := (-R_s) db = 0.01
# Порядок фильтра
Ω_p := Ω_0
Ω_s := Ω_1
ε_p := sqrt(10^(R_p/10) - 1) = 0.508847
G_p := 1/sqrt(1 + ε_p^2) = 0.891251
poles(N) :=
    r ← mod(N, 2)
    L ← (N - r)/2
    α ← Ω_0/nthroot(ε_p, N)
    P[0] ← -α
    i ← r
    θ_0 ← π/N
    for n ∈ 1 .. L
        θ ← θ_0*(n - 0.5)
        P[i] ← α*(-sin(θ) + 1i*cos(θ))
        P[i + 1] ← α*(-sin(θ) - 1i*cos(θ))
        i ← i + 2
    P
ε_s := sqrt(10^(R_s/10) - 1) = 99.995
1/ε_s = 0.0100005
G_s := 1/sqrt(1 + ε_s^2) = 0.01
ε_s/ε_p = 196.513
Ω_s/Ω_p = 1.62586
# Порядок фильтра
N := ln(ε_s/ε_p)/ln(Ω_s/Ω_p) = 10.8649
N := ceil(N) = 11
α := ε_p^(-1/N) = 1.06334
L := Trunc(N/2, 1) = 5
r := mod(N, 2) = 1
α := Ω_0/nthroot(ε_p, N)
θ_0 := π/N
n := 2
poles(N) :=
    r ← mod(N, 2)
    L ← (N - r)/2
    α ← Ω_0/nthroot(ε_p, N)
    P[0] ← -α
    i ← r
    θ_0 ← π/N
    for n ∈ 1 .. L
        θ ← θ_0*(n - 0.5)
        P[i] ← α*(-sin(θ) + 1i*cos(θ))
        P[i + 1] ← α*(-sin(θ) - 1i*cos(θ))
        i ← i + 2
    P
θ := θ_0*(n - 0.5) = 0.428399
α*(-sin(θ) + 1i*cos(θ)) = -0.27169 + 0.594917i
α*(-sin(θ) - 1i*cos(θ)) = -0.27169 - 0.594917i
Ω_0 = 0.615059
p_p := poles(N)
p_p = [-0.65402; -0.0930767 + 0.647363i; -0.0930767 - 0.647363i; -0.27169 + 0.594917i; -0.27169 - 0.594917i; -0.428292 + 0.494275i; -0.428292 - 0.494275i; -0.550196 + 0.35359i; -0.550196 - 0.35359i; -0.627527 + 0.184259i; -0.627527 - 0.184259i]
H(p) := Ω_0^N/ε_p*1/product(p - p_p[n], n = 0 .. N - 1)
Root2PolynomP(p_p) = [0.00936483; 0.100614; 0.54049; 1.90878; 4.91046; 9.64516; 14.7475; 17.5529; 15.9515; 10.5597; 4.59558; 1]
product(p - p_p[n], n = 0 .. N - 1) coeffs → [
    0.00936483102239;
    0.100614102537 - 3.94430452611e-31i;
    0.540490138326 - 6.31088724177e-30i;
    1.90878266027;
    4.91046334716;
    9.6451618596;
    14.7475071701 - 1.00974195868e-28i;
    17.5529356758 - 4.03896783473e-28i;
    15.951515877;
    10.5596967245;
    4.5955841249;
    1
]
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pzf_w(P_p, ω_c, Δω) :=
    count_p ← rows(P_p)
    for i ∈ 0 .. count_p - 1
        pdw ← 0.5*Δω/P_p[i]
        [p1[i*2]; p1[i*2 + 1]] ← [pdw + sqrt(pdw^2 - ω_c); pdw - sqrt(pdw^2 - ω_c)]
        [p01[i*2]; p01[i*2 + 1]] ← [1i*sqrt(ω_c); -1i*sqrt(ω_c)]
    [p1; p01]
pzf(P_p, f_min, f_max) :=
    count_p ← rows(P_p)
    ω_min ← 2*π*f_min
    ω_max ← 2*π*f_max
    Δω ← ω_max - ω_min
    ω_c ← ω_min*ω_max
    pzf_w(P_p, ω_c, Δω)
F_sl/f_sl = 1.01355
F_sh/f_sh = 1.14023
[p_p1; p_01] := pzf_w(p_p, Ω_c, ΔΩ)  # disabled
F_pl/f_pl = 1.00335
F_ph/f_ph = 1.24213
Δω/(2*p_p) + sqrt((Δω/(2*p_p))^2 - ω_c) = [-6.11602 + 3.25488i; -0.296235 + 3.12339i; -0.296235 - 3.12339i; -0.910227 + 3.10581i; -0.910227 - 3.10581i; -1.59747 + 3.06679i; -1.59747 - 3.06679i; -2.44651 + 2.99768i; -2.44651 - 2.99768i; -3.67872 + 2.89498i; -3.67872 - 2.89498i]
[p_p1; p_01] := pzf(p_p, F_sl, F_sh)
Δω/(2*p_p) - sqrt((Δω/(2*p_p))^2 - ω_c) = [-6.11602 - 3.25488i; -1.44457 - 15.2309i; -1.44457 + 15.2309i; -4.17115 - 14.2325i; -4.17115 + 14.2325i; -6.41281 - 12.3112i; -6.41281 + 12.3112i; -7.84374 - 9.61082i; -7.84374 + 9.61082i; -8.05784 - 6.34114i; -8.05784 + 6.34114i]
p_p1 = [
    -7.36104 + 1.13473i;
    -7.36104 - 1.13473i;
    -0.313123 + 3.10629i;
    -1.78205 - 17.6785i;
    -0.313123 - 3.10629i;
    -1.78205 + 17.6785i;
    -0.961074 + 3.06904i;
    -5.1547 - 16.4607i;
    -0.961074 - 3.06904i;
    -5.1547 + 16.4607i;
    -1.68246 + 2.98271i;
    -7.95845 - 14.1089i;
    -1.68246 - 2.98271i;
    -7.95845 + 14.1089i;
    -2.56401 + 2.81217i;
    -9.82099 - 10.7715i;
    -2.56401 - 2.81217i;
    -9.82099 + 10.7715i;
    -3.82022 + 2.44324i;
    -10.3055 - 6.59093i;
    -3.82022 - 2.44324i;
    -10.3055 + 6.59093i
]
p_01 = [7.44799i; -7.44799i; 7.44799i; -7.44799i; 7.44799i; -7.44799i; 7.44799i; -7.44799i; 7.44799i; -7.44799i; 7.44799i; -7.44799i; 7.44799i; -7.44799i; 7.44799i; -7.44799i; 7.44799i; -7.44799i; 7.44799i; -7.44799i; 7.44799i; -7.44799i]
G_02 := HP(1i*2*π*sqrt(F_sl*F_sh), p_01, p_p1) = 0
H_2(p) := G_p^(1 - r)*product(p - p_01[n], n = 0 .. rows(p_01) - 1)/product(p - p_p1[n], n = 0 .. rows(p_p1) - 1)
H_z(z) := H_2(2*f_d*(1 - z^-1)/(1 + z^-1))
# Делаем преобразование плоскости p в плоскость z путём подстановки p == 2*f_d*(1 - z^-1)/(1 + z^-1)
Z(p, f_d) := (2*f_d + p)/(2*f_d - p)
H_z(z) := H_2(2*f_d*(1 - z^-1)/(1 + z^-1))
z_0 := vectorize(Z(p_01, f_d))
z_p := vectorize(Z(p_p1, f_d))
G_0z := product(1 - z_0[n], n = 0 .. rows(z_0) - 1)/product(1 - z_p[n], n = 0 .. rows(z_p) - 1) = 77.7767
N = 11
rows(z_0) = 22
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rows(z_p) = 22
z_0 = [
    0.756418 + 0.654089i;
    0.756418 - 0.654089i;
    0.756418 + 0.654089i;
    0.756418 - 0.654089i;
    0.756418 + 0.654089i;
    0.756418 - 0.654089i;
    0.756418 + 0.654089i;
    0.756418 - 0.654089i;
    0.756418 + 0.654089i;
    0.756418 - 0.654089i;
    0.756418 + 0.654089i;
    0.756418 - 0.654089i;
    0.756418 + 0.654089i;
    0.756418 - 0.654089i;
    0.756418 + 0.654089i;
    0.756418 - 0.654089i;
    0.756418 + 0.654089i;
    0.756418 - 0.654089i;
    0.756418 + 0.654089i;
    0.756418 - 0.654089i;
    0.756418 + 0.654089i;
    0.756418 - 0.654089i
]
z_p = [
    0.459422 + 0.0605258i;
    0.459422 - 0.0605258i;
    0.924174 + 0.294245i;
    0.10711 - 0.898541i;
    0.924174 - 0.294245i;
    0.10711 + 0.898541i;
    0.868248 + 0.273541i;
    0.113392 - 0.728581i;
    0.868248 - 0.273541i;
    0.113392 + 0.728581i;
    0.810547 + 0.249064i;
    0.140304 - 0.575442i;
    0.810547 - 0.249064i;
    0.140304 + 0.575442i;
    0.74562 + 0.217558i;
    0.18653 - 0.428582i;
    0.74562 - 0.217558i;
    0.18653 + 0.428582i;
    0.661763 + 0.170447i;
    0.260282 - 0.27409i;
    0.661763 - 0.170447i;
    0.260282 + 0.27409i
]
G_p^(1 - r)/G_0z = 0.0128573
product(1 - z_p[n], n = 0 .. rows(z_p) - 1) = 4.71614e-6
product(1 - z_0[n], n = 0 .. rows(z_0) - 1) = 0.000366805
M_p := [f_pl, 1; f_sl, 1; f_sl, G_s; f_sh, G_s; f_sh, 1; f_ph, 1]
H_z2(z) := G_p^(1 - r)/G_0z*product(1 - z_0[n]*z^-1, n = 0 .. rows(z_0) - 1)/product(1 - z_p[n]*z^-1, n = 0 .. rows(z_p) - 1)
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hh_z2 := vectorize(h(tt, H(f) ← H_z2(e^(1i*2*π*f/f_d))))
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Root2PolynomZ(z_0) = [1; -16.6412; 136.877; -737.705; 2916.44; -8980.2; 22334.9; -45944; 79422.6; -116624; 146478; -157974; 146478; -116624; 79422.6; -45944; 22334.9; -8980.2; 2916.44; -737.705; 136.877; -16.6412; 1]
hh_z2 = [
    0.0128573; -0.0782548; 0.235537; -0.405294; 0.389958; -0.0949166 + 1.77402e-11i; -0.195018; 0.166876; 0.101455; -0.136518
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]
