# Рассчёт фильтра Чебышева II-рода
# https://ru.dsplib.org/content/filter_cheby2_ap/filter_cheby2_ap.html
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f_d := 10  # Гц - частота дискретизации
samples := 100
n := 0 .. samples - 1
dt := 1/f_d = 0.1
tt[n] := n*dt
h(t, H) := 1/f_d*integral(H(f)*e^(1i*2*π*f*t), f = -f_d/2 .. f_d/2)
df := f_d/samples = 0.1
db(x) := 10^(x/20)
db_P(x) := 10^(x/10)
to_db(x) := 20*log(|x|)
to_dbP(x) := 10*log(|x|)
roundup(x) := Trunc(x, 1) + (Trunc(x, 1) ≠ x)
abs(z) := |z|
circle_x[n] := cos(2*π/(samples - 1)*n)
circle_y[n] := sin(2*π/(samples - 1)*n)
Ki(k) :=
    k_0 ← k/(1 + sqrt(1 - k*k))
    k_0*k_0
K(k) :=
    ki ← Ki(k)
    (1 + ki)*K(ki) if k - ki > 0
    π/2 otherwise
T(k) := K(sqrt(1 - k*k))
sn(u, k) :=
    ki ← Ki(k)
    sin(u*π/2) if k - ki ≤ 0
    otherwise
        w ← sn(u, ki)
        (1 + ki)/(1/w + ki*w)
cd(u, k) :=
    ki ← Ki(k)
    cos(u*π/2) if k - ki ≤ 0
    otherwise
        w ← cd(u, ki)
        (1 + ki)/(1/w + ki*w)
sn_inv(sn, k) :=
    ki ← Ki(k)
    sn_inv(2*sn/((1 + ki)*(1 + sqrt(1 - k*k*sn*sn))), ki) if k - ki > 0
    2*asin(sn)/π
cd_inv(cn, k) :=
    ki ← Ki(k)
    cd_inv(2*cn/((1 + ki)*(1 + sqrt(1 - k*k*cn*cn))), ki) if k - ki > 0
    2*acos(cn)/π
K(0.66667) = 1.80967
T(0.66667) = 1.90424
K(0.0028615) = 1.5708
T(0.0028615) = 7.24272
Z(p_0, f_d) := (2*f_d + p_0)/(2*f_d - p_0)
z2p(z_0, f_d) := 2*f_d*(1 - z_0^-1)/(1 + z_0^-1)
Root2PolynomP(P) :=
    N ← rows(P) + 1
    a[N - 1] ← 0
    [a[0]; a[1]] ← [-P[0]; 1]
    for n ∈ 2 .. N - 1
        a[n] ← 1
        root ← P[n - 1]
        for i ∈ n - 1 .. 1
            a[i] ← a[i - 1] - a[i]*root
        a[0] ← -a[0]*root
    a
Root2PolynomZ(Z) :=
    N ← rows(Z) + 1
    [a[N - 1]; a[N - 2]] ← [-Z[0]; 1]
    for k ∈ 2 .. N - 1
        a[N - 1 - k] ← a[N - 1 - k + 1]
        for i ∈ k - 1 .. 1
            a[N - 1 - i] ← a[N - 1 - (i - 1)] - a[N - 1 - i]*Z[k - 1]
        a[N - 1] ← -a[N - 1]*Z[k - 1]
    a
cd(0.6, 0.93) = 0.761809
sn(0.6, 0.93) = 0.917919
η(h) :=
    N ← rows(h)
    [η[0]; η[N - 1]] ← [h[0]; 0]
    for n ∈ 1 .. N - 1
        η[n] ← η[n - 1] + h[n]
    η
# 0.917918 | 0.761809423
C(N, ω) := cos(N*acos(ω))
sh(x) := sinh(x)
ch(x) := cosh(x)
arsh(x) := asinh(x)
arch(x) := acosh(x)
f_analog(f_digital., f_d) := f_d/π*tan(π*f_digital./f_d)
conj(z) := Re(z) - 1i*Im(z)
PolynomP(p, P) := product(p - P[n], n = 0 .. rows(P) - 1)
PolynomZ(z, Z) := product(1 - Z[n]*z^-1, n = 0 .. rows(Z) - 1)
ConjV(z) := [Re(z) + 1i*Im(z); Re(z) - 1i*Im(z)]
f_digit(f_analog, f_d) := f_d/π*atan(π*f_analog/f_d)
HP(p, P_0, P_p) := PolynomP(p, P_0)/PolynomP(p, P_p)
HZ(z, Z_0, Z_p) := PolynomZ(z, Z_0)/PolynomZ(z, Z_p)
SinCos(x) := [sin(x); cos(x)]
f_pl := 2/(2*π) = 0.31831
f_sl := 4/(2*π) = 0.63662
f_sh := 12/(2*π) = 1.90986
f_ph := 14/(2*π) = 2.22817
ω_pl := 2*π*f_pl = 2
ω_sl := 2*π*f_sl = 4
ω_sh := 2*π*f_sh = 12
ω_ph := 2*π*f_ph = 14
ω_c := ω_sl*ω_sh = 48
Δω := ω_sh - ω_sl = 8
Ω(T_d, ω) := 2/T_d*tan(ω/2)  # Преобразование частот аналогового фильтра в частоты цифрового
F_pl := f_analog(f_pl, f_d) = 0.319375
F_sl := f_analog(f_sl, f_d) = 0.645246
F_sh := f_analog(f_sh, f_d) = 2.17768
F_ph := f_analog(f_ph, f_d) = 2.68109
F_pl/f_pl - 1 = 0.334672 %
F_sl/f_sl - 1 = 1.35502 %
F_sh/f_sh - 1 = 14.0228 %
F_ph/f_ph - 1 = 20.3269 %
Ω_pl := 2*π*F_pl = 2.00669
Ω_sl := 2*π*F_sl = 4.0542
Ω_sh := 2*π*F_sh = 13.6827
Ω_ph := 2*π*F_ph = 16.8458
Ω_c := Ω_sl*Ω_sh = 55.4726
ΔΩ := Ω_sh - Ω_sl = 9.62854
Ω_0 :=
    Ω_p ←
        Ω_ph if Ω_c/Ω_ph > Ω_pl
        Ω_pl otherwise
    |ΔΩ*Ω_p/(Ω_c - Ω_p^2)|
    = 0.710446
ω_0 :=
    ω_p ←
        ω_ph if ω_c/ω_ph > ω_pl
        ω_pl otherwise
    |Δω*ω_p/(ω_c - ω_p^2)|
    = 0.756757
f_0 := ω_0/(2*π) = 0.120442
F_0 := Ω_0/(2*π) = 0.113071
Ω_1 := 1
ω_1 := 1
F_1 := Ω_1/(2*π) = 0.159155
f_1 := ω_1/(2*π) = 0.159155
R_p := 1
G_p := (-R_p) db = 0.891251  # Неравномерность в полосе пропускания (дБ)
R_s := 40
G_s := (-R_s) db = 0.01  # Уровень подавления в полосе заграждения (дБ)
Ω_p := Ω_0 = 0.710446  # Частота среза аналогового фильтра
Ω_s := Ω_1 = 1  # Частота заграждения аналогового фильтра
# Порядок фильтра
ε_p := sqrt(10^(R_p/10) - 1) = 0.508847
ε_s := sqrt(10^(R_s/10) - 1) = 99.995
1/ε_s = 0.0100005
G_p := 1/sqrt(1 + ε_p^2) = 0.891251
ε_s/ε_p = 196.513
Ω_s/Ω_p = 1.40757
k_ω := Ω_p/Ω_s = 0.710446
k_ε := ε_p/ε_s = 0.00508873
# Порядок фильтра
ε_s/ε_p = 196.513
N := arch(ε_s/ε_p)/arch(Ω_s/Ω_p) = 6.82966
N := ceil(N) = 7
Ω_s/Ω_p = 1.40757
# Число парных полюсов | Наличие/отсутсвтие центрального полюса
L := Trunc(N/2, 1) = 3
r := mod(N, 2) = 1
2*L + r = 7
G_s := 1/sqrt(1 + ε_s^2) = 0.01
G_p := 1/sqrt(1 + ε_p^2) = 0.891251
β := 1/N*arsh(ε_s) = 0.756899
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θ(n) := (2*n - 1)/(2*N)*π  # disabled
θ(n) := π*(n - 0.5)/N
conj(z) := Re(z) - 1i*Im(z)
poles(r, L) :=
    P[0] ← -Ω_0/sh(β) if r ≠ 0
    for n ∈ 1 .. L
        [P[2*n + r - 2]; P[2*n + r - 1]] ← ConjV(1i*Ω_0/cos(π*(n - 0.5)/N + 1i*β))
    P
zeros(L) :=
    for n ∈ 1 .. L
        [P[2*n - 2]; P[2*n - 1]] ← ConjV(1i*Ω_0/cos(π*(n - 0.5)/N))
    P
p_p := poles(r, L) = [-0.854653; -0.080058 + 0.548704i; -0.080058 - 0.548704i; -0.282749 + 0.554647i; -0.282749 - 0.554647i; -0.605151 + 0.455889i; -0.605151 - 0.455889i]
p_0 := zeros(L) = [0.728717i; -0.728717i; 0.908695i; -0.908695i; 1.63741i; -1.63741i]
ChebII(ε_s, N) :=
    β ← arsh(ε_s)/N
    L ← Trunc(N/2, 1)
    r ← mod(N, 2)
    P[0] ← -Ω_0/sh(β) if r ≠ 0
    for n ∈ 1 .. L
        [P[2*n + r - 2]; P[2*n + r - 1]] ← ConjV(1i*Ω_0/cos(π*(n - 0.5)/N + 1i*β))
    for n ∈ 1 .. L
        [Z[2*n - 2]; Z[2*n - 1]] ← ConjV(1i*Ω_0/cos(π*(n - 0.5)/N))
    [Z; P]
[p_0; p_p] := ChebII(ε_s, N)
p_0 = [0.728717i; -0.728717i; 0.908695i; -0.908695i; 1.63741i; -1.63741i]
p_p = [-0.854653; -0.080058 + 0.548704i; -0.080058 - 0.548704i; -0.282749 + 0.554647i; -0.282749 - 0.554647i; -0.605151 + 0.455889i; -0.605151 - 0.455889i]
cos(x) == e^□/□
G_0 := product(-p_0[i], i = 0 .. rows(p_0) - 1)/product(-p_p[i], i = 0 .. rows(p_p) - 1)
H_0(p) := 1/G_0*product(p - p_0[i], i = 0 .. rows(p_0) - 1)/product(p - p_p[i], i = 0 .. rows(p_p) - 1)
H_0(0) = 1
vectorize(|p_p|) = [0.854653; 0.554513; 0.554513; 0.62256; 0.62256; 0.757656; 0.757656]
G_0 = 20.1071
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ω_h := ch(1/N*1/ch(1/ε_p)) = 1.00077
pzf_w(P_p, P_0, ω_c, Δω) :=
    count_p ← rows(P_p)
    count_0 ← rows(P_0)
    for i ∈ 0 .. count_p - 1
        pdw ← 0.5*Δω/P_p[i]
        [p1[i*2]; p1[i*2 + 1]] ← [pdw + sqrt(pdw^2 - ω_c); pdw - sqrt(pdw^2 - ω_c)]
    for i ∈ 0 .. count_0 - 1
        pdw ← 0.5*Δω/P_0[i]
        [p01[i*2]; p01[i*2 + 1]] ← [pdw + sqrt(pdw^2 - ω_c); pdw - sqrt(pdw^2 - ω_c)]
    if count_p ≠ count_0
        for i ∈ 0 .. (count_p - count_0) - 1
            [p02[i*2]; p02[i*2 + 1]] ← [1i*sqrt(ω_c); -1i*sqrt(ω_c)]
        p01 ← stack(p01, p02)
    [p1; p01]
pzf(P_p, P_0, f_min, f_max) :=
    count_p ← rows(P_p)
    count_0 ← rows(P_0)
    ω_min ← 2*π*f_min
    ω_max ← 2*π*f_max
    Δω ← ω_max - ω_min
    ω_c ← ω_min*ω_max
    pzf_w(P_p, P_0, ω_c, Δω)
H0(p) := G_p^(1 - r)/G_0*product(p - p_0[n], n = 0 .. rows(p_0) - 1)/product(p - p_p[n], n = 0 .. rows(p_p) - 1)
[p_p1; p_01] := pzf(p_p, p_0, F_sl, F_sh)
G_02 := HP(1i*2*π*sqrt(F_sl*F_sh), p_01, p_p1) = 0
H_2(p) := product(p - p_01[n], n = 0 .. rows(p_01) - 1)/product(p - p_p1[n], n = 0 .. rows(p_p1) - 1)
H_z(z) := H_2(2*f_d*(1 - z^-1)/(1 + z^-1))
z_0 := vectorize(Z(p_01, f_d))
z_p := vectorize(Z(p_p1, f_d))
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p_01 = [3.34932i; -16.5623i; 16.5623i; -3.34932i; 3.8421i; -14.4381i; 14.4381i; -3.8421i; 5.06715i; -10.9475i; 10.9475i; -5.06715i; 7.44799i; -7.44799i]
p_p1 = [-5.63301 + 4.87256i; -5.63301 - 4.87256i; -0.303906 + 2.74956i; -2.20302 - 19.9316i; -0.303906 - 2.74956i; -2.20302 + 19.9316i; -1.051 + 2.94209i; -5.97324 - 16.721i; -1.051 - 2.94209i; -5.97324 + 16.721i; -2.37457 + 3.3618i; -7.77575 - 11.0085i; -2.37457 - 3.3618i; -7.77575 + 11.0085i]
z_0 = [0.94544 + 0.325795i; 0.186397 - 0.982475i; 0.186397 + 0.982475i; 0.94544 - 0.325795i; 0.928818 + 0.370535i; 0.314797 - 0.949159i; 0.314797 + 0.949159i; 0.928818 - 0.370535i; 0.879364 + 0.476151i; 0.538913 - 0.842362i; 0.538913 + 0.842362i; 0.879364 - 0.476151i; 0.756418 + 0.654089i; 0.756418 - 0.654089i]
z_p = [0.506068 + 0.286287i; 0.506068 - 0.286287i; 0.934587 + 0.261982i; -0.00238267 - 0.895558i; 0.934587 - 0.261982i; -0.00238267 + 0.895558i; 0.863743 + 0.260477i; 0.0887953 - 0.700942i; 0.863743 - 0.260477i; 0.0887953 + 0.700942i; 0.748276 + 0.26268i; 0.244601 - 0.49328i; 0.748276 - 0.26268i; 0.244601 + 0.49328i]
G_0z := product(1 - z_0[n], n = 0 .. rows(z_0) - 1)/product(1 - z_p[n], n = 0 .. rows(z_p) - 1) = 7.10694
z_0 = [0.94544 + 0.325795i; 0.186397 - 0.982475i; 0.186397 + 0.982475i; 0.94544 - 0.325795i; 0.928818 + 0.370535i; 0.314797 - 0.949159i; 0.314797 + 0.949159i; 0.928818 - 0.370535i; 0.879364 + 0.476151i; 0.538913 - 0.842362i; 0.538913 + 0.842362i; 0.879364 - 0.476151i; 0.756418 + 0.654089i; 0.756418 - 0.654089i]
z_p = [0.506068 + 0.286287i; 0.506068 - 0.286287i; 0.934587 + 0.261982i; -0.00238267 - 0.895558i; 0.934587 - 0.261982i; -0.00238267 + 0.895558i; 0.863743 + 0.260477i; 0.0887953 - 0.700942i; 0.863743 - 0.260477i; 0.0887953 + 0.700942i; 0.748276 + 0.26268i; 0.244601 - 0.49328i; 0.748276 - 0.26268i; 0.244601 + 0.49328i]
M_p := [f_pl, 1; f_sl, 1; f_sl, G_s; f_sh, G_s; f_sh, 1; f_ph, 1]
H_z2(z) := 1/G_0z*product(1 - z_0[n]*z^-1, n = 0 .. rows(z_0) - 1)/product(1 - z_p[n]*z^-1, n = 0 .. rows(z_p) - 1)
Kdb(f) := 20*log(abs(H_z2(e^(1i*2*π*f/f_d))))
Kdb(f_pl*1) = -0.00423866
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hh_z2 := vectorize(h(tt, H(f) ← H_z2(e^(1i*2*π*f/f_d))))
ηη_z2 := η(hh_z2)
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z_0 = [0.94544 + 0.325795i; 0.186397 - 0.982475i; 0.186397 + 0.982475i; 0.94544 - 0.325795i; 0.928818 + 0.370535i; 0.314797 - 0.949159i; 0.314797 + 0.949159i; 0.928818 - 0.370535i; 0.879364 + 0.476151i; 0.538913 - 0.842362i; 0.538913 + 0.842362i; 0.879364 - 0.476151i; 0.756418 + 0.654089i; 0.756418 - 0.654089i]
G_norm := 1/G_0z = 0.140708
z_p = [0.506068 + 0.286287i; 0.506068 - 0.286287i; 0.934587 + 0.261982i; -0.00238267 - 0.895558i; 0.934587 - 0.261982i; -0.00238267 + 0.895558i; 0.863743 + 0.260477i; 0.0887953 - 0.700942i; 0.863743 - 0.260477i; 0.0887953 + 0.700942i; 0.748276 + 0.26268i; 0.244601 - 0.49328i; 0.748276 - 0.26268i; 0.244601 + 0.49328i]
[B; A] := [G_norm*Root2PolynomZ(z_0); Root2PolynomZ(z_p)]
Root2PolynomZ(z_0) = [1; -9.10029; 41.3551; -123.904; 272.796; -466.049; 636.332; -704.855; 636.332; -466.049; 272.796; -123.904; 41.3551; -9.10029; 1]
B = [0.140708; -1.28048; 5.81898; -17.4343; 38.3844; -65.5767; 89.5368; -99.1784; 89.5368; -65.5767; 38.3844; -17.4343; 5.81898; -1.28048; 0.140708]
A = [1; -6.76737; 22.2195; -47.7742; 76.1458; -95.5794; 97.2141; -81.1165; 55.701; -31.2988; 14.1562; -4.99846; 1.30528; -0.226438; 0.0197874]
h(0, H(f) ← H_z2(e^(1i*2*π*f/f_d))) = 0.140708 + 1.95791e-11i
1/f_d*integral(H_z2(e^(1i*2*π*f/f_d)), f = -f_d/2 .. f_d/2) = 0.140708 - 1.95791e-11i
1/G_0z = 0.140708
1/f_d*integral(1/G_0z*(product(1 - z_0[n]*e^(-1i*2*π*f/f_d), n = 0 .. rows(z_0) - 1)/product(1 - z_p[n]*e^(-1i*2*π*f/f_d), n = 0 .. rows(z_p) - 1) + product(1 - z_0[n]*e^(1i*2*π*f/f_d), n = 0 .. rows(z_0) - 1)/product(1 - z_p[n]*e^(1i*2*π*f/f_d), n = 0 .. rows(z_p) - 1)), f = 0 .. f_d/2) = 0.140708
Re(hh_z2) = [
    0.140708; -0.32826; 0.471066; -0.230435; -0.0385474; 0.23183; 0.0299164; -0.0725232; 0.107979; 0.158695
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]
