# Рассчёт фильтра Чебышева II-рода
# https://ru.dsplib.org/content/filter_cheby2_ap/filter_cheby2_ap.html
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f_d := 10  # Гц - частота дискретизации
samples := 100
n := 0 .. samples - 1
dt := 1/f_d = 0.1
tt[n] := n*dt
h(t, H) := 1/f_d*integral(H(f)*e^(1i*2*π*f*t), f = -f_d/2 .. f_d/2)
db(x) := 10^(x/20)
db_P(x) := 10^(x/10)
to_db(x) := 20*log(|x|)
to_dbP(x) := 10*log(|x|)
roundup(x) := Trunc(x, 1) + (Trunc(x, 1) ≠ x)
abs(z) := |z|
circle_x[n] := cos(2*π/(samples - 1)*n)
circle_y[n] := sin(2*π/(samples - 1)*n)
Ki(k) :=
    k_0 ← k/(1 + sqrt(1 - k*k))
    k_0*k_0
K(k) :=
    ki ← Ki(k)
    (1 + ki)*K(ki) if k - ki > 0
    π/2 otherwise
T(k) := K(sqrt(1 - k*k))
sn(u, k) :=
    ki ← Ki(k)
    sin(u*π/2) if k - ki ≤ 0
    otherwise
        w ← sn(u, ki)
        (1 + ki)/(1/w + ki*w)
cd(u, k) :=
    ki ← Ki(k)
    cos(u*π/2) if k - ki ≤ 0
    otherwise
        w ← cd(u, ki)
        (1 + ki)/(1/w + ki*w)
sn_inv(sn, k) :=
    ki ← Ki(k)
    sn_inv(2*sn/((1 + ki)*(1 + sqrt(1 - k*k*sn*sn))), ki) if k - ki > 0
    2*asin(sn)/π
cd_inv(cn, k) :=
    ki ← Ki(k)
    cd_inv(2*cn/((1 + ki)*(1 + sqrt(1 - k*k*cn*cn))), ki) if k - ki > 0
    2*acos(cn)/π
K(0.66667) = 1.80967
T(0.66667) = 1.90424
K(0.0028615) = 1.5708
T(0.0028615) = 7.24272
Z(p_0, f_d) := (2*f_d + p_0)/(2*f_d - p_0)
z2p(z_0, f_d) := 2*f_d*(1 - z_0^-1)/(1 + z_0^-1)
Integral(f, x1, x2, dx) :=
    x ← x1
    y ← f(x)
    while x ≤ x2
        x ← x + dx
        S ← S + y + (y ← f(x))
    S*0.5*dx
cd(0.6, 0.93) = 0.761809
sn(0.6, 0.93) = 0.917919
# 0.917918 | 0.761809423
C(N, ω) := cos(N*acos(ω))
sh(x) := sinh(x)
ch(x) := cosh(x)
arsh(x) := asinh(x)
arch(x) := acosh(x)
Ω(T_d, ω) := 2/T_d*tan(ω/2)  # Преобразование частот аналогового фильтра в частоты цифрового
ConjV(z) := [Re(z) + 1i*Im(z); Re(z) - 1i*Im(z)]
SinCos(x) := [sin(x); cos(x)]
h2(t, H) := 1/f_d*Integral(y(f) ← H(f)*e^(1i*2*π*f*t), -f_d/2, f_d/2, f_d/2001)
ShCh(x) := [sh(x); ch(x)]
f_analog(f_digital., f_d) := f_d/π*tan(π*f_digital./f_d)
f_digit(f_analog, f_d) := f_d/π*atan(π*f_analog/f_d)
Root2PolynomP(P) :=
    N ← rows(P) + 1
    a[N - 1] ← 0
    [a[0]; a[1]] ← [-P[0]; 1]
    for n ∈ 2 .. N - 1
        a[n] ← 1
        root ← P[n - 1]
        for i ∈ n - 1 .. 1
            a[i] ← a[i - 1] - a[i]*root
        a[0] ← -a[0]*root
    a
Root2PolynomZ(Z) :=
    N ← rows(Z) + 1
    [a[N - 1]; a[N - 2]] ← [-Z[0]; 1]
    for k ∈ 2 .. N - 1
        a[N - 1 - k] ← a[N - 1 - k + 1]
        for i ∈ k - 1 .. 1
            a[N - 1 - i] ← a[N - 1 - (i - 1)] - a[N - 1 - i]*Z[k - 1]
        a[N - 1] ← -a[N - 1]*Z[k - 1]
    a
η(s) :=
    N ← rows(s)
    [y[0]; y[N - 1]] ← [s[0]; 0]
    for n ∈ 1 .. N - 1
        y[n] ← y[n - 1] + s[n]
    y
f_pl := 2/(2*π) = 0.31831
f_sl := 4/(2*π) = 0.63662
f_sh := 12/(2*π) = 1.90986
f_ph := 14/(2*π) = 2.22817
ω_pl := 2*π*f_pl = 2
ω_sl := 2*π*f_sl = 4
ω_sh := 2*π*f_sh = 12
ω_ph := 2*π*f_ph = 14
ω_c := ω_sl*ω_sh = 48
Δω := ω_sh - ω_sl = 8
Ω(T_d, ω) := 2/T_d*tan(ω/2)  # Преобразование частот аналогового фильтра в частоты цифрового
F_pl := f_analog(f_pl, f_d) = 0.319375
F_sl := f_analog(f_sl, f_d) = 0.645246
F_sh := f_analog(f_sh, f_d) = 2.17768
F_ph := f_analog(f_ph, f_d) = 2.68109
F_pl/f_pl - 1 = 0.334672 %
F_sl/f_sl - 1 = 1.35502 %
F_sh/f_sh - 1 = 14.0228 %
F_ph/f_ph - 1 = 20.3269 %
Ω_pl := 2*π*F_pl = 2.00669
Ω_sl := 2*π*F_sl = 4.0542
Ω_sh := 2*π*F_sh = 13.6827
Ω_ph := 2*π*F_ph = 16.8458
Ω_c := Ω_sl*Ω_sh = 55.4726
ΔΩ := Ω_sh - Ω_sl = 9.62854
Ω_0 :=
    Ω_p ←
        Ω_ph if Ω_c/Ω_ph > Ω_pl
        Ω_pl otherwise
    |ΔΩ*Ω_p/(Ω_c - Ω_p^2)|
    = 0.710446
ω_0 :=
    ω_p ←
        ω_ph if ω_c/ω_ph > ω_pl
        ω_pl otherwise
    |Δω*ω_p/(ω_c - ω_p^2)|
    = 0.756757
f_0 := ω_0/(2*π) = 0.120442
F_0 := Ω_0/(2*π) = 0.113071
Ω_1 := 1
ω_1 := 1
F_1 := Ω_1/(2*π) = 0.159155
f_1 := ω_1/(2*π) = 0.159155
R_p := 1
G_p := (-R_p) db = 0.891251  # Неравномерность в полосе пропускания (дБ)
R_s := 40
G_s := (-R_s) db = 0.01  # Уровень подавления в полосе заграждения (дБ)
Ω_p := Ω_0 = 0.710446  # Частота среза аналогового фильтра
Ω_s := Ω_1 = 1  # Частота заграждения аналогового фильтра
# Порядок фильтра
ε_p := sqrt(10^(R_p/10) - 1) = 0.508847
ε_s := sqrt(10^(R_s/10) - 1) = 99.995
1/ε_s = 0.0100005
G_p := 1/sqrt(1 + ε_p^2) = 0.891251
ε_s/ε_p = 196.513
Ω_s/Ω_p = 1.40757
k_ω := Ω_p/Ω_s = 0.710446
k_ε := ε_p/ε_s = 0.00508873
# Порядок фильтра
ε_s/ε_p = 196.513
N := arch(ε_s/ε_p)/arch(Ω_s/Ω_p) = 6.82966
Ω_s/Ω_p = 1.40757
N := ceil(N) = 7
# Число парных полюсов | Наличие/отсутсвтие центрального полюса
L := Trunc(N/2, 1) = 3
r := mod(N, 2) = 1
2*L + r = 7
G_s := 1/sqrt(1 + ε_s^2) = 0.01
G_p := 1/sqrt(1 + ε_p^2) = 0.891251
β := 1/N*arsh(ε_s) = 0.756899
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θ(n) := (2*n - 1)/(2*N)*π
θ(n) := π*(n - 0.5)/N
conj(z) := Re(z) - 1i*Im(z)
poles(r, L) :=
    shβ ← sh(β)
    chβ ← ch(β)
    P[0] ← -Ω_0/k_ω*1/shβ if r ≠ 0
    for n ∈ 1 .. L
        [sinθ; cosθ] ← SinCos(π*(n - 0.5)/N)
        [P[2*n + r - 2]; P[2*n + r - 1]] ← ConjV(-Ω_0/k_ω*(sinθ*shβ - 1i*cosθ*chβ)/(sinθ^2*shβ^2 + cosθ^2*chβ^2))
    P
zeros(L) :=
    for n ∈ 1 .. L
        [P[2*n - 2]; P[2*n - 1]] ← ConjV(Ω_0/k_ω*1i/cos(π*(n - 0.5)/N))
    P
p_p := poles(r, L) = [-1.20298; -0.112687 + 0.772337i; -0.112687 - 0.772337i; -0.397988 + 0.780703i; -0.397988 - 0.780703i; -0.85179 + 0.641694i; -0.85179 - 0.641694i]
p_0 := zeros(L) = [1.02572i; -1.02572i; 1.27905i; -1.27905i; 2.30476i; -2.30476i]
ChebIICorrected(ε_s, N) :=
    β ← arsh(ε_s)/N
    L ← Trunc(N/2, 1)
    r ← mod(N, 2)
    [shβ; chβ] ← ShCh(β)
    P[0] ← -Ω_0/k_ω*1/shβ if r ≠ 0
    for n ∈ 1 .. L
        [sinθ; cosθ] ← SinCos(π*(n - 0.5)/N)
        [P[2*n + r - 2]; P[2*n + r - 1]] ← ConjV(-Ω_0/k_ω*(sinθ*shβ - 1i*cosθ*chβ)/(sinθ^2*shβ^2 + cosθ^2*chβ^2))
        [Z[2*n - 2]; Z[2*n - 1]] ← ConjV(Ω_0/k_ω*1i/cos(π*(n - 0.5)/N))
    [Z; P]
[p_0; p_p] := ChebIICorrected(ε_s, N)
p_0 = [1.02572i; -1.02572i; 1.27905i; -1.27905i; 2.30476i; -2.30476i]
p_p = [-1.20298; -0.112687 + 0.772337i; -0.112687 - 0.772337i; -0.397988 + 0.780703i; -0.397988 - 0.780703i; -0.85179 + 0.641694i; -0.85179 - 0.641694i]
G_0 := product(-p_0[i], i = 0 .. rows(p_0) - 1)/product(-p_p[i], i = 0 .. rows(p_p) - 1)
H_0(p) := 1/G_0*product(p - p_0[i], i = 0 .. rows(p_0) - 1)/product(p - p_p[i], i = 0 .. rows(p_p) - 1)
vectorize(|p_p|) = [1.20298; 0.780514; 0.780514; 0.876294; 0.876294; 1.06645; 1.06645]
G_0 = 14.285
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ω_h := ch(1/N*1/ch(1/ε_p)) = 1.00077
pzf_w(P_p, P_0, ω_c, Δω) :=
    count_p ← rows(P_p)
    count_0 ← rows(P_0)
    for i ∈ 0 .. count_p - 1
        pdw ← 0.5*Δω/P_p[i]
        [p1[i*2]; p1[i*2 + 1]] ← [pdw + sqrt(pdw^2 - ω_c); pdw - sqrt(pdw^2 - ω_c)]
    for i ∈ 0 .. count_0 - 1
        pdw ← 0.5*Δω/P_0[i]
        [p01[i*2]; p01[i*2 + 1]] ← [pdw + sqrt(pdw^2 - ω_c); pdw - sqrt(pdw^2 - ω_c)]
    if count_p ≠ count_0
        for i ∈ 0 .. (count_p - count_0) - 1
            [p02[i*2]; p02[i*2 + 1]] ← [1i*sqrt(ω_c); -1i*sqrt(ω_c)]
        p01 ← stack(p01, p02)
    [p1; p01]
pzf(P_p, P_0, f_min, f_max) :=
    count_p ← rows(P_p)
    count_0 ← rows(P_0)
    ω_min ← 2*π*f_min
    ω_max ← 2*π*f_max
    Δω ← ω_max - ω_min
    ω_c ← ω_min*ω_max
    pzf_w(P_p, P_0, ω_c, Δω)
H0(p) := 1/G_0*product(p - p_0[n], n = 0 .. rows(p_0) - 1)/product(p - p_p[n], n = 0 .. rows(p_p) - 1)
[p_p1; p_01] := pzf(p_p, p_0, F_sl, F_sh)
G_02 := HP(1i*2*π*sqrt(F_sl*F_sh), p_01, p_p1)  # error: Эта переменная не определена.
H_2(p) := product(p - p_01[n], n = 0 .. rows(p_01) - 1)/product(p - p_p1[n], n = 0 .. rows(p_p1) - 1)
H_z(z) := H_2(2*f_d*(1 - z^-1)/(1 + z^-1))
z_0 := vectorize(Z(p_01, f_d))
z_p := vectorize(Z(p_p1, f_d))
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p_p1 = [-4.00195 + 6.28148i; -4.00195 - 6.28148i; -0.32463 + 3.50133i; -1.4564 - 15.7082i; -0.32463 - 3.50133i; -1.4564 + 15.7082i; -1.08671 + 3.77648i; -3.90363 - 13.5657i; -1.08671 - 3.77648i; -3.90363 + 13.5657i; -2.24359 + 4.47435i; -4.96767 - 9.90694i; -2.24359 - 4.47435i; -4.96767 + 9.90694i]
p_01 = [4.10996i; -13.4971i; 13.4971i; -4.10996i; 4.5811i; -12.109i; 12.109i; -4.5811i; 5.64653i; -9.82419i; 9.82419i; -5.64653i; 7.44799i; -7.44799i]
z_0 = [0.918963 + 0.394343i; 0.374166 - 0.927362i; 0.374166 + 0.927362i; 0.918963 - 0.394343i; 0.900298 + 0.435273i; 0.463519 - 0.886087i; 0.463519 + 0.886087i; 0.900298 - 0.435273i; 0.852352 + 0.522968i; 0.611231 - 0.791452i; 0.611231 + 0.791452i; 0.852352 - 0.522968i; 0.756418 + 0.654089i; 0.756418 - 0.654089i]
z_p = [0.559706 + 0.408186i; 0.559706 - 0.408186i; 0.911333 + 0.329266i; 0.213725 - 0.888568i; 0.911333 - 0.329266i; 0.213725 + 0.888568i; 0.837977 + 0.329169i; 0.265729 - 0.718319i; 0.837977 - 0.329169i; 0.265729 + 0.718319i; 0.728338 + 0.34766i; 0.384148 - 0.549217i; 0.728338 - 0.34766i; 0.384148 + 0.549217i]
G_0z := product(1 - z_0[n], n = 0 .. rows(z_0) - 1)/product(1 - z_p[n], n = 0 .. rows(z_p) - 1) = 4.37034
M_p := [f_pl, 1; f_sl, 1; f_sl, G_s; f_sh, G_s; f_sh, 1; f_ph, 1]
H_z2(z) := 1/G_0z*product(1 - z_0[n]*z^-1, n = 0 .. rows(z_0) - 1)/product(1 - z_p[n]*z^-1, n = 0 .. rows(z_p) - 1)
1/Re(G_0z) = 0.228815
Re(1/G_0z) = 0.228815
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hh_z2 := vectorize(h(tt, H(f) ← H_z2(e^(1i*2*π*f/f_d))))
ηη_z2 := η(hh_z2)
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z_0 = [0.918963 + 0.394343i; 0.374166 - 0.927362i; 0.374166 + 0.927362i; 0.918963 - 0.394343i; 0.900298 + 0.435273i; 0.463519 - 0.886087i; 0.463519 + 0.886087i; 0.900298 - 0.435273i; 0.852352 + 0.522968i; 0.611231 - 0.791452i; 0.611231 + 0.791452i; 0.852352 - 0.522968i; 0.756418 + 0.654089i; 0.756418 - 0.654089i]
Root2PolynomZ(z_0) = [1; -9.75389; 47.2049; -149.189; 342.665; -603.549; 839.358; -935.465; 839.358; -603.549; 342.665; -149.189; 47.2049; -9.75389; 1]
z_p = [0.559706 + 0.408186i; 0.559706 - 0.408186i; 0.911333 + 0.329266i; 0.213725 - 0.888568i; 0.911333 - 0.329266i; 0.213725 + 0.888568i; 0.837977 + 0.329169i; 0.265729 - 0.718319i; 0.837977 - 0.329169i; 0.265729 + 0.718319i; 0.728338 + 0.34766i; 0.384148 - 0.549217i; 0.728338 - 0.34766i; 0.384148 + 0.549217i]
[b; a] := [1/G_0z*Root2PolynomZ(z_0); Root2PolynomZ(z_p)]
Filter(a, b, s, N) :=
    N_s ← rows(s)
    NN ← min(N_s, N)
    y[N - 1] ← 0
    state[max(rows(a), rows(b)) - 1] ← 0
    a0 ← 1/a[0]
    if rows(a) == rows(b)
        for n ∈ 0 .. N - 1
            sn ←
                s[n] if n < N_s
                0 otherwise
            for i ∈ rows(state) - 1 .. 1
                v ← state[i - 1]
                state[i] ← v
                result ← result + v*b[i]*a0
                sn ← sn - v*a[i]*a0
            state[0] ← sn
            y[n] ← result + sn*b[0]*a0
    otherwise
        for n ∈ 0 .. N - 1
            sn ←
                s[n] if n < N_s
                0
            for i ∈ rows(state) - 1 .. rows(b)
                v ← state[i - 1]
                state[i] ← v
                sn ← sn - v*a[i]*a0
            for i ∈ rows(b) - 1 .. 1
                v ← state[i - 1]
                state[i] ← v
                result ← result + v*b[i]*a0
                sn ← sn - v*a[i]*a0
            state[0] ← sn
            y[n] ← result + sn*b[0]*a0
    y
a_rev := reverse(a)
b_rev := reverse(b)
rows(ηη_z2) = 100
hh2 := Filter(1/G_0z*a, b, [1], samples)
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1/G_0z*product(1 - z_0[n]*z^-1, n = 0 .. rows(z_0) - 1) coeffs → [
    0.22881500023 - 3.06601007785e-17i;
    -2.23183724292 + 2.99055371021e-16i;
    10.8011919856 - 1.44730736391e-15i;
    -34.1367797992 + 4.57416300435e-15i;
    78.406826666 - 1.05061346716e-14i;
    -138.101101847 + 1.85048781592e-14i;
    192.057668751 - 2.5734796553e-14i;
    -214.048456174 + 2.86814554603e-14i;
    192.057668751 - 2.5734796553e-14i;
    -138.101101847 + 1.85048781592e-14i;
    78.406826666 - 1.05061346716e-14i;
    -34.1367797992 + 4.57416300435e-15i;
    10.8011919856 - 1.44730736391e-15i;
    -2.23183724292 + 2.99055371021e-16i;
    0.22881500023 - 3.06601007785e-17i
]
1/G_0z*a_rev = [0.0119798; -0.140236; 0.818395; -3.13178; 8.74429; -18.8002; 32.0577; -44.0224; 48.9295; -43.8325; 31.1868; -17.1077; 6.84294; -1.78519; 0.228815]
Re([
    0.21872794262 - 2.08651273164e-17i;
    -1.82867068413 + 1.74442488633e-16i;
    7.57598139808 - 7.22696032908e-16i;
    -20.3725141716 + 1.94339642596e-15i;
    39.4247458112 - 3.76084706377e-15i;
    -57.6812281575 + 5.50238874309e-15i;
    65.3281888485 - 6.23185570781e-15i;
    -57.6812281575 + 5.50238874309e-15i;
    39.4247458112 - 3.76084706377e-15i;
    -20.3725141716 + 1.94339642596e-15i;
    7.57598139808 - 7.22696032908e-16i;
    -1.82867068413 + 1.74442488633e-16i;
    0.21872794262 - 2.08651273164e-17i
]) = [0.218728; -1.82867; 7.57598; -20.3725; 39.4247; -57.6812; 65.3282; -57.6812; 39.4247; -20.3725; 7.57598; -1.82867; 0.218728]
1/G_0z = 0.228815
product(1 - z_p[n]*z^-1, n = 0 .. rows(z_0) - 1) coeffs → [
    0.0523558901028 - 7.88860905221e-31i;
    -0.612879633923 - 1.57772181044e-29i;
    3.57666455491 - 1.89326617253e-29i;
    -13.6869497423 + 5.04870979341e-29i;
    38.2155518199 - 7.06819371078e-28i;
    -82.1633889353 + 1.31266454629e-27i;
    140.103104818 - 1.21169035042e-27i;
    -192.39299594 + 2.01948391737e-27i;
    213.838476612 - 1.61558713389e-27i;
    -191.563217128;
    136.296850576 - 2.01948391737e-28i;
    -74.7665506246 - 5.04870979341e-28i;
    29.9060005355 - 1.00974195868e-28i;
    -7.80191194879;
    1
]
Re([
    0.0478511243347;
    -0.495134894758 - 6.31088724177e-30i;
    2.55771912269 + 3.78653234506e-29i;
    -8.62946288062;
    21.088820389 - 2.01948391737e-28i;
    -39.2528091297 + 4.03896783473e-28i;
    57.0237621328 - 4.03896783473e-28i;
    -65.1759661622 + 8.07793566946e-28i;
    58.2753756432 - 4.03896783473e-28i;
    -39.841114489 + 2.01948391737e-28i;
    19.7735707404 - 1.51461293802e-28i;
    -6.37033847001;
    1
]) = [0.0478511; -0.495135; 2.55772; -8.62946; 21.0888; -39.2528; 57.0238; -65.176; 58.2754; -39.8411; 19.7736; -6.37034; 1]
b_rev = [0.228815; -2.23184; 10.8012; -34.1368; 78.4068; -138.101; 192.058; -214.048; 192.058; -138.101; 78.4068; -34.1368; 10.8012; -2.23184; 0.228815]
Re(hh_z2) = [
    0.228815; -0.446643; 0.473583; 0.0230799; -0.156782; 0.10218; 0.231539; 0.087349; -0.0144012; 0.0802028
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]
