# https://ru.dsplib.org/content/filter_butter_ap/filter_butter_ap.html
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f_d := 10  # Гц - частота дискретизации
samples := 100
n := 0 .. samples - 1
dt := 1/f_d = 0.1
df := f_d/samples = 0.1
tt[n] := n*dt
h(t, H) := 1/f_d*integral(H(f)*e^(1i*2*π*f*t), f = -f_d/2 .. f_d/2)
db(x) := 10^(x/20)
db_P(x) := 10^(x/10)
to_db(x) := 20*log(|x|)
to_dbP(x) := 10*log(|x|)
roundup(x) := Trunc(x, 1) + (Trunc(x, 1) ≠ x)
abs(z) := |z|
circle_x[n] := cos(2*π/(samples - 1)*n)
circle_y[n] := sin(2*π/(samples - 1)*n)
Z(p_0, f_d) := (2*f_d + p_0)/(2*f_d - p_0)
PolynomP(p, P) := product(p - P[n], n = 0 .. rows(P) - 1)
PolynomZ(z, Z) := product(1 - Z[n]*z^-1, n = 0 .. rows(Z) - 1)
HP(p, P_0, P_p) := PolynomP(p, P_0)/PolynomP(p, P_p)
HZ(z, Z_0, Z_p) := PolynomZ(z, Z_0)/PolynomZ(z, Z_p)
f_analog(f_digital., f_d) := f_d/π*tan(π*f_digital./f_d)
Ω(T_d, ω) := 2/T_d*tan(ω/2)  # Преобразование частот аналогового фильтра в частоты цифрового
f_pl := 2/(2*π) = 0.31831
f_sl := 4/(2*π) = 0.63662
f_sh := 12/(2*π) = 1.90986
f_ph := 15/(2*π) = 2.38732
f_p0 := sqrt(f_pl*f_ph)
f_s0 := sqrt(f_sl*f_sh)
ω_pl := 2*π*f_pl = 2
ω_sl := 2*π*f_sl = 4
ω_sh := 2*π*f_sh = 12
ω_ph := 2*π*f_ph = 15
ppf(P_p, P_0, f_min, f_max) :=
    count_p ← rows(P_p)
    count_0 ← rows(P_0)
    ω_min ← 2*π*f_min
    ω_max ← 2*π*f_max
    Δω ← (ω_max - ω_min)/2
    ω2_c ← ω_min*ω_max
    p01[2*count_p] ← 0
    for i ∈ 0 .. count_p - 1
        pdw ← P_p[i]*Δω
        [p1[i*2]; p1[i*2 + 1]] ← [pdw + sqrt(pdw^2 - ω2_c); pdw - sqrt(pdw^2 - ω2_c)]
    for i ∈ 0 .. count_0 - 1
        p0dw ← P_0[i]*Δω
        [p01[i*2]; p01[i*2 + 1]] ← [p0dw + sqrt(p0dw^2 - ω2_c); p0dw - sqrt(p0dw^2 - ω2_c)]
    [p1; p01]
ω_c := ω_sl*ω_sh = 48
Δω := ω_sh - ω_sl = 8
Ω(T_d, ω) := 2/T_d*tan(ω/2)  # Преобразование частот аналогового фильтра в частоты цифрового
F_pl := f_analog(f_pl, f_d) = 0.319375
F_sl := f_analog(f_sl, f_d) = 0.645246
F_sh := f_analog(f_sh, f_d) = 2.17768
F_ph := f_analog(f_ph, f_d) = 2.96536
F_pl/f_pl - 1 = 0.334672 %
F_sl/f_sl - 1 = 1.35502 %
F_sh/f_sh - 1 = 14.0228 %
F_ph/f_ph - 1 = 24.2129 %
Ω_pl := 2*π*F_pl = 2.00669
Ω_sl := 2*π*F_sl = 4.0542
Ω_sh := 2*π*F_sh = 13.6827
Ω_ph := 2*π*F_ph = 18.6319
Ω_c := Ω_sl*Ω_sh = 55.4726
ΔΩ := Ω_sh - Ω_sl = 9.62854
Ω_0 :=
    Ω_p ←
        Ω_ph if Ω_c/Ω_ph > Ω_pl
        Ω_pl otherwise
    |ΔΩ*Ω_p/(Ω_c - Ω_p^2)|
    = 0.615059
ω_0 :=
    ω_p ←
        ω_ph if ω_c/ω_ph > ω_pl
        ω_pl otherwise
    |Δω*ω_p/(ω_c - ω_p^2)|
    = 0.677966
f_0 := ω_0/(2*π) = 0.107902
F_0 := Ω_0/(2*π) = 0.0978897
Ω_c/Ω_ph > Ω_pl = 1
Ω_1 := 1
ω_1 := 1
F_1 := Ω_1/(2*π) = 0.159155
f_1 := ω_1/(2*π) = 0.159155
R_p := 1  # Неравномерность в полосе пропускания (дБ)
G_p := (-R_p) db = 0.891251
R_s := 40  # Уровень подавления в полосе заграждения (дБ)
G_s := (-R_s) db = 0.01
Ω_p := Ω_0  # Частота среза аналогового фильтра
Ω_s := Ω_1  # Частота заграждения аналогового фильтра
# Порядок фильтра
ppf(P, f_min, f_max) :=
    N ← rows(P)
    ω_min ← 2*π*f_min
    ω_max ← 2*π*f_max
    Δω ← (ω_max - ω_min)/2
    ω2_c ← ω_min*ω_max
    for i ∈ 0 .. N - 1
        pdw ← P[i]*Δω
        [p_p[i*2]; p_p[i*2 + 1]] ← [pdw + sqrt(pdw^2 - ω2_c); pdw - sqrt(pdw^2 - ω2_c)]
        p_0[i] ← 0
    [(2*Δω)^N; p_0; p_p]
ε_p := sqrt(10^(R_p/10) - 1) = 0.508847
G_p := 1/sqrt(1 + ε_p^2) = 0.891251
ε_s := sqrt(10^(R_s/10) - 1) = 99.995
1/ε_s = 0.0100005
G_s := 1/sqrt(1 + ε_s^2) = 0.01
ε_s/ε_p = 196.513
Ω_s/Ω_p = 1.62586
# Порядок фильтра
ZZ(z) := 2*f_d*(1 - z^-1)/(1 + z^-1)
ppf_poles(P, f_min, f_max) :=
    N ← rows(P)
    ω_min ← 2*π*f_min
    ω_max ← 2*π*f_max
    Δω ← (ω_max - ω_min)/2
    ω2_c ← ω_min*ω_max
    for i ∈ 0 .. N - 1
        pdw ← P[i]*Δω
        [p1[i*2]; p1[i*2 + 1]] ← [pdw + sqrt(pdw^2 - ω2_c); pdw - sqrt(pdw^2 - ω2_c)]
    p1
N := ln(ε_s/ε_p)/ln(Ω_s/Ω_p) = 10.8649
N := ceil(N) = 11
α := ε_p^(-1/N) = 1.06334
poles(N) :=
    r ← mod(N, 2)
    L ← (N - r)/2
    α ← 1/nthroot(ε_p, N)
    P[0] ← -α
    i ← r
    for n ∈ 1 .. L
        θ ← π*(n - 0.5)/N
        P[i] ← α*(-sin(θ) + 1i*cos(θ))
        P[i + 1] ← α*(-sin(θ) - 1i*cos(θ))
        i ← i + 2
    P
p_p := poles(N)
p_p1 := p_p*Ω_s
p_p2 := ppf_poles(p_p, F_sl, F_sh)
M_p := [f_pl, G_s; f_sl, G_s; f_sl, G_p; f_sh, G_p; f_sh, G_s; f_ph, G_s]
[K_ppf; p_03; p_p3] := ppf(p_p, F_sl, F_sh)
z_02 := Z(p_03, f_d)
PP(p) := (p^2 + ω_c)/(p*Δω)
z_p2 := Z(p_p3, f_d)
H_0(p) := 1/ε_p/PolynomP(p, p_p)
p_p = [-1.06334; -0.15133 + 1.05252i; -0.15133 - 1.05252i; -0.441729 + 0.967252i; -0.441729 - 0.967252i; -0.696342 + 0.803622i; -0.696342 - 0.803622i; -0.894542 + 0.574887i; -0.894542 - 0.574887i; -1.02027 + 0.299579i; -1.02027 - 0.299579i]
p_p2 = [
    -5.11922 + 5.40982i;
    -5.11922 - 5.40982i;
    -0.317821 - 3.92099i;
    -1.13926 + 14.0552i;
    -0.317821 + 3.92099i;
    -1.13926 - 14.0552i;
    -0.975119 - 3.94339i;
    -3.27809 + 13.2566i;
    -0.975119 + 3.94339i;
    -3.27809 - 13.2566i;
    -1.70413 - 4i;
    -5.00063 + 11.7377i;
    -1.70413 + 4i;
    -5.00063 - 11.7377i;
    -2.57847 - 4.12961i;
    -6.03466 + 9.66493i;
    -2.57847 + 4.12961i;
    -6.03466 - 9.66493i;
    -3.71212 - 4.46246i;
    -6.1116 + 7.34697i;
    -3.71212 + 4.46246i;
    -6.1116 - 7.34697i
]
z_02 = [1; 1; 1; 1; 1; 1; 1; 1; 1; 1; 1]
z_p2 = [
    0.52182 + 0.327748i;
    0.52182 - 0.327748i;
    0.898028 - 0.366287i;
    0.312146 + 0.87243i;
    0.898028 + 0.366287i;
    0.312146 - 0.87243i;
    0.841918 - 0.346287i;
    0.297539 + 0.738934i;
    0.841918 + 0.346287i;
    0.297539 - 0.738934i;
    0.782427 - 0.328496i;
    0.310984 + 0.615502i;
    0.782427 + 0.328496i;
    0.310984 - 0.615502i;
    0.714253 - 0.313537i;
    0.35032 + 0.501284i;
    0.714253 + 0.313537i;
    0.35032 - 0.501284i;
    0.6292 - 0.306605i;
    0.419507 + 0.399404i;
    0.6292 + 0.306605i;
    0.419507 - 0.399404i
]
H(p) := 1/ε_p*1/PolynomP(p, p_p1)
H_ppf2(p) := H(PP(p))
H_ppf(p) := ΔΩ^N/ε_p*p^N/PolynomP(p, p_p2)  # disabled
H_ppf(p) := K_ppf/ε_p*PolynomP(p, p_03)/PolynomP(p, p_p3)
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z_fp0 := [Z(0 + 1i*2*π*f_p0, f_d); Z(0 - 1i*2*π*f_p0, f_d)]
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Kz0 := ΔΩ^N/ε_p*product(2*f_d/((2*f_d - p_p2[2*n])*(2*f_d - p_p2[2*n + 1])), n = 0 .. N - 1) = 6.89205e-6
f_p0 = 0.871728
HZ(z) := Kz0*(1 - z^-1)^N*(1 + z^-1)^N/product(1 - z_p2[n]*z^-1, n = 0 .. 2*N - 1)
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