# https://ru.dsplib.org/content/filter_butter_ap/filter_butter_ap.html
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Filter(A, B, X) :=
    N ← rows(A)
    S[N - 1] ← 0
    Y[rows(X) - 1] ← 0
    a0 ← 1/A[0]
    for i ∈ 0 .. rows(X) - 1
        x ← X[i]
        y ← 0
        for j ∈ N - 1 .. 1
            [S[j], v] ← [1, 1]*S[j - 1]
            y ← y + v*B[j]*a0
            x ← x - v*A[j]*a0
        S[0] ← x
        Y[i] ← y + x*B[0]*a0
    Y
RR(h) :=
    N ← rows(h) - 1
    rr[N] ← 0
    for i ∈ 1 .. N
        rr[i] ← rr[i - 1] + h[i]
    rr
f_d := 10  # Гц - частота дискретизации
samples := 100
n := 0 .. samples - 1
dt := 1/f_d = 0.1
df := f_d/samples = 0.1
tt[n] := n*dt
h(t, H) := 1/f_d*integral(H(f)*e^(1i*2*π*f*t), f = -f_d/2 .. f_d/2)
db(x) := 10^(x/20)
db_P(x) := 10^(x/10)
to_db(x) := 20*log(|x|)
to_dbP(x) := 10*log(|x|)
roundup(x) := Trunc(x, 1) + (Trunc(x, 1) ≠ x)
abs(z) := |z|
circle_x[n] := cos(2*π/(samples - 1)*n)
circle_y[n] := sin(2*π/(samples - 1)*n)
Z(p_0, f_d) := (2*f_d + p_0)/(2*f_d - p_0)
PolynomP(p, P) := product(p - P[n], n = 0 .. rows(P) - 1)
PolynomZ(z, Z) := product(1 - Z[n]*z^-1, n = 0 .. rows(Z) - 1)
HP(p, P_0, P_p) := PolynomP(p, P_0)/PolynomP(p, P_p)
HZ(z, Z_0, Z_p) := PolynomZ(z, Z_0)/PolynomZ(z, Z_p)
f_analog(f_digital., f_d) := f_d/π*tan(π*f_digital./f_d)
Ω(T_d, ω) := 2/T_d*tan(ω/2)  # Преобразование частот аналогового фильтра в частоты цифрового
f_sl := 2/(2*π) = 0.31831
f_pl := 4/(2*π) = 0.63662
f_ph := 12/(2*π) = 1.90986
f_sh := 15/(2*π) = 2.38732
f_p0 := sqrt(f_pl*f_ph)
f_s0 := sqrt(f_sl*f_sh)
Root2PolynomP(P) :=
    N ← rows(P) + 1
    a[N - 1] ← 0
    [a[0]; a[1]] ← [-P[0]; 1]
    for n ∈ 2 .. N - 1
        a[n] ← 1
        root ← P[n - 1]
        for i ∈ n - 1 .. 1
            a[i] ← a[i - 1] - a[i]*root
        a[0] ← -a[0]*root
    a
Root2PolynomZ(Z) :=
    N ← rows(Z) + 1
    [a[N - 1]; a[N - 2]] ← [-Z[0]; 1]
    for k ∈ 2 .. N - 1
        a[N - 1 - k] ← a[N - 1 - k + 1]
        for i ∈ k - 1 .. 1
            a[N - 1 - i] ← a[N - 1 - (i - 1)] - a[N - 1 - i]*Z[k - 1]
        a[N - 1] ← -a[N - 1]*Z[k - 1]
    a
ω_sl := 2*π*f_sl = 2
ω_pl := 2*π*f_pl = 4
ω_ph := 2*π*f_ph = 12
ω_sh := 2*π*f_sh = 15
ppf(P_p, P_0, f_min, f_max) :=
    count_p ← rows(P_p)
    count_0 ← rows(P_0)
    ω_min ← 2*π*f_min
    ω_max ← 2*π*f_max
    Δω ← (ω_max - ω_min)/2
    ω2_c ← ω_min*ω_max
    p01[2*count_p] ← 0
    for i ∈ 0 .. count_p - 1
        pdw ← P_p[i]*Δω
        [p1[i*2]; p1[i*2 + 1]] ← [pdw + sqrt(pdw^2 - ω2_c); pdw - sqrt(pdw^2 - ω2_c)]
    for i ∈ 0 .. count_0 - 1
        p0dw ← P_0[i]*Δω
        [p01[i*2]; p01[i*2 + 1]] ← [p0dw + sqrt(p0dw^2 - ω2_c); p0dw - sqrt(p0dw^2 - ω2_c)]
    [p1; p01]
ω_c := ω_pl*ω_ph = 48
Δω := ω_ph - ω_pl = 8
Ω(T_d, ω) := 2/T_d*tan(ω/2)  # Преобразование частот аналогового фильтра в частоты цифрового
F_sl := f_analog(f_sl, f_d) = 0.319375
F_pl := f_analog(f_pl, f_d) = 0.645246
F_ph := f_analog(f_ph, f_d) = 2.17768
F_sh := f_analog(f_sh, f_d) = 2.96536
F_pl/f_pl - 1 = 1.35502 %
F_sl/f_sl - 1 = 0.334672 %
F_sh/f_sh - 1 = 24.2129 %
F_ph/f_ph - 1 = 14.0228 %
Ω_sl := 2*π*F_sl = 2.00669
Ω_pl := 2*π*F_pl = 4.0542
Ω_ph := 2*π*F_ph = 13.6827
Ω_sh := 2*π*F_sh = 18.6319
Ω_c := Ω_pl*Ω_ph = 55.4726
ΔΩ := Ω_ph - Ω_pl = 9.62854
Ω_p := 1
F_p := Ω_p/(2*π) = 0.159155  # Частота среза аналогового фильтра
Ω_s :=
    Ω_s ←
        Ω_sh if Ω_c/Ω_sh > Ω_sl
        Ω_sl otherwise
    |(Ω_c - Ω_s^2)/(ΔΩ*Ω_s)|
    = 1.62586
F_s := Ω_s/(2*π) = 0.258764  # Частота заграждения аналогового фильтра
R_p := 1  # Неравномерность в полосе пропускания (дБ)
G_p := (-R_p) db = 0.891251
R_s := 40  # Уровень подавления в полосе заграждения (дБ)
G_s := (-R_s) db = 0.01
# Порядок фильтра
ppf(P, f_min, f_max) :=
    N ← rows(P)
    ω_min ← 2*π*f_min
    ω_max ← 2*π*f_max
    Δω ← (ω_max - ω_min)/2
    ω2_c ← ω_min*ω_max
    for i ∈ 0 .. N - 1
        pdw ← P[i]*Δω
        [p_p[i*2]; p_p[i*2 + 1]] ← [pdw + sqrt(pdw^2 - ω2_c); pdw - sqrt(pdw^2 - ω2_c)]
        p_0[i] ← 0
    [(2*Δω)^N; p_0; p_p]
ε_p := sqrt(10^(R_p/10) - 1) = 0.508847
G_p := 1/sqrt(1 + ε_p^2) = 0.891251
ε_s := sqrt(10^(R_s/10) - 1) = 99.995
1/ε_s = 0.0100005
G_s := 1/sqrt(1 + ε_s^2) = 0.01
k_ε := ε_s/ε_p = 196.513
k_Ω := Ω_s/Ω_p = 1.62586
ppf_poles(P, f_min, f_max) :=
    N ← rows(P)
    ω_min ← 2*π*f_min
    ω_max ← 2*π*f_max
    Δω ← (ω_max - ω_min)/2
    ω2_c ← ω_min*ω_max
    for i ∈ 0 .. N - 1
        pdw ← P[i]*Δω
        [p1[i*2]; p1[i*2 + 1]] ← [pdw + sqrt(pdw^2 - ω2_c); pdw - sqrt(pdw^2 - ω2_c)]
    p1
# Порядок фильтра
ZZ(z) := 2*f_d*(1 - z^-1)/(1 + z^-1)
N := ln(k_ε)/ln(k_Ω) = 10.8649
N := ceil(N) = 11
α := ε_p^(-1/N) = 1.06334
poles(N) :=
    r ← mod(N, 2)
    L ← (N - r)/2
    α ← 1/nthroot(ε_p, N)
    P[0] ← -α
    i ← r
    for n ∈ 1 .. L
        θ ← π*(n - 0.5)/N
        P[i] ← α*(-sin(θ) + 1i*cos(θ))
        P[i + 1] ← α*(-sin(θ) - 1i*cos(θ))
        i ← i + 2
    P
p_p := poles(N)
p_p2 := ppf_poles(p_p, F_pl, F_ph)
M_p := [f_sl, G_s; f_pl, G_s; f_pl, G_p; f_ph, G_p; f_ph, G_s; f_sh, G_s]
[K_ppf; p_03; p_p3] := ppf(p_p, F_pl, F_ph)
z_0 := Z(p_03, f_d)
PP(p) := (p^2 + ω_c)/(p*Δω)
z_p := Z(p_p3, f_d)
H_0(p) := 1/ε_p/PolynomP(p, p_p)
z_p = [
    0.52182 + 0.327748i;
    0.52182 - 0.327748i;
    0.898028 - 0.366287i;
    0.312146 + 0.87243i;
    0.898028 + 0.366287i;
    0.312146 - 0.87243i;
    0.841918 - 0.346287i;
    0.297539 + 0.738934i;
    0.841918 + 0.346287i;
    0.297539 - 0.738934i;
    0.782427 - 0.328496i;
    0.310984 + 0.615502i;
    0.782427 + 0.328496i;
    0.310984 - 0.615502i;
    0.714253 - 0.313537i;
    0.35032 + 0.501284i;
    0.714253 + 0.313537i;
    0.35032 - 0.501284i;
    0.6292 - 0.306605i;
    0.419507 + 0.399404i;
    0.6292 + 0.306605i;
    0.419507 - 0.399404i
]
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p_p = [-1.06334; -0.15133 + 1.05252i; -0.15133 - 1.05252i; -0.441729 + 0.967252i; -0.441729 - 0.967252i; -0.696342 + 0.803622i; -0.696342 - 0.803622i; -0.894542 + 0.574887i; -0.894542 - 0.574887i; -1.02027 + 0.299579i; -1.02027 - 0.299579i]
p_p2 = [
    -5.11922 + 5.40982i;
    -5.11922 - 5.40982i;
    -0.317821 - 3.92099i;
    -1.13926 + 14.0552i;
    -0.317821 + 3.92099i;
    -1.13926 - 14.0552i;
    -0.975119 - 3.94339i;
    -3.27809 + 13.2566i;
    -0.975119 + 3.94339i;
    -3.27809 - 13.2566i;
    -1.70413 - 4i;
    -5.00063 + 11.7377i;
    -1.70413 + 4i;
    -5.00063 - 11.7377i;
    -2.57847 - 4.12961i;
    -6.03466 + 9.66493i;
    -2.57847 + 4.12961i;
    -6.03466 - 9.66493i;
    -3.71212 - 4.46246i;
    -6.1116 + 7.34697i;
    -3.71212 + 4.46246i;
    -6.1116 - 7.34697i
]
z_0 = [1; 1; 1; 1; 1; 1; 1; 1; 1; 1; 1]
H_ppf(p) := ΔΩ^N/ε_p*p^N/PolynomP(p, p_p2)  # disabled
H_ppf(p) := K_ppf/ε_p*PolynomP(p, p_03)/PolynomP(p, p_p3)
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z_fp0 := [Z(0 + 1i*2*π*f_p0, f_d); Z(0 - 1i*2*π*f_p0, f_d)]
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Kz0 := 1/ε_p*product(2*f_d*ΔΩ/((2*f_d - p_p2[2*n])*(2*f_d - p_p2[2*n + 1])), n = 0 .. N - 1) = 6.89205e-6
HZ(z) := Kz0*(1 - z^-1)^N*(1 + z^-1)^N/product(1 - z_p[n]*z^-1, n = 0 .. 2*N - 1)
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|H_ppf(ZZ(e^(1i*2*π*f_sl/f_d)))| = 4.12119e-5
G_s = 0.01
20*log(|H_ppf(ZZ(e^(1i*2*π*f_sl/f_d)))|) = -87.6995
-R_s = -40
|H_ppf(ZZ(e^(1i*2*π*f_pl/f_d)))| = 0.891251
G_p = 0.891251
20*log(|H_ppf(ZZ(e^(1i*2*π*f_pl/f_d)))|) = -1
-R_p = -1
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|H_ppf(ZZ(e^(1i*2*π*f_ph/f_d)))| = 0.891251
G_p = 0.891251
20*log(|H_ppf(ZZ(e^(1i*2*π*f_ph/f_d)))|) = -1
-R_p = -1
|H_ppf(ZZ(e^(1i*2*π*f_sh/f_d)))| = 0.00936442
G_s = 0.01
20*log(|H_ppf(ZZ(e^(1i*2*π*f_sh/f_d)))|) = -40.5704
-R_s = -40
B := Root2PolynomZ(z_0)
rows(B) = 12
A := Root2PolynomZ(z_p)
hh_z2 := vectorize(h(tt, H(f) ← HZ(e^(1i*2*π*f/f_d))))
ImError := sum(Im(hh_z2)^2)/samples = 3.28381e-15
_ := WRITECSV(Re(hh_z2), "Butterwort.BandPass.Impulse.csv")
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rows(A) = 23
ff := 0, f_sh*1.1/100 .. f_sh*1.1
Φ(f) := integral(d/df1(arg(HZ(e^(1i*2*π*f1/f_d)))/π), f1 = 0 .. f)
z_0 := stack(z_0, -z_0)
GroupDelay_0(f) := -1/(2*π)*d/df(arg(H_ppf(1i*2*π*f)))
GroupDelay(f) := -1/(2*π)*d/df(arg(HZ(e^(1i*2*π*f/f_d))))
ΔΦ(f) := mod(-arg(HZ(e^(1i*2*π*f/f_d))) + 2*π, 2*π)/(2*π*f)
f_c := sqrt(f_pl*f_ph)
f_0 := f_pl + (f_sl - f_pl)*0.1
Δτ_pl := GroupDelay_0(f_pl) = 5.98944
Δτ_pl0 := GroupDelay_0(f_pl) = 5.98944
Δφ_pl := ΔΦ(f_pl) = 1.18567
f_0 := f_sl + (0.5*f_d - f_sl)*0.2  # disabled
Δφ_sl := ΔΦ(f_sl) = 2.21575
Δτ_sl := GroupDelay_0(f_sl) = 1.71252
f_0 := f_sl*0.7
Δφ_0 := ΔΦ(0)  # disabled
Δτ_0 := GroupDelay_0(0.0001*f_sl) = 1.2969
samples := 2*round((Δτ_0 + 3/f_pl)/dt) = 120
n := 0 .. samples - 1
B := Kz0*Re(Root2PolynomZ(z_0))
[BA[:, 0]; BA[:, 1]] := [Kz0*Re(Root2PolynomZ(z_0)); Re(Root2PolynomZ(z_p))]
kk := 1
tt[n] := n*dt
A := Re(Root2PolynomZ(z_p))
s(t) := sin(2*π*f_0*t)
ss := s(tt)
hh_z := vectorize(h(tt, H(f) ← HZ(e^(1i*2*π*f/f_d))))
yy := Filter(A, B, ss)
transpose(BA) = [
    6.89205e-6, 0, -7.58126e-5, 0, 0.000379063, 0, -0.00113719, 0, 0.00227438, 0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;
    1, -12.1563, 72.759, -285.191, 821.342, -1848.21, 3373.17, -5116.07, 6554.19, -7170.06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]
Δτ_s := GroupDelay_0(f_0)
Δφ_s := ΔΦ(f_0) = 2.48015
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Δτ_s := GroupDelay_0(f_0)
Δφ_s := ΔΦ(f_0) = 2.48015
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xx :=
    x[samples - 1] ← 0
    x[0] ← 1
    x
h_z2 := Filter(A, B, xx)
r_z2 := RR(h_z2)
rr_z := RR(hh_z)
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s_l(t) := sin(2*π*0.4*f_pl*t)
s_p(t) := sin(2*π*f_pl*t)
s_ps(t) := sin(2*π*(f_pl + f_sl)/2*t)
s_s(t) := sin(2*π*f_sl*t)
s_h(t) := sin(2*π*(0.5*f_d + f_sh)/2*t)
s_c(t) := s_l(t) + s_p(t) + s_ps(t) + s_s(t) + s_h(t)
ss_c := s_c(tt)
yy_c := Filter(A, B, ss_c)
s_c0(t) := s_l(t) + s_p(t)
ss_c0 := s_c0(tt)
yy_c0 := Filter(A, B, ss_c0)
sum(vectorize((yy_c - yy_c0)^2))/rows(tt) = 0.00786378
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ss_l := s_l(tt)
ss_h := s_h(tt)
ss_p := s_p(tt)
ss_s := s_s(tt)
yy_l := Filter(A, B, ss_l)
ff := 0, f_sh*1.2/100 .. f_sh*1.2
yy_h := Filter(A, B, ss_h)
Φ(f) := integral(-|d/df1(arg(HZ(e^(1i*2*π*f1/f_d)))/(2*π))|, f1 = 0 .. f)
yy_p := Filter(A, B, ss_p)
yy_s := Filter(A, B, ss_s)
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