# Рассчёт фильтра Чебышева I-рода
# https://ru.dsplib.org/content/filter_cheby1_ap/filter_cheby1_ap.html
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Integral(f, x1, x2, dx) :=
    x ← x1
    y ← f(x)
    while x ≤ x2
        x ← x + dx
        S ← S + y + (y ← f(x))
    S*0.5*dx
f_d := 10  # Гц - частота дискретизации
samples := 100
n := 0 .. samples - 1
dt := 1/f_d = 0.1
df := f_d/samples = 0.1
tt[n] := n*dt
h(t, H) := 1/f_d*integral(H(f)*e^(1i*2*π*f*t), f = -f_d/2 .. f_d/2)
h2(t, H) := 1/f_d*Integral(y(f) ← H(f)*e^(1i*2*π*f*t), -f_d/2, f_d/2, f_d/2001)
db(x) := 10^(x/20)
db_P(x) := 10^(x/10)
to_db(x) := 20*log(|x|)
to_dbP(x) := 10*log(|x|)
roundup(x) := Trunc(x, 1) + (Trunc(x, 1) ≠ x)
abs(z) := |z|
circle_x[n] := cos(2*π/(samples - 1)*n)
circle_y[n] := sin(2*π/(samples - 1)*n)
Ki(k) :=
    k_0 ← k/(1 + sqrt(1 - k*k))
    k_0*k_0
K(k) :=
    ki ← Ki(k)
    (1 + ki)*K(ki) if k - ki > 0
    π/2 otherwise
T(k) := K(sqrt(1 - k*k))
sn(u, k) :=
    ki ← Ki(k)
    sin(u*π/2) if k - ki ≤ 0
    otherwise
        w ← sn(u, ki)
        (1 + ki)/(1/w + ki*w)
cd(u, k) :=
    ki ← Ki(k)
    cos(u*π/2) if k - ki ≤ 0
    otherwise
        w ← cd(u, ki)
        (1 + ki)/(1/w + ki*w)
sn_inv(sn, k) :=
    ki ← Ki(k)
    sn_inv(2*sn/((1 + ki)*(1 + sqrt(1 - k*k*sn*sn))), ki) if k - ki > 0
    2*asin(sn)/π
cd_inv(cn, k) :=
    ki ← Ki(k)
    cd_inv(2*cn/((1 + ki)*(1 + sqrt(1 - k*k*cn*cn))), ki) if k - ki > 0
    2*acos(cn)/π
K(0.66667) = 1.80967
T(0.66667) = 1.90424
K(0.0028615) = 1.5708
T(0.0028615) = 7.24272
Z(p_0, f_d) := (2*f_d + p_0)/(2*f_d - p_0)
z2p(z_0, f_d) := 2*f_d*(1 - z_0^-1)/(1 + z_0^-1)
PolynomP(p, P) := product(p - P[n], n = 0 .. rows(P) - 1)
PolynomZ(z, Z) := product(1 - Z[n]*z^-1, n = 0 .. rows(Z) - 1)
C(N, ω) := cos(N*acos(ω))
sh(x) := sinh(x)
ch(x) := cosh(x)
arsh(x) := asinh(x)
arch(x) := acosh(x)
conj(z) := [z; Re(z) - 1i*Im(z)]
Ω(T_d, ω) := 2/T_d*tan(ω/2)  # Преобразование частот аналогового фильтра в частоты цифрового
f_analog(f_digital., f_d) := f_d/π*tan(π*f_digital./f_d)
f_digit(f_analog, f_d) := f_d/π*atan(π*f_analog/f_d)
f_sl := 2/(2*π) = 0.31831
f_pl := 4/(2*π) = 0.63662
f_ph := 12.5/(2*π) = 1.98944
f_sh := 15/(2*π) = 2.38732
f_p0 := sqrt(f_pl*f_ph)
f_s0 := sqrt(f_sl*f_sh)
Root2PolynomP(P) :=
    N ← rows(P) + 1
    a[N - 1] ← 0
    [a[0]; a[1]] ← [-P[0]; 1]
    for n ∈ 2 .. N - 1
        a[n] ← 1
        root ← P[n - 1]
        for i ∈ n - 1 .. 1
            a[i] ← a[i - 1] - a[i]*root
        a[0] ← -a[0]*root
    a
ω_sl := 2*π*f_sl = 2
ω_pl := 2*π*f_pl = 4
ω_ph := 2*π*f_ph = 12.5
ω_sh := 2*π*f_sh = 15
Root2PolynomZ(Z) :=
    N ← rows(Z) + 1
    [a[N - 1]; a[N - 2]] ← [-Z[0]; 1]
    for k ∈ 2 .. N - 1
        a[N - 1 - k] ← a[N - 1 - k + 1]
        for i ∈ k - 1 .. 1
            a[N - 1 - i] ← a[N - 1 - (i - 1)] - a[N - 1 - i]*Z[k - 1]
        a[N - 1] ← -a[N - 1]*Z[k - 1]
    a
Ω(T_d, ω) := 2/T_d*tan(ω/2)  # Преобразование частот аналогового фильтра в частоты цифрового
F_sl := f_analog(f_sl, f_d) = 0.319375
F_pl := f_analog(f_pl, f_d) = 0.645246
F_ph := f_analog(f_ph, f_d) = 2.29656
F_sh := f_analog(f_sh, f_d) = 2.96536
F_p0 := sqrt(F_pl*F_ph)
F_s0 := sqrt(F_sl*F_sh)
Ω_sl := 2*π*F_sl = 2.00669
Ω_pl := 2*π*F_pl = 4.0542
Ω_ph := 2*π*F_ph = 14.4297
Ω_sh := 2*π*F_sh = 18.6319
ff_p0 := f_digit(F_p0, f_d)  # центральная частота цифрового фильтра
Ω_c := Ω_pl*Ω_ph = 58.5009
ΔΩ := Ω_ph - Ω_pl = 10.3755
F_p0 = 1.21731
ff_p0 = 1.16268
Ω_p := 1
F_p := Ω_p/(2*π) = 0.159155  # Частота среза аналогового фильтра
Ω_s :=
    Ω_s ←
        Ω_sh if Ω_c/Ω_sh > Ω_sl
        Ω_sl otherwise
    |(Ω_c - Ω_s^2)/(ΔΩ*Ω_s)|
    = 1.49315
F_s := Ω_s/(2*π) = 0.237641  # Частота заграждения аналогового фильтра
R_p := 1  # Неравномерность в полосе пропускания (дБ)
G_p := (-R_p) db = 0.891251
R_s := 40  # Уровень подавления в полосе заграждения (дБ)
G_s := (-R_s) db = 0.01
# Порядок фильтра
ε_p := sqrt(10^(R_p/10) - 1) = 0.508847
ε_s := sqrt(10^(R_s/10) - 1) = 99.995
1/ε_s = 0.0100005
G_p := 1/sqrt(1 + ε_p^2) = 0.891251
ε_s/ε_p = 196.513
Ω_s/Ω_p = 1.49315
k_ω := Ω_s/Ω_p = 1.49315
k_ε := ε_s/ε_p = 196.513
arcos(z) := ln(z + sqrt(z^2 - 1))
# Порядок фильтра
N := arch(k_ε)/arch(k_ω) = 6.24707
N := ceil(N) = 7
# Число парных полюсов | Наличие/отсутсвтие центрального полюса
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L := Trunc(N/2, 1) = 3
r := mod(N, 2) = 1
2*L + r = 7
β := 1/N*arsh(1/ε_p) = 0.203996
G_p := 1/sqrt(1 + ε_p^2) = 0.891251
θ(n) := (2*n - 1)/(2*N)*π
θ(n) := π/N*(n - 1/2)
poles(r, L) :=
    P[0] ← -sh(β) if r ≠ 0
    for n ∈ 1 .. L
        θ ← π*(n - 0.5)/N
        [P[2*(n - 1) + r + 0]; P[2*(n - 1) + r + 1]] ← conj(1i*cos(θ - 1i*β))
    P
p_p := poles(r, L)
G_0 := 1/product(-p_p[i], i = 0 .. N - 1)
G_0 = 32.5662
H_0(p) := G_p^(1 - r)/G_0*1/product(p - p_p[i], i = 0 .. N - 1)
H_0(0) = 1
p_p = [-0.205414; -0.045709 + 0.995284i; -0.045709 - 0.995284i; -0.128074 + 0.798156i; -0.128074 - 0.798156i; -0.185072 + 0.442943i; -0.185072 - 0.442943i]
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ZZ(z) := 2*f_d*(1 - z^-1)/(1 + z^-1)
M_p := [f_sl, G_s; f_pl, G_s; f_pl, G_p; f_ph, G_p; f_ph, G_s; f_sh, G_s]
PP(p) := (p^2 + Ω_c)/(p*ΔΩ)
ppf_poles(P, f_min, f_max) :=
    N ← rows(P)
    ω_min ← 2*π*f_min
    ω_max ← 2*π*f_max
    Δω ← (ω_max - ω_min)/2
    ω2_c ← ω_min*ω_max
    for i ∈ 0 .. N - 1
        pdw ← P[i]*Δω
        [p1[i*2]; p1[i*2 + 1]] ← [pdw + sqrt(pdw^2 - ω2_c); pdw - sqrt(pdw^2 - ω2_c)]
    p1
ppf(P, f_min, f_max) :=
    N ← rows(P)
    ω_min ← 2*π*f_min
    ω_max ← 2*π*f_max
    Δω ← (ω_max - ω_min)/2
    ω2_c ← ω_min*ω_max
    for i ∈ 0 .. N - 1
        pdw ← P[i]*Δω
        [p_p[i*2]; p_p[i*2 + 1]] ← [pdw + sqrt(pdw^2 - ω2_c); pdw - sqrt(pdw^2 - ω2_c)]
        p_0[i] ← 0
    [p_0; p_p]
[p_03; p_p3] := ppf(p_p, F_pl, F_ph)
z_0 := Z(p_03, f_d)
p_p3 = [-1.06564 + 7.57399i; -1.06564 - 7.57399i; -0.104422 - 4.06286i; -0.369831 + 14.3894i; -0.104422 + 4.06286i; -0.369831 - 14.3894i; -0.347389 - 4.5372i; -0.981439 + 12.8185i; -0.347389 + 4.5372i; -0.981439 - 12.8185i; -0.68201 - 5.63539i; -1.2382 + 10.2311i; -0.68201 + 5.63539i; -1.2382 - 10.2311i]
z_p := Z(p_p3, f_d)
z_p = [0.681463 + 0.604557i; 0.681463 - 0.604557i; 0.911545 - 0.3863i; 0.309988 + 0.925386i; 0.911545 + 0.3863i; 0.309988 - 0.925386i; 0.872736 - 0.417596i; 0.388273 + 0.848155i; 0.872736 + 0.417596i; 0.388273 - 0.848155i; 0.80038 - 0.490563i; 0.52865 + 0.736401i; 0.80038 + 0.490563i; 0.52865 - 0.736401i]
p_p = [-0.205414; -0.045709 + 0.995284i; -0.045709 - 0.995284i; -0.128074 + 0.798156i; -0.128074 - 0.798156i; -0.185072 + 0.442943i; -0.185072 - 0.442943i]
K_p0 :=
    p0 ← 1i*2*π*F_p0
    product(p0 - p_03[n], n = 0 .. rows(p_03) - 1)/product(p0 - p_p3[n], n = 0 .. rows(p_p3) - 1)
    = 2.51598e-6
H_0(p) := 1/ε_p*1/PolynomP(p, p_p)  # disabled
H_ppf(p) := G_p^(1 - r)/K_p0*PolynomP(p, p_03)/PolynomP(p, p_p3)
z_fp0 := [Z(0 + 1i*2*π*f_p0, f_d); Z(0 - 1i*2*π*f_p0, f_d)]
K_z0 :=
    z0 ← exp(1i*2*π*ff_p0*dt)
    |(z0^2 - 1)^N/product(z0 - z_p[n], n = 0 .. rows(z_p) - 1)|
    = 17292.7
HZ(z) := G_p^(1 - r)/K_z0*(1 - z^-1)^N*(1 + z^-1)^N/product(1 - z_p[n]*z^-1, n = 0 .. 2*N - 1)
G_p^(1 - r)/K_z0 = 5.78279e-5
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20*log(|H_ppf(ZZ(e^(1i*2*π*0.318309886184/f_d)))|) = -86.3803
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B := Root2PolynomZ(z_0)
A := Root2PolynomZ(z_p)
hh_z2 := vectorize(h(tt, H(f) ← HZ(e^(1i*2*π*f/f_d))))
ImError := sum(Im(hh_z2)^2)/samples = 9.0768e-14
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B = [1; -7; 21; -35; 35; -21; 7; -1]
Re(A) = [1; -8.98607; 40.1986; -117.889; 252.302; -415.814; 543.336; -571.276; 485.502; -331.969; 179.939; -75.1026; 22.8819; -4.57569; 0.456951]
Re(hh_z2) = [
    5.78279e-5; 0.000519646; 0.00194018; 0.00336285; 0.000111464; -0.0125157; -0.0273813; -0.0208023; 0.0251263; 0.0862558
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]
_ := WRITECSV(Re(hh_z2), "ChebishevI.BandPass.Impulse.csv")
