# Рассчёт фильтра Чебышева II-рода
# https://ru.dsplib.org/content/filter_cheby2_ap/filter_cheby2_ap.html
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f_d := 10  # Гц - частота дискретизации
samples := 100
n := 0 .. samples - 1
dt := 1/f_d = 0.1
tt[n] := n*dt
h(t, H) := 1/f_d*integral(H(f)*e^(1i*2*π*f*t), f = -f_d/2 .. f_d/2)
df := f_d/samples = 0.1
db(x) := 10^(x/20)
db_P(x) := 10^(x/10)
to_db(x) := 20*log(|x|)
to_dbP(x) := 10*log(|x|)
roundup(x) := Trunc(x, 1) + (Trunc(x, 1) ≠ x)
abs(z) := |z|
circle_x[n] := cos(2*π/(samples - 1)*n)
circle_y[n] := sin(2*π/(samples - 1)*n)
Ki(k) :=
    k_0 ← k/(1 + sqrt(1 - k*k))
    k_0*k_0
K(k) :=
    ki ← Ki(k)
    (1 + ki)*K(ki) if k - ki > 0
    π/2 otherwise
T(k) := K(sqrt(1 - k*k))
sn(u, k) :=
    ki ← Ki(k)
    sin(u*π/2) if k - ki ≤ 0
    otherwise
        w ← sn(u, ki)
        (1 + ki)/(1/w + ki*w)
cd(u, k) :=
    ki ← Ki(k)
    cos(u*π/2) if k - ki ≤ 0
    otherwise
        w ← cd(u, ki)
        (1 + ki)/(1/w + ki*w)
sn_inv(sn, k) :=
    ki ← Ki(k)
    sn_inv(2*sn/((1 + ki)*(1 + sqrt(1 - k*k*sn*sn))), ki) if k - ki > 0
    2*asin(sn)/π
cd_inv(cn, k) :=
    ki ← Ki(k)
    cd_inv(2*cn/((1 + ki)*(1 + sqrt(1 - k*k*cn*cn))), ki) if k - ki > 0
    2*acos(cn)/π
K(0.66667) = 1.80967
T(0.66667) = 1.90424
K(0.0028615) = 1.5708
T(0.0028615) = 7.24272
Z(p_0, f_d) := (2*f_d + p_0)/(2*f_d - p_0)
z2p(z_0, f_d) := 2*f_d*(1 - z_0^-1)/(1 + z_0^-1)
cd(0.6, 0.93) = 0.761809
sn(0.6, 0.93) = 0.917919
# 0.917918 | 0.761809423
C(N, ω) := cos(N*acos(ω))
sh(x) := sinh(x)
ch(x) := cosh(x)
arsh(x) := asinh(x)
arch(x) := acosh(x)
f_analog(f_digital., f_d) := f_d/π*tan(π*f_digital./f_d)
conj(z) := Re(z) - 1i*Im(z)
PolynomP(p, P) := product(p - P[n], n = 0 .. rows(P) - 1)
PolynomZ(z, Z) := product(1 - Z[n]*z^-1, n = 0 .. rows(Z) - 1)
f_digit(f_analog, f_d) := f_d/π*atan(π*f_analog/f_d)
HP(p, P_0, P_p) := PolynomP(p, P_0)/PolynomP(p, P_p)
HZ(z, Z_0, Z_p) := PolynomZ(z, Z_0)/PolynomZ(z, Z_p)
f_sl := 2/(2*π) = 0.31831
f_pl := 4/(2*π) = 0.63662
f_ph := 12.5/(2*π) = 1.98944
f_sh := 15/(2*π) = 2.38732
f_p0 := sqrt(f_pl*f_ph)
f_s0 := sqrt(f_sl*f_sh)
ω_sl := 2*π*f_sl = 2
ω_pl := 2*π*f_pl = 4
ω_ph := 2*π*f_ph = 12.5
ω_sh := 2*π*f_sh = 15
Root2PolynomP(P) :=
    N ← rows(P) + 1
    a[N - 1] ← 0
    [a[0]; a[1]] ← [-P[0]; 1]
    for n ∈ 2 .. N - 1
        a[n] ← 1
        root ← P[n - 1]
        for i ∈ n - 1 .. 1
            a[i] ← a[i - 1] - a[i]*root
        a[0] ← -a[0]*root
    a
Root2PolynomZ(Z) :=
    N ← rows(Z) + 1
    [a[N - 1]; a[N - 2]] ← [-Z[0]; 1]
    for k ∈ 2 .. N - 1
        a[N - 1 - k] ← a[N - 1 - k + 1]
        for i ∈ k - 1 .. 1
            a[N - 1 - i] ← a[N - 1 - (i - 1)] - a[N - 1 - i]*Z[k - 1]
        a[N - 1] ← -a[N - 1]*Z[k - 1]
    a
ω_c := ω_pl*ω_ph = 50
Δω := ω_ph - ω_pl = 8.5
Ω(T_d, ω) := 2/T_d*tan(ω/2)  # Преобразование частот аналогового фильтра в частоты цифрового
F_sl := f_analog(f_sl, f_d) = 0.319375
F_pl := f_analog(f_pl, f_d) = 0.645246
F_ph := f_analog(f_ph, f_d) = 2.29656
F_sh := f_analog(f_sh, f_d) = 2.96536
F_pl/f_pl - 1 = 1.35502 %
F_sl/f_sl - 1 = 0.334672 %
F_sh/f_sh - 1 = 24.2129 %
F_ph/f_ph - 1 = 15.4375 %
F_p0 := sqrt(F_pl*F_ph)
F_s0 := sqrt(F_sl*F_sh)
Ω_sl := 2*π*F_sl = 2.00669
Ω_pl := 2*π*F_pl = 4.0542
Ω_ph := 2*π*F_ph = 14.4297
Ω_sh := 2*π*F_sh = 18.6319
ff_p0 := f_digit(F_p0, f_d)  # центральная частота цифрового фильтра
Ω_c := Ω_pl*Ω_ph = 58.5009
ΔΩ := Ω_ph - Ω_pl = 10.3755
F_p0 = 1.21731
Ω_p := 1
F_p := Ω_p/(2*π) = 0.159155  # Частота среза аналогового фильтра
ff_p0 = 1.16268
Ω_s :=
    Ω_s ←
        Ω_sh if Ω_c/Ω_sh > Ω_sl
        Ω_sl otherwise
    |(Ω_c - Ω_s^2)/(ΔΩ*Ω_s)|
    = 1.49315
F_s := Ω_s/(2*π) = 0.237641  # Частота заграждения аналогового фильтра
R_p := 1  # Неравномерность в полосе пропускания (дБ)
G_p := (-R_p) db = 0.891251
R_s := 40  # Уровень подавления в полосе заграждения (дБ)
G_s := (-R_s) db = 0.01
# Порядок фильтра
ε_p := sqrt(10^(R_p/10) - 1) = 0.508847
ε_s := sqrt(10^(R_s/10) - 1) = 99.995
1/ε_s = 0.0100005
G_p := 1/sqrt(1 + ε_p^2) = 0.891251
ε_s/ε_p = 196.513
Ω_s/Ω_p = 1.49315
k_ω := Ω_p/Ω_s = 0.669727
k_ε := ε_p/ε_s = 0.00508873
# Порядок фильтра
N := arch(ε_s/ε_p)/arch(Ω_s/Ω_p) = 6.24707
N := ceil(N) = 7
Ω_s/Ω_p = 1.49315
θ1 := π*(1 - 0.5)/N
# Число парных полюсов | Наличие/отсутсвтие центрального полюса
L := Trunc(N/2, 1) = 3
r := mod(N, 2) = 1
2*L + r = 7
1/product(|cos(π*(n - 0.5)/N + 1i*β)|^2, n = 1 .. L) =  # error: Эта переменная не определена.
G_s := 1/sqrt(1 + ε_s^2) = 0.01
G_p := 1/sqrt(1 + ε_p^2) = 0.891251
β := 1/N*arsh(ε_s) = 0.756899
cos(θ1 + 1i*β) = 1.26778 - 0.184975i
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θ(n) := (2*n - 1)/(2*N)*π  # disabled
θ(n) := π*(n - 0.5)/N
conj(z) := Re(z) - 1i*Im(z)
poles(r, L) :=
    i ← 0
    if r ≠ 0
        P[i] ← -1/sh(β)
        i ← 1
    for n ∈ 1 .. L
        θ ← π*(n - 0.5)/N
        P[i] ← 1i/cos(θ + 1i*β)
        P[i + 1] ← conj(P[i])
        i ← i + 2
    P
zeros(L) :=
    for n ∈ 1 .. L
        θ ← π*(n - 0.5)/N
        [P[2*n - 2]; P[2*n - 1]] ← [1i/cos(θ); -1i/cos(θ)]
    P
# Произведение нулей в нуле
(1/product(cos(π*(n - 0.5)/N), n = 1 .. L))^2 = 9.14286
p_p := poles(r, L) = [-1.20298; -0.112687 + 0.772337i; -0.112687 - 0.772337i; -0.397988 + 0.780703i; -0.397988 - 0.780703i; -0.85179 + 0.641694i; -0.85179 - 0.641694i]
p_0 := zeros(L) = [1.02572i; -1.02572i; 1.27905i; -1.27905i; 2.30476i; -2.30476i]
G_0 := product(-p_0[i], i = 0 .. rows(p_0) - 1)/product(-p_p[i], i = 0 .. rows(p_p) - 1)
H_0(p) := 1/G_0*product(p - p_0[i], i = 0 .. rows(p_0) - 1)/product(p - p_p[i], i = 0 .. rows(p_p) - 1)
product(0 - p_p[i], i = 0 .. rows(p_p) - 1) = 0.640032
vectorize(|p_p|) = [1.20298; 0.780514; 0.780514; 0.876294; 0.876294; 1.06645; 1.06645]
G_0 = 14.285
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ω_h := ch(1/N*1/ch(1/ε_p)) = 1.00077
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(0 - p_0[0])*(0 - p_0[1]) = 1.0521
ppf_poles(P, f_min, f_max) :=
    N ← rows(P)
    ω_min ← 2*π*f_min
    ω_max ← 2*π*f_max
    Δω ← (ω_max - ω_min)/2
    ω2_c ← ω_min*ω_max
    for i ∈ 0 .. N - 1
        pdw ← P[i]*Δω
        [p[i*2]; p[i*2 + 1]] ← [pdw + sqrt(pdw^2 - ω2_c); pdw - sqrt(pdw^2 - ω2_c)]
    p
ppf(P_0, P_p, f_min, f_max) := [
    {
        stack(ppf_poles(P_0, f_min, f_max), 0) if r == 1
        ppf_poles(P_0, f_min, f_max) otherwise
    };
    ppf_poles(P_p, f_min, f_max)
]
[p_03; p_p3] := ppf(p_0, p_p, F_pl, F_ph)
z_p := Z(p_p3, f_d)
z_0 :=
    stack(Z(p_03, f_d), -1) if r == 1
    Z(p_03, f_d) otherwise
K_z0 :=
    z0 ← exp(1i*2*π*ff_p0*dt)
    |product(z0 - z_0[n], n = 0 .. rows(z_0) - 1)/product(z0 - z_p[n], n = 0 .. rows(z_p) - 1)|
    = 53.6714
z_fp0 := [Z(0 + 1i*2*π*f_p0, f_d); Z(0 - 1i*2*π*f_p0, f_d)]
p_p = [-1.20298; -0.112687 + 0.772337i; -0.112687 - 0.772337i; -0.397988 + 0.780703i; -0.397988 - 0.780703i; -0.85179 + 0.641694i; -0.85179 - 0.641694i]
M_p := [f_sl, G_s; f_pl, G_s; f_pl, G_p; f_ph, G_p; f_ph, G_s; f_sh, G_s]
ZZ(z) := 2*f_d*(1 - z^-1)/(1 + z^-1)
PP(p) := (p^2 + ω_c)/(p*Δω)
p_03 = [14.6386i; -3.99633i; 3.99633i; -14.6386i; 16.761i; -3.49029i; 3.49029i; -16.761i; 26.1502i; -2.23711i; 2.23711i; -26.1502i; 0]
p_p3 = [-6.24076 + 4.42197i; -6.24076 - 4.42197i; -0.312833 - 4.61228i; -0.856349 + 12.6256i; -0.312833 + 4.61228i; -0.856349 - 12.6256i; -1.07656 - 4.41263i; -3.05277 + 12.5128i; -1.07656 + 4.41263i; -3.05277 - 12.5128i; -2.41817 - 4.02355i; -6.41957 + 10.6814i; -2.41817 + 4.02355i; -6.41957 - 10.6814i]
B := G_p^(1 - r)/K_z0*Root2PolynomZ(z_0)
p_0 = [1.02572i; -1.02572i; 1.27905i; -1.27905i; 2.30476i; -2.30476i]
p_p = [-1.20298; -0.112687 + 0.772337i; -0.112687 - 0.772337i; -0.397988 + 0.780703i; -0.397988 - 0.780703i; -0.85179 + 0.641694i; -0.85179 - 0.641694i]
A := Root2PolynomZ(z_p)
B = [0.0186319; -0.113829; 0.333577; -0.635233; 0.87385; -0.870387; 0.54492; 5.2955e-16; -0.54492; 0.870387; -0.87385; 0.635233; -0.333577; 0.113829; -0.0186319]
A = [1; -7.89354; 30.6026; -76.9854; 140.067; -194.558; 212.406; -184.936; 128.964; -71.6744; 31.2703; -10.3992; 2.49756; -0.388896; 0.029773]
z_0 = [0.302317 + 0.953208i; 0.923213 - 0.38429i; 0.923213 + 0.38429i; 0.302317 - 0.953208i; 0.17486 + 0.984593i; 0.94089 - 0.338713i; 0.94089 + 0.338713i; 0.17486 - 0.984593i; -0.261878 + 0.965101i; 0.975286 - 0.220947i; 0.975286 + 0.220947i; -0.261878 - 0.965101i; 1; -1]
z_p = [0.482254 + 0.249782i; 0.482254 - 0.249782i; 0.87265 - 0.425208i; 0.403537 + 0.849648i; 0.87265 + 0.425208i; 0.403537 - 0.849648i; 0.818149 - 0.380651i; 0.340277 + 0.727488i; 0.818149 + 0.380651i; 0.340277 - 0.727488i; 0.728586 - 0.310242i; 0.301318 + 0.526123i; 0.728586 + 0.310242i; 0.301318 - 0.526123i]
K_p0 :=
    p0 ← 1i*2*π*F_p0
    product(p0 - p_03[n], n = 0 .. rows(p_03) - 1)/product(p0 - p_p3[n], n = 0 .. rows(p_p3) - 1)
    = 1.3768
G_p^(1 - r) = 1
H_ppf(p) := G_p^(1 - r)/K_p0*PolynomP(p, p_03)/PolynomP(p, p_p3)
Re(G_p^(1 - r)/K_z0) = 0.0186319
HZ(z) := G_p^(1 - r)/K_z0*product(1 - z_0[n]*z^-1, n = 0 .. rows(z_0) - 1)/product(1 - z_p[n]*z^-1, n = 0 .. rows(z_p) - 1)
|HZ(e^(1i*2*π*ff_p0/f_d))| = 1
|HZ(e^(1i*2*π*f_p0/f_d))| = 1
|H_ppf(1i*2*π*ff_p0)| = 1
20*log(|H_ppf(ZZ(e^(1i*2*π*sqrt(f_pl*f_ph)/f_d)))|) = -2.89298e-15
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20*log(|H_ppf(ZZ(e^(1i*2*π*f_sl/f_d)))|) = -48.2677
20*log(|H_ppf(ZZ(e^(1i*2*π*f_pl/f_d)))|) = -40
20*log(|H_ppf(ZZ(e^(1i*2*π*f_ph/f_d)))|) = -40
20*log(|H_ppf(ZZ(e^(1i*2*π*f_sh/f_d)))|) = -40.8072
20*log(|H_ppf(ZZ(e^(1i*2*π*sqrt(f_pl*f_ph)/f_d)))|) = -2.89298e-15
|H_ppf(ZZ(e^(1i*2*π*sqrt(f_pl*f_ph)/f_d)))| = 1
20*log(|H_ppf(ZZ(e^(1i*2*π*(f_pl + (f_ph - f_pl)*0.1)/f_d)))|) = -0.214071
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B := Root2PolynomZ(z_0)
A := Root2PolynomZ(z_p)
hh_z2 := vectorize(h(tt, H(f) ← HZ(e^(1i*2*π*f/f_d))))
ImError := sum(Im(hh_z2)^2)/samples = 2.57445e-19
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Re(B) = [1; -6.10937; 17.9036; -34.0939; 46.9008; -46.7149; 29.2466; 0; -29.2466; 46.7149; -46.9008; 34.0939; -17.9036; 6.10937; -1]
Re(A) = [1; -7.89354; 30.6026; -76.9854; 140.067; -194.558; 212.406; -184.936; 128.964; -71.6744; 31.2703; -10.3992; 2.49756; -0.388896; 0.029773]
Re(hh_z2) = [
    0.0186319; 0.0332424; 0.0257939; -0.0145475; -0.0808819; -0.109077; -0.0636831; 0.0495011; 0.162026; 0.182326
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]
_ := WRITECSV(Re(hh_z2), "ChebishevII.BandPass.Impulse.csv")
