# Рассчёт фильтра Чебышева II-рода
# https://ru.dsplib.org/content/filter_cheby2_ap/filter_cheby2_ap.html
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f_d := 10  # Гц - частота дискретизации
samples := 100
n := 0 .. samples - 1
dt := 1/f_d = 0.1
tt[n] := n*dt
h(t, H) := 1/f_d*integral(H(f)*e^(1i*2*π*f*t), f = -f_d/2 .. f_d/2)
df := f_d/samples = 0.1
db(x) := 10^(x/20)
db_P(x) := 10^(x/10)
to_db(x) := 20*log(|x|)
to_dbP(x) := 10*log(|x|)
roundup(x) := Trunc(x, 1) + (Trunc(x, 1) ≠ x)
abs(z) := |z|
circle_x[n] := cos(2*π/(samples - 1)*n)
circle_y[n] := sin(2*π/(samples - 1)*n)
Ki(k) :=
    k_0 ← k/(1 + sqrt(1 - k*k))
    k_0*k_0
K(k) :=
    ki ← Ki(k)
    (1 + ki)*K(ki) if k - ki > 0
    π/2 otherwise
T(k) := K(sqrt(1 - k*k))
sn(u, k) :=
    ki ← Ki(k)
    sin(u*π/2) if k - ki ≤ 0
    otherwise
        w ← sn(u, ki)
        (1 + ki)/(1/w + ki*w)
cd(u, k) :=
    ki ← Ki(k)
    cos(u*π/2) if k - ki ≤ 0
    otherwise
        w ← cd(u, ki)
        (1 + ki)/(1/w + ki*w)
sn_inv(sn, k) :=
    ki ← Ki(k)
    sn_inv(2*sn/((1 + ki)*(1 + sqrt(1 - k*k*sn*sn))), ki) if k - ki > 0
    2*asin(sn)/π
cd_inv(cn, k) :=
    ki ← Ki(k)
    cd_inv(2*cn/((1 + ki)*(1 + sqrt(1 - k*k*cn*cn))), ki) if k - ki > 0
    2*acos(cn)/π
K(0.66667) = 1.80967
T(0.66667) = 1.90424
K(0.0028615) = 1.5708
T(0.0028615) = 7.24272
Z(p_0, f_d) := (2*f_d + p_0)/(2*f_d - p_0)
z2p(z_0, f_d) := 2*f_d*(1 - z_0^-1)/(1 + z_0^-1)
η(s) :=
    N ← rows(s)
    [y[0]; y[N - 1]] ← [s[0]; 0]
    for n ∈ 1 .. N - 1
        y[n] ← y[n - 1] + s[n]
    y
cd(0.6, 0.93) = 0.761809
sn(0.6, 0.93) = 0.917919
0.917918
0.761809423
SinCos(x) := [sin(x); cos(x)]
SinCos(0) = [0; 1]
C(N, ω) := cos(N*acos(ω))
sh(x) := sinh(x)
ch(x) := cosh(x)
arsh(x) := asinh(x)
arch(x) := acosh(x)
f_analog(f_digital., f_d) := f_d/π*tan(π*f_digital./f_d)
conj(z) := Re(z) - 1i*Im(z)
ShCh(x) := [sh(x); ch(x)]
PolynomP(p, P) := product(p - P[n], n = 0 .. rows(P) - 1)
PolynomZ(z, Z) := product(1 - Z[n]*z^-1, n = 0 .. rows(Z) - 1)
f_digit(f_analog, f_d) := f_d/π*atan(π*f_analog/f_d)
ConjV(z) := [Re(z) + 1i*Im(z); Re(z) - 1i*Im(z)]
HP(p, P_0, P_p) := PolynomP(p, P_0)/PolynomP(p, P_p)
HZ(z, Z_0, Z_p) := PolynomZ(z, Z_0)/PolynomZ(z, Z_p)
f_sl := 2/(2*π) = 0.31831
f_pl := 4/(2*π) = 0.63662
f_ph := 12.5/(2*π) = 1.98944
f_sh := 15/(2*π) = 2.38732
f_p0 := sqrt(f_pl*f_ph)
f_s0 := sqrt(f_sl*f_sh)
ω_sl := 2*π*f_sl = 2
ω_pl := 2*π*f_pl = 4
ω_ph := 2*π*f_ph = 12.5
ω_sh := 2*π*f_sh = 15
Root2PolynomP(P) :=
    N ← rows(P) + 1
    a[N - 1] ← 0
    [a[0]; a[1]] ← [-P[0]; 1]
    for n ∈ 2 .. N - 1
        a[n] ← 1
        root ← P[n - 1]
        for i ∈ n - 1 .. 1
            a[i] ← a[i - 1] - a[i]*root
        a[0] ← -a[0]*root
    a
Root2PolynomZ(Z) :=
    N ← rows(Z) + 1
    [a[N - 1]; a[N - 2]] ← [-Z[0]; 1]
    for k ∈ 2 .. N - 1
        a[N - 1 - k] ← a[N - 1 - k + 1]
        for i ∈ k - 1 .. 1
            a[N - 1 - i] ← a[N - 1 - (i - 1)] - a[N - 1 - i]*Z[k - 1]
        a[N - 1] ← -a[N - 1]*Z[k - 1]
    a
ω_c := ω_pl*ω_ph = 50
Δω := ω_ph - ω_pl = 8.5
Ω(T_d, ω) := 2/T_d*tan(ω/2)  # Преобразование частот аналогового фильтра в частоты цифрового
F_sl := f_analog(f_sl, f_d) = 0.319375
F_pl := f_analog(f_pl, f_d) = 0.645246
F_ph := f_analog(f_ph, f_d) = 2.29656
F_sh := f_analog(f_sh, f_d) = 2.96536
F_p0 := sqrt(F_pl*F_ph)
F_s0 := sqrt(F_sl*F_sh)
Ω_sl := 2*π*F_sl = 2.00669
Ω_pl := 2*π*F_pl = 4.0542
Ω_ph := 2*π*F_ph = 14.4297
Ω_sh := 2*π*F_sh = 18.6319
ff_p0 := f_digit(F_p0, f_d)  # центральная частота цифрового фильтра
Ω_c := Ω_pl*Ω_ph = 58.5009
ΔΩ := Ω_ph - Ω_pl = 10.3755
F_p0 = 1.21731
ff_p0 = 1.16268
Ω_p := 1
F_p := Ω_p/(2*π) = 0.159155  # Частота среза аналогового фильтра
Ω_s :=
    Ω_s ←
        Ω_sh if Ω_c/Ω_sh > Ω_sl
        Ω_sl otherwise
    |(Ω_c - Ω_s^2)/(ΔΩ*Ω_s)|
    = 1.49315
F_s := Ω_s/(2*π) = 0.237641  # Частота заграждения аналогового фильтра
sqrt(F_sl*F_sh) = 0.973172
sqrt(F_pl*F_ph) = 1.21731
"Fsh" if F_pl*F_ph > F_sl*F_sh
"Fsl" otherwise
= "Fsh"
R_p := 1  # Неравномерность в полосе пропускания (дБ)
G_p := (-R_p) db = 0.891251
R_s := 40  # Уровень подавления в полосе заграждения (дБ)
G_s := (-R_s) db = 0.01
# Порядок фильтра
ε_p := sqrt(10^(R_p/10) - 1) = 0.508847
ε_s := sqrt(10^(R_s/10) - 1) = 99.995
1/ε_s = 0.0100005
G_p := 1/sqrt(1 + ε_p^2) = 0.891251
ε_s/ε_p = 196.513
Ω_s/Ω_p = 1.49315
poles(r, L) :=
    shβ ← sh(β)
    chβ ← ch(β)
    P[0] ← -Ω_p/k_ω*1/shβ if r ≠ 0
    for n ∈ 1 .. L
        [sinθ; cosθ] ← SinCos(π*(n - 0.5)/N)
        [P[2*n + r - 2]; P[2*n + r - 1]] ← ConjV(-Ω_p/k_ω*(-1i*cos(π*(n - 0.5)/N - 1i*β)/(sinθ^2*shβ^2 + cosθ^2*chβ^2)))
    P  # error: Эта переменная не определена.
k_ω := Ω_p/Ω_s = 0.669727
k_ε := ε_p/ε_s = 0.00508873
# Порядок фильтра
N := arch(ε_s/ε_p)/arch(Ω_s/Ω_p) = 6.24707
N := ceil(N) = 7
# Число парных полюсов
# Наличие/отсутсвтие центрального полюса
θ1 := π*(1 - 0.5)/N
L := Trunc(N/2, 1) = 3
r := mod(N, 2) = 1
2*L + r = 7
sin(θ1)*sh(β) - 1i*cos(θ1)*ch(β) =  # error: Эта переменная не определена.
G_s := 1/sqrt(1 + ε_s^2) = 0.01
G_p := 1/sqrt(1 + ε_p^2) = 0.891251
-1i*cos(θ1 - 1i*β) =  # error
β := 1/N*arsh(ε_s) = 0.756899
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θ(n) := (2*n - 1)/(2*N)*π
θ(n) := π*(n - 0.5)/N
conj(z) := Re(z) - 1i*Im(z)
poles(r, L) :=
    [shβ; chβ] ← ShCh(β)
    P[0] ← -Ω_p/k_ω*1/shβ if r ≠ 0
    for n ∈ 1 .. L
        [sinθ; cosθ] ← SinCos(π*(n - 0.5)/N)
        [P[2*n + r - 2]; P[2*n + r - 1]] ← ConjV(-Ω_p/k_ω*(sinθ*shβ - 1i*cosθ*chβ)/(sinθ^2*shβ^2 + cosθ^2*chβ^2))
    P
zeros(L) :=
    for n ∈ 1 .. L
        [P[2*n - 2]; P[2*n - 1]] ← ConjV(Ω_p/k_ω*1i/cos(π*(n - 0.5)/N))
    P
p_p := poles(r, L) = [-1.79623; -0.168258 + 1.15321i; -0.168258 - 1.15321i; -0.594254 + 1.1657i; -0.594254 - 1.1657i; -1.27185 + 0.958142i; -1.27185 - 0.958142i]
p_0 := zeros(L) = [1.53154i; -1.53154i; 1.9098i; -1.9098i; 3.44135i; -3.44135i]
ChebIICorrected(ε_s, N) :=
    β ← arsh(ε_s)/N
    L ← Trunc(N/2, 1)
    r ← mod(N, 2)
    [shβ; chβ] ← ShCh(β)
    P[0] ← -Ω_p/k_ω*1/shβ if r ≠ 0
    for n ∈ 1 .. L
        [sinθ; cosθ] ← SinCos(π*(n - 0.5)/N)
        [P[2*n + r - 2]; P[2*n + r - 1]] ← ConjV(-Ω_p/k_ω*(sinθ*shβ - 1i*cosθ*chβ)/(sinθ^2*shβ^2 + cosθ^2*chβ^2))
        [Z[2*n - 2]; Z[2*n - 1]] ← ConjV(Ω_p/k_ω*1i/cos(π*(n - 0.5)/N))
    [Z; P]
[p_0; p_p] := ChebIICorrected(ε_s, N)
p_0 = [1.53154i; -1.53154i; 1.9098i; -1.9098i; 3.44135i; -3.44135i]
p_p = [-1.79623; -0.168258 + 1.15321i; -0.168258 - 1.15321i; -0.594254 + 1.1657i; -0.594254 - 1.1657i; -1.27185 + 0.958142i; -1.27185 - 0.958142i]
G_0 := product(-p_0[i], i = 0 .. rows(p_0) - 1)/product(-p_p[i], i = 0 .. rows(p_p) - 1)
H_0(p) := 1/G_0*product(p - p_0[i], i = 0 .. rows(p_0) - 1)/product(p - p_p[i], i = 0 .. rows(p_p) - 1)
vectorize(|p_p|) = [1.79623; 1.16542; 1.16542; 1.30843; 1.30843; 1.59237; 1.59237]
G_0 = 9.56705
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H_0(1i*Ω_p) to_db = -0.258574
ppf_w(P_p, P_0, ω_c, Δω) :=
    count_p ← rows(P_p)
    count_0 ← rows(P_0)
    p01[count_0*2 + (count_p - count_0) - 1] ← 0
    for i ∈ 0 .. count_p - 1
        pdw ← 0.5*P_p[i]*Δω
        [p1[i*2]; p1[i*2 + 1]] ← [pdw + sqrt(pdw^2 - ω_c); pdw - sqrt(pdw^2 - ω_c)]
    for i ∈ 0 .. count_0 - 1
        pdw ← 0.5*P_0[i]*Δω
        [p01[i*2]; p01[i*2 + 1]] ← [pdw + sqrt(pdw^2 - ω_c); pdw - sqrt(pdw^2 - ω_c)]
    [p1; p01]
ppf_poles(P, f_min, f_max) :=
    N ← rows(P)
    ω_min ← 2*π*f_min
    ω_max ← 2*π*f_max
    Δω ← (ω_max - ω_min)/2
    ω2_c ← ω_min*ω_max
    for i ∈ 0 .. N - 1
        pdw ← P[i]*Δω
        [p1[i*2]; p1[i*2 + 1]] ← [pdw + sqrt(pdw^2 - ω2_c); pdw - sqrt(pdw^2 - ω2_c)]
    p1
ppf_poles(P, f_min, f_max) :=
    N ← rows(P)
    ω_min ← 2*π*f_min
    ω_max ← 2*π*f_max
    Δω ← (ω_max - ω_min)/2
    ω2_c ← ω_min*ω_max
    for i ∈ 0 .. N - 1
        pdw ← P[i]*Δω
        [p1[i*2]; p1[i*2 + 1]] ← [pdw + sqrt(pdw^2 - ω2_c); pdw - sqrt(pdw^2 - ω2_c)]
    p1
PP(p) := (p^2 + ω_c)/(p*Δω)
ZZ(z) := 2*f_d*(1 - z^-1)/(1 + z^-1)
M_p := [f_sl, G_s; f_pl, G_s; f_pl, G_p; f_ph, G_p; f_ph, G_s; f_sh, G_s]
ppf_poles(P, f_min, f_max) :=
    count ← rows(P)
    ω_min ← 2*π*f_min
    ω_max ← 2*π*f_max
    Δω ← ω_max - ω_min
    ω2_c ← ω_min*ω_max
    for i ∈ 0 .. count - 1
        pdw ← P[i]*Δω/2
        [p1[i*2]; p1[i*2 + 1]] ← [pdw + sqrt(pdw^2 - ω2_c); pdw - sqrt(pdw^2 - ω2_c)]
    p1
z_fp0 := [Z(0 + 1i*2*π*f_p0, f_d); Z(0 - 1i*2*π*f_p0, f_d)]
ppf(P_p, P_0, f_min, f_max) :=
    count_p ← rows(P_p)
    count_0 ← rows(P_0)
    ω_min ← 2*π*f_min
    ω_max ← 2*π*f_max
    Δω ← ω_max - ω_min
    ω_c ← ω_min*ω_max
    ppf_w(P_p, P_0, ω_c, Δω)
[p_p1; p_01] := ppf(p_p, p_0, F_pl, F_ph)
G_02 := HP(1i*2*π*sqrt(F_pl*F_ph), p_01, p_p1)
z_0 := Z(p_01, f_d)
z_p := Z(p_p1, f_d)
K_z0 :=
    z0 ← exp(1i*2*π*ff_p0*dt)
    |1/z0^r*(z0 + 1)^r*product(z0 - z_0[n], n = 0 .. rows(z_0) - 1)/product(z0 - z_p[n], n = 0 .. rows(z_p) - 1)|
    = 31.2049
K_z0 :=
    z0 ← exp(1i*2*π*ff_p0*dt)
    |1/z0^r*(z0 + 1)^r*product(z0 - z_0[n], n = 0 .. rows(z_0) - 1)/product(z0 - z_p[n], n = 0 .. rows(z_p) - 1)|
    = 31.2049
H_ppf(p) := G_p^(1 - r)/G_02*HP(p, p_01, p_p1)
r = 1
HZ(z) := G_p^(1 - r)/K_z0*(1 + z^-1)^r*product(1 - z_0[n]*z^-1, n = 0 .. rows(z_0) - 1)/product(1 - z_p[n]*z^-1, n = 0 .. rows(z_p) - 1)
p_01 = [18.9738i; -3.08325i; 3.08325i; -18.9738i; 22.424i; -2.60885i; 2.60885i; -22.424i; 37.2751i; -1.56943i; 1.56943i; -37.2751i; 0]
p_p1 = [-3.99568; -14.641; -0.333751 - 3.70354i; -1.41201 + 15.6687i; -0.333751 + 3.70354i; -1.41201 - 15.6687i; -1.11169 - 3.41059i; -5.05399 + 15.5053i; -1.11169 + 3.41059i; -5.05399 - 15.5053i; -2.29782 - 2.65604i; -10.8982 + 12.5972i; -2.29782 + 2.65604i; -10.8982 - 12.5972i]
z_0 = [0.0526261 + 0.998614i; 0.953571 - 0.301167i; 0.953571 + 0.301167i; 0.0526261 - 0.998614i; -0.113903 + 0.993492i; 0.966539 - 0.25652i; 0.966539 + 0.25652i; -0.113903 - 0.993492i; -0.552931 + 0.833227i; 0.98776 - 0.155983i; 0.98776 + 0.155983i; -0.552931 - 0.833227i; 1]
z_p = [0.666967; 0.1547; 0.904009 - 0.346792i; 0.216624 + 0.890289i; 0.904009 + 0.346792i; 0.216624 - 0.890289i; 0.846494 - 0.298301i; 0.154405 + 0.714434i; 0.846494 + 0.298301i; 0.154405 - 0.714434i; 0.768801 - 0.210694i; 0.110059 + 0.452572i; 0.768801 + 0.210694i; 0.110059 - 0.452572i]
p_0 = [1.53154i; -1.53154i; 1.9098i; -1.9098i; 3.44135i; -3.44135i]
p_p = [-1.79623; -0.168258 + 1.15321i; -0.168258 - 1.15321i; -0.594254 + 1.1657i; -0.594254 - 1.1657i; -1.27185 + 0.958142i; -1.27185 - 0.958142i]
G_p^(1 - r) = 1
G_p^(1 - r)/K_z0 = 0.0320462
K_z0 = 31.2049
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|H_ppf(ZZ(e^(1i*2*π*f_sl/f_d)))| = 0.0089564
G_s = 0.01
20*log(|H_ppf(ZZ(e^(1i*2*π*f_sl/f_d)))|) = -40.9573
-R_s = -40
|H_ppf(ZZ(e^(1i*2*π*f_pl/f_d)))| = 0.970669
G_p = 0.891251
20*log(|H_ppf(ZZ(e^(1i*2*π*f_pl/f_d)))|) = -0.258574
-R_p = -1
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|H_ppf(ZZ(e^(1i*2*π*f_ph/f_d)))| = 0.970669
G_p = 0.891251
20*log(|H_ppf(ZZ(e^(1i*2*π*f_ph/f_d)))|) = -0.258574
-R_p = -1
|H_ppf(ZZ(e^(1i*2*π*f_sh/f_d)))| = 0.01
G_s = 0.01
20*log(|H_ppf(ZZ(e^(1i*2*π*f_sh/f_d)))|) = -40
-R_s = -40
K_z := G_p^(1 - r)/K_z0
Re(K_z) = 0.0320462
B := K_z*Root2PolynomZ(z_0)
A := Root2PolynomZ(z_p)
hh_z2 := vectorize(h(tt, H(f) ← HZ(e^(1i*2*π*f/f_d))))
ImError := sum(Im(hh_z2)^2)/samples = 2.65648e-21
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Re(B) = [0.0320462; -0.179053; 0.475176; -0.874458; 1.32908; -1.72224; 1.91898; -1.91898; 1.72224; -1.32908; 0.874458; -0.475176; 0.179053; -0.0320462]
Re(A) = [1; -6.82245; 22.5923; -48.6103; 76.3249; -92.4824; 88.9218; -68.7731; 42.9526; -21.532; 8.52069; -2.58609; 0.569551; -0.0796005; 0.00481779]
Re(hh_z2) = [
    0.0320462; 0.0716274; 0.0607991; -0.0449356; -0.189632; -0.219497; -0.0666952; 0.173081; 0.282179; 0.171936
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]
FilterName := "ChebyshevII"
FilterType := "BandPass"
FileName :=
    EvenOdd ←
        "Even" if mod(N, 2) == 0
        "Odd" otherwise
    concat(FilterName, ".", EvenOdd, ".", FilterType, ".", "Impulse.csv")
FileName = "ChebyshevII.Odd.BandPass.Impulse.csv"
_ := WRITECSV(Re(hh_z2), FileName)
