# Рассчёт Эллиптического фильтра
# https://ru.dsplib.org/content/filter_ellip_ap/filter_ellip_ap.html
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f_d := 10  # Гц - частота дискретизации
samples := 100
n := 0 .. samples - 1
df := f_d/samples = 0.1
h(t, H) := 1/f_d*integral(H(f)*e^(1i*2*π*f*t), f = -f_d/2 .. f_d/2)
dt := 1/f_d = 0.1
tt[n] := n*dt
db(x) := 10^(x/20)
db_P(x) := 10^(x/10)
to_db(x) := 20*log(|x|)
to_dbP(x) := 10*log(|x|)
roundup(x) := Trunc(x, 1) + (Trunc(x, 1) ≠ x)
abs(z) := vectorize(|z|)
circle_x[n] := cos(2*π/(samples - 1)*n)
circle_y[n] := sin(2*π/(samples - 1)*n)
Ki(k) :=
    k_0 ← k/(1 + sqrt(1 - k*k))
    k_0*k_0
K(k) :=
    ki ← Ki(k)
    (1 + ki)*K(ki) if k - ki > 0
    π/2 otherwise
T(k) := K(sqrt(1 - k*k))
sn(u, k) :=
    ki ← Ki(k)
    sin(u*π/2) if k - ki ≤ 0
    otherwise
        w ← sn(u, ki)
        (1 + ki)/(1/w + ki*w)
cd(u, k) :=
    ki ← Ki(k)
    cos(u*π/2) if k - ki ≤ 0
    otherwise
        w ← cd(u, ki)
        (1 + ki)/(1/w + ki*w)
sn_inv(sn, k) :=
    ki ← Ki(k)
    sn_inv(2*sn/((1 + ki)*(1 + sqrt(1 - k*k*sn*sn))), ki) if k - ki > 0
    2*asin(sn)/π
cd_inv(cn, k) :=
    ki ← Ki(k)
    cd_inv(2*cn/((1 + ki)*(1 + sqrt(1 - k*k*cn*cn))), ki) if k - ki > 0
    2*acos(cn)/π
K(0.66667) = 1.80967
T(0.66667) = 1.90424
K(0.0028615) = 1.5708
T(0.0028615) = 7.24272
Z(p_0, f_d) := (2*f_d + p_0)/(2*f_d - p_0)
z2p(z_0, f_d) := 2*f_d*(1 - z_0^-1)/(1 + z_0^-1)
PolynomP(p, P) := product(p - P[n], n = 0 .. rows(P) - 1)
PolynomZ(z, Z) := product(1 - Z[n]*z^-1, n = 0 .. rows(Z) - 1)
HP(p, P_0, P_p) := PolynomP(p, P_0)/PolynomP(p, P_p)
HZ(z, Z_0, Z_p) := PolynomZ(z, Z_0)/PolynomZ(z, Z_p)
Ω(T_d, ω) := 2/T_d*tan(ω/2)  # Преобразование частот аналогового фильтра в частоты цифрового
f_analog(f_digital., f_d) := f_d/π*tan(π*f_digital./f_d)
f_digit(f_analog, f_d) := f_d/π*atan(π*f_analog/f_d)
kHz := 10^3
conj(z) := Re(z) - 1i*Im(z)
Root2PolynomP(P) :=
    N ← rows(P) + 1
    a[N - 1] ← 0
    [a[0]; a[1]] ← [-P[0]; 1]
    for n ∈ 2 .. N - 1
        a[n] ← 1
        root ← P[n - 1]
        for i ∈ n - 1 .. 1
            a[i] ← a[i - 1] - a[i]*root
        a[0] ← -a[0]*root
    a
Root2PolynomZ(Z) :=
    N ← rows(Z) + 1
    [a[N - 1]; a[N - 2]] ← [-Z[0]; 1]
    for k ∈ 2 .. N - 1
        a[N - 1 - k] ← a[N - 1 - k + 1]
        for i ∈ k - 1 .. 1
            a[N - 1 - i] ← a[N - 1 - (i - 1)] - a[N - 1 - i]*Z[k - 1]
        a[N - 1] ← -a[N - 1]*Z[k - 1]
    a
f_sl := 2/(2*π) = 0.31831
f_pl := 4/(2*π) = 0.63662
f_ph := 12/(2*π) = 1.90986
f_sh := 15/(2*π) = 2.38732
f_p0 := sqrt(f_pl*f_ph)
f_s0 := sqrt(f_sl*f_sh)
ppf(P_p, P_0, f_min, f_max) :=
    count_p ← rows(P_p)
    count_0 ← rows(P_0)
    ω_min ← 2*π*f_min
    ω_max ← 2*π*f_max
    Δω ← (ω_max - ω_min)/2
    ω2_c ← ω_min*ω_max
    p01[2*count_p] ← 0
    for i ∈ 0 .. count_p - 1
        pdw ← P_p[i]*Δω
        [p1[i*2]; p1[i*2 + 1]] ← [pdw + sqrt(pdw^2 - ω2_c); pdw - sqrt(pdw^2 - ω2_c)]
    for i ∈ 0 .. count_0 - 1
        p0dw ← P_0[i]*Δω
        [p01[i*2]; p01[i*2 + 1]] ← [p0dw + sqrt(p0dw^2 - ω2_c); p0dw - sqrt(p0dw^2 - ω2_c)]
    [p1; p01]
ω_sl := 2*π*f_sl = 2
ω_pl := 2*π*f_pl = 4
ω_ph := 2*π*f_ph = 12
ω_sh := 2*π*f_sh = 15
ω_c := ω_pl*ω_ph = 48
Δω := ω_ph - ω_pl = 8
Ω(T_d, ω) := 2/T_d*tan(ω/2)  # Преобразование частот аналогового фильтра в частоты цифрового
F_sl := f_analog(f_sl, f_d) = 0.319375
F_pl := f_analog(f_pl, f_d) = 0.645246
F_ph := f_analog(f_ph, f_d) = 2.17768
F_sh := f_analog(f_sh, f_d) = 2.96536
F_pl/f_pl - 1 = 1.35502 %
F_sl/f_sl - 1 = 0.334672 %
F_sh/f_sh - 1 = 24.2129 %
F_ph/f_ph - 1 = 14.0228 %
F_p0 := sqrt(F_pl*F_ph)
F_s0 := sqrt(F_sl*F_sh)
Ω_sl := 2*π*F_sl = 2.00669
Ω_pl := 2*π*F_pl = 4.0542
Ω_ph := 2*π*F_ph = 13.6827
Ω_sh := 2*π*F_sh = 18.6319
ff_p0 := f_digit(F_p0, f_d)  # центральная частота цифрового фильтра
Ω_c := Ω_pl*Ω_ph = 55.4726
ΔΩ := Ω_ph - Ω_pl = 9.62854
F_p0 = 1.18538
ff_p0 = 1.13474
Ω_p := 1
F_p := Ω_p/(2*π) = 0.159155  # Частота среза аналогового фильтра
Ω_s :=
    Ω_s ←
        Ω_sh if Ω_c/Ω_sh > Ω_sl
        Ω_sl otherwise
    |(Ω_c - Ω_s^2)/(ΔΩ*Ω_s)|
    = 1.62586
F_s := Ω_s/(2*π) = 0.258764  # Частота заграждения аналогового фильтра
R_p := 1  # Неравномерность в полосе пропускания (дБ)
G_p := (-R_p) db = 0.891251
R_s := 40  # Уровень подавления в полосе заграждения (дБ)
G_s := (-R_s) db = 0.01
# Порядок фильтра
ε_p := sqrt(10^(R_p/10) - 1) = 0.508847
ε_s := sqrt(10^(R_s/10) - 1) = 99.995
k_ω := Ω_p/Ω_s = 0.615059
k_ε := ε_p/ε_s = 0.00508873
G_p := 1/sqrt(1 + ε_p^2) = 0.891251
N := ceil(T(k_ε)*K(k_ω)/(K(k_ε)*T(k_ω))) = 4
L := Trunc(N/2, 1) = 2
r := mod(N, 2) = 0
u(n) := (2*n - 1)/N
un := matrix(L, 1, f(n, m) ← u(n + 1))
m := sqrt(1 - k_ε^2) = 0.999987
k_p := m^N*product(sn(u(n), m)^4, n = 1 .. L) = 0.751393
k_ω := sqrt(1 - k_p^2) = 0.659855
# Нули
zeros := 1i/(k_ω*cd(un, k_ω)) = [1.60955i; 3.52529i]
υ_0 := -1i/N*sn_inv(1i/ε_p, k_ε) = 0.227269
p_0 := stack(zeros, conj(zeros))
p_0 = [1.60955i; 3.52529i; -1.60955i; -3.52529i]
# Полюса
p_p :=
    pp[0] ← 1i*sn(1i*υ_0, k_ω) if r > 0
    for n ∈ 0 .. L - 1
        pp[2*n + r] ← 1i*cd(un[n] - 1i*υ_0, k_ω)
        pp[2*n + 1 + r] ← conj(pp[2*n + r])
    pp
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G_0 := PolynomP(0, p_0)/PolynomP(0, p_p)
H(p) := G_p^(1 - r)/G_0*PolynomP(p, p_0)/PolynomP(p, p_p)
p_p = [-0.105283 + 0.993713i; -0.105283 - 0.993713i; -0.364298 + 0.478605i; -0.364298 - 0.478605i]
ppf_poles(P, f_min, f_max) :=
    N ← rows(P)
    ω_min ← 2*π*f_min
    ω_max ← 2*π*f_max
    Δω ← (ω_max - ω_min)/2
    ω2_c ← ω_min*ω_max
    for i ∈ 0 .. N - 1
        pdw ← P[i]*Δω
        [p1[i*2]; p1[i*2 + 1]] ← [pdw + sqrt(pdw^2 - ω2_c); pdw - sqrt(pdw^2 - ω2_c)]
    p1
ppf_poles(P, f_min, f_max) :=
    N ← rows(P)
    ω_min ← 2*π*f_min
    ω_max ← 2*π*f_max
    Δω ← (ω_max - ω_min)/2
    ω2_c ← ω_min*ω_max
    for i ∈ 0 .. N - 1
        pdw ← P[i]*Δω
        [p1[i*2]; p1[i*2 + 1]] ← [pdw + sqrt(pdw^2 - ω2_c); pdw - sqrt(pdw^2 - ω2_c)]
    p1
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# Подставнока
p == (p^2 + ω_c^2)/(Δω*p)
ppf_poles(P, f_min, f_max) :=
    count ← rows(P)
    ω_min ← 2*π*f_min
    ω_max ← 2*π*f_max
    Δω ← ω_max - ω_min
    ω2_c ← ω_min*ω_max
    for i ∈ 0 .. count - 1
        pdw ← P[i]*Δω/2
        [p1[i*2]; p1[i*2 + 1]] ← [pdw + sqrt(pdw^2 - ω2_c); pdw - sqrt(pdw^2 - ω2_c)]
    p1
ppf_w(P_p, P_0, ω_c, Δω) :=
    count_p ← rows(P_p)
    count_0 ← rows(P_0)
    p01[count_0*2 + (count_p - count_0) - 1] ← 0
    for i ∈ 0 .. count_p - 1
        pdw ← 0.5*P_p[i]*Δω
        [p1[i*2]; p1[i*2 + 1]] ← [pdw + sqrt(pdw^2 - ω_c); pdw - sqrt(pdw^2 - ω_c)]
    for i ∈ 0 .. count_0 - 1
        pdw ← 0.5*P_0[i]*Δω
        [p01[i*2]; p01[i*2 + 1]] ← [pdw + sqrt(pdw^2 - ω_c); pdw - sqrt(pdw^2 - ω_c)]
    [p1; p01]
ppf(P_p, P_0, f_min, f_max) :=
    count_p ← rows(P_p)
    count_0 ← rows(P_0)
    ω_min ← 2*π*f_min
    ω_max ← 2*π*f_max
    Δω ← ω_max - ω_min
    ω_c ← ω_min*ω_max
    ppf_w(P_p, P_0, ω_c, Δω)
ZZ(z) := 2*f_d*(1 - z^-1)/(1 + z^-1)
M_p := [f_sl, G_s; f_pl, G_s; f_pl, G_p; f_ph, G_p; f_ph, G_s; f_sh, G_s]
PP(p) := (p^2 + ω_c)/(p*Δω)
[p_p1; p_01] := ppf(p_p, p_0, F_pl, F_ph)
G_02 := HP(1i*2*π*sqrt(F_pl*F_ph), p_01, p_p1)
z_0 := Z(p_01, f_d)
z_fp0 := [Z(0 + 1i*2*π*f_p0, f_d); Z(0 - 1i*2*π*f_p0, f_d)]
z_p := Z(p_p1, f_d)
H_ppf(p) := G_p^(1 - r)/G_02*HP(p, p_01, p_p1)
Kz0 := product(2*f_d*ΔΩ/((2*f_d - p_p1[2*n])*(2*f_d - p_p1[2*n + 1])), n = 0 .. N - 1)  # disabled
K_z0 :=
    z0 ← exp(1i*2*π*ff_p0*dt)
    |1/z0^r*(z0 + 1)^r*product(z0 - z_0[n], n = 0 .. rows(z_0) - 1)/product(z0 - z_p[n], n = 0 .. rows(z_p) - 1)|
    = 32.9
20*log(|HZ(e^(1i*2*π*ff_p0/f_d))|) =  # error: Значение должно быть скалярным.
|HZ(e^(1i*2*π*ff_p0/f_d))| =  # error
HZ(z) := G_p^(1 - r)/K_z0*(1 + z^-1)^r*product(1 - z_0[n]*z^-1, n = 0 .. rows(z_0) - 1)/product(1 - z_p[n]*z^-1, n = 0 .. rows(z_p) - 1)
Kzp := 1/ε_p*product(2*f_d - p_01[n], n = 0 .. rows(p_01) - 1)/product(2*f_d - p_p1[n], n = 0 .. rows(p_p1) - 1)  # disabled
20*log(|H_ppf(ZZ(e^(1i*2*π*ff_p0/f_d)))|) = -1
|H_ppf(ZZ(e^(1i*2*π*ff_p0/f_d)))| = 0.891251
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p_0 = [1.60955i; 3.52529i; -1.60955i; -3.52529i]
p_01 = [18.4967i; -2.99906i; 35.5057i; -1.56236i; 2.99906i; -18.4967i; 1.56236i; -35.5057i]
p_p1 = [-0.232616 - 4.05781i; -0.781107 + 13.6258i; -0.232616 + 4.05781i; -0.781107 - 13.6258i; -1.22315 - 5.31081i; -2.2845 + 9.91907i; -1.22315 + 5.31081i; -2.2845 - 9.91907i]
z_0 = [0.0779829 + 0.996955i; 0.956017 - 0.29331i; -0.518263 + 0.855222i; 0.987869 - 0.155288i; 0.956017 + 0.29331i; 0.0779829 - 0.996955i; 0.987869 + 0.155288i; -0.518263 - 0.855222i]
z_p = [0.900559 - 0.381172i; 0.346108 + 0.882619i; 0.900559 + 0.381172i; 0.346108 - 0.882619i; 0.77367 - 0.443837i; 0.498151 + 0.666843i; 0.77367 + 0.443837i; 0.498151 - 0.666843i]
p_p = [-0.105283 + 0.993713i; -0.105283 - 0.993713i; -0.364298 + 0.478605i; -0.364298 - 0.478605i]
z0 ← exp(1i*2*π*ff_p0*dt)
(z0 + 1)^r*product(z0 - z_0[n], n = 0 .. rows(z_0) - 1)
= -0.612586 + 0.182591i
z0 ← exp(1i*2*π*ff_p0*dt)
product(z0 - z_0[n], n = 0 .. rows(z_0) - 1)
= -0.612586 + 0.182591i
K_z0 :=
    z0 ← exp(1i*2*π*ff_p0*dt)
    |1/z0^r*(z0 + 1)^r*product(z0 - z_0[n], n = 0 .. rows(z_0) - 1)/product(z0 - z_p[n], n = 0 .. rows(z_p) - 1)|
    = 32.9
z0 ← exp(1i*2*π*ff_p0*dt)
product(z0 - z_p[n], n = 0 .. rows(z_0) - 1)
= -0.0186196 + 0.00554988i
G_p^(1 - r)/K_z0 = 0.0270897
G_p^(1 - r) = 0.891251
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|H_ppf(ZZ(e^(1i*2*π*f_sl/f_d)))| = 0.00560754
G_s = 0.01
20*log(|H_ppf(ZZ(e^(1i*2*π*f_sl/f_d)))|) = -45.0246
-R_s = -40
|H_ppf(ZZ(e^(1i*2*π*f_pl/f_d)))| = 0.891251
G_p = 0.891251
20*log(|H_ppf(ZZ(e^(1i*2*π*f_pl/f_d)))|) = -1
-R_p = -1
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|H_ppf(ZZ(e^(1i*2*π*f_ph/f_d)))| = 0.891251
G_p = 0.891251
20*log(|H_ppf(ZZ(e^(1i*2*π*f_ph/f_d)))|) = -1
-R_p = -1
|H_ppf(ZZ(e^(1i*2*π*f_sh/f_d)))| = 0.00119531
G_s = 0.01
20*log(|H_ppf(ZZ(e^(1i*2*π*f_sh/f_d)))|) = -58.4504
-R_s = -40
B := Root2PolynomZ(z_0)
A := Root2PolynomZ(z_p)
hh_z2 := vectorize(h(tt, H(f) ← HZ(e^(1i*2*π*f/f_d))))
ImError := sum(Im(hh_z2)^2)/samples = 2.15999e-21
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B = [1; -3.00721; 4.1926; -5.06666; 5.7745; -5.06666; 4.1926; -3.00721; 1]
Re(A) = [1; -5.03697; 12.474; -19.5903; 21.2602; -16.2555; 8.56704; -2.85989; 0.473761]
Re(hh_z2) = [
    0.0270897; 0.0549855; 0.05262; -0.0274037; -0.136732; -0.18194; -0.0910809; 0.0950508; 0.232835; 0.207474
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]
_ := WRITECSV(Re(hh_z2), "Elliptic.BandPass.Impulse.csv")
