# https://ru.dsplib.org/content/filter_butter_ap/filter_butter_ap.html
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f_d := 10  # Гц - частота дискретизации
samples := 100
n := 0 .. samples - 1
dt := 1/f_d = 0.1
tt[n] := n*dt
df := f_d/samples = 0.1
h(t, H) := 1/f_d*integral(H(f)*e^(1i*2*π*f*t), f = -f_d/2 .. f_d/2)
db(x) := 10^(x/20)
db_P(x) := 10^(x/10)
to_db(x) := 20*log(|x|)
to_dbP(x) := 10*log(|x|)
roundup(x) := Trunc(x, 1) + (Trunc(x, 1) ≠ x)
abs(z) := |z|
circle_x[n] := cos(2*π/(samples - 1)*n)
circle_y[n] := sin(2*π/(samples - 1)*n)
Z(p_0, f_d) := (2*f_d + p_0)/(2*f_d - p_0)
Ω(T_d, ω) := 2/T_d*tan(ω/2)
f_analog(f_digital., f_d) := f_d/π*tan(π*f_digital./f_d)
Root2PolynomP(P) :=
    N ← rows(P) + 1
    a[N - 1] ← 0
    [a[0]; a[1]] ← [-P[0]; 1]
    for n ∈ 2 .. N - 1
        a[n] ← 1
        root ← P[n - 1]
        for i ∈ n - 1 .. 1
            a[i] ← a[i - 1] - a[i]*root
        a[0] ← -a[0]*root
    a
Root2PolynomZ(Z) :=
    N ← rows(Z) + 1
    [a[N - 1]; a[N - 2]] ← [-Z[0]; 1]
    for k ∈ 2 .. N - 1
        a[N - 1 - k] ← a[N - 1 - k + 1]
        for i ∈ k - 1 .. 1
            a[N - 1 - i] ← a[N - 1 - (i - 1)] - a[N - 1 - i]*Z[k - 1]
        a[N - 1] ← -a[N - 1]*Z[k - 1]
    a
f_p := 4/(2*π) = 0.63662  # Гц - частота пропускания
f_s := 2/(2*π) = 0.31831  # Гц - частота подавления
ω_p := 2*π*f_p = 1.27324*π
# Нормированная полоса среза
ω_p = 4
ω_s := 2*π*f_s = 0.63662*π
# Нормированная полоса заграждения
ω_s = 2
R_p := 1
(-R_p) db = 0.891251  # Неравномерность в полосе пропускания (дБ)
R_s := 40
(-R_s) db = 0.01  # Уровень подавления в полосе заграждения (дБ)
F_p := f_analog(f_p, f_d) = 0.645246
F_s := f_analog(f_s, f_d) = 0.319375
f_p = 0.63662
Ω_p := 2*π*F_p = 4.0542  # Частота среза аналогового фильтра
f_s = 0.31831
Ω_s := 2*π*F_s = 2.00669  # Частота заграждения аналогового фильтра
# Порядок фильтра
ε_p := sqrt(10^(R_p/10) - 1) = 0.508847
G_p := (-R_p) db = 0.891251
ε_s := sqrt(10^(R_s/10) - 1) = 99.995
1/ε_s = 0.0100005
G_s := (-R_s) db = 0.01
ε_s/ε_p = 196.513
ln(ε_s/ε_p) = 5.28073
F_p/F_s = 2.02034
ln(Ω_s/Ω_p) = -0.703265
# Порядок фильтра
N := ln(ε_s/ε_p)/ln(F_p/F_s) = 7.50887
N1 := N
N := ceil(N) = 8
α := 1/nthroot(ε_p, N) = 1.08812
N1 = 7.50887
poles(r, L) :=
    P[0] ← -α if r ≠ 0
    for n ∈ 1 .. L
        θ ← π*(n - 0.5)/N
        P[n*2 + r - 2] ← α*(-sin(θ) + 1i*cos(θ))
        P[n*2 + r - 1] ← α*(-sin(θ) - 1i*cos(θ))
    P
# Число парных полюсов
ConjV(z) := [z; Re(z) - 1i*Im(z)]
L := Trunc(N/2, 1) = 4
r := mod(N, 2) = 0
2*L + r = 8
θ(n) := (2*n - 1)/(2*N)*π
θ(n) := π/N*(n - 1/2)
θ(n) := π*(n - 0.5)/N
poles(r, L) :=
    P[0] ← -α if r ≠ 0
    for n ∈ 1 .. L
        [P[n*2 + r - 2]; P[n*2 + r - 1]] ← ConjV(α*e^(1i*(π*((n - 0.5)/N + 0.5))))
    P
p_p := poles(r, L)
p_0 := matrix(N, 1, f(n, m) ← 0)
p_p = [-0.212282 + 1.06721i; -0.212282 - 1.06721i; -0.604527 + 0.904738i; -0.604527 - 0.904738i; -0.904738 + 0.604527i; -0.904738 - 0.604527i; -1.06721 + 0.212282i; -1.06721 - 0.212282i]
p_p1 := Ω_p/p_p
Kz(p) := 1/product(2*f_d - p[n], n = 0 .. N - 1)
p_p1 = [-0.726883 - 3.65429i; -0.726883 + 3.65429i; -2.06999 - 3.09795i; -2.06999 + 3.09795i; -3.09795 - 2.06999i; -3.09795 + 2.06999i; -3.65429 - 0.726883i; -3.65429 + 0.726883i]
Kz1 := Kz(p_p1) = 1.50907e-11
z_p := vectorize(Z(p_p1, f_d))
z_0 := vectorize(Z(p_0, f_d))
z_p = [0.871681 - 0.32999i; 0.871681 + 0.32999i; 0.777395 - 0.249492i; 0.777395 + 0.249492i; 0.717958 - 0.15396i; 0.717958 + 0.15396i; 0.68943 - 0.0519152i; 0.68943 + 0.0519152i]
z_0 = [1; 1; 1; 1; 1; 1; 1; 1]
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Mdb := [0.1*F_s, -R_s; F_s, -R_s; F_s, -R_p; F_p, -R_p]
H(p) := p^N/product(p - p_p1[n], n = 0 .. N - 1)
G_z0 := product((1 + z_p[n])/2, n = 0 .. N - 1) = 0.386322
H_z2(z) := G_z0*product(1 - z_0[n]*z^-1, n = 0 .. N - 1)/product(1 - z_p[n]*z^-1, n = 0 .. N - 1)
H_z(z) := H(2*f_d*(1 - z^-1)/(1 + z^-1))
Z(0, f_d) = 1
B := G_z0*Root2PolynomZ(z_0)
A := Root2PolynomZ(z_p)
Re(B) = [0.386322; -3.09057; 10.817; -21.634; 27.0425; -21.634; 10.817; -3.09057; 0.386322]
Re(A) = [1; -6.11293; 16.5265; -25.7787; 25.3508; -16.0819; 6.42266; -1.47559; 0.149244]
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M := [0.1*f_s, (-R_s) db; f_s, (-R_s) db; f_s, (-R_p) db; f_p, (-R_p) db]
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hh_z2 := vectorize(h(tt, H(f) ← H_z2(e^(1i*2*π*f/f_d))))
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ff := 0, 2*f_d/100 .. f_d
Φ(f) := integral(-|d/df1(arg(H_z(e^(1i*2*π*f1/f_d)))/π)|, f1 = 0 .. f)
Φ(f_p)/N = -0.279735
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B := Root2PolynomZ(z_0)
A := Root2PolynomZ(z_p)
hh_z2 := vectorize(h(tt, H(f) ← H_z(e^(1i*2*π*f/f_d))))
ImError := sum(Im(hh_z2)^2)/samples = 8.67893e-24
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B = [1; -8; 28; -56; 70; -56; 28; -8; 1]
Re(A) = [1; -6.11293; 16.5265; -25.7787; 25.3508; -16.0819; 6.42266; -1.47559; 0.149244]
Re(hh_z2) = [
    0.386322; -0.729017; -0.023979; 0.22639; 0.236055; 0.14333; 0.0307416; -0.0587336; -0.108684; -0.119164
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]
_ := WRITECSV(Re(hh_z2), "Butterwort.HighPass.Impulse.csv")
