# Рассчёт Эллиптического фильтра
# https://ru.dsplib.org/content/filter_ellip_ap/filter_ellip_ap.html
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f_d := 10  # Гц - частота дискретизации
samples := 100
n := 0 .. samples - 1
dt := 1/f_d = 0.1
tt[n] := n*dt
h(t, H) := 1/f_d*integral(H(f)*e^(1i*2*π*f*t), f = -f_d/2 .. f_d/2)
df := f_d/samples = 0.1
db(x) := 10^(x/20)
db_P(x) := 10^(x/10)
to_db(x) := 20*log(|x|)
to_dbP(x) := 10*log(|x|)
roundup(x) := Trunc(x, 1) + (Trunc(x, 1) ≠ x)
abs(z) := |z|
circle_x[n] := cos(2*π/(samples - 1)*n)
circle_y[n] := sin(2*π/(samples - 1)*n)
Ki(k) :=
    k_0 ← k/(1 + sqrt(1 - k*k))
    k_0*k_0
K(k) :=
    ki ← Ki(k)
    (1 + ki)*K(ki) if k - ki > 0
    π/2 otherwise
T(k) := K(sqrt(1 - k*k))
sn(u, k) :=
    ki ← Ki(k)
    sin(u*π/2) if k - ki ≤ 0
    otherwise
        w ← sn(u, ki)
        (1 + ki)/(1/w + ki*w)
cd(u, k) :=
    ki ← Ki(k)
    cos(u*π/2) if k - ki ≤ 0
    otherwise
        w ← cd(u, ki)
        (1 + ki)/(1/w + ki*w)
sn_inv(sn, k) :=
    ki ← Ki(k)
    sn_inv(2*sn/((1 + ki)*(1 + sqrt(1 - k*k*sn*sn))), ki) if k - ki > 0
    2*asin(sn)/π
cd_inv(cn, k) :=
    ki ← Ki(k)
    cd_inv(2*cn/((1 + ki)*(1 + sqrt(1 - k*k*cn*cn))), ki) if k - ki > 0
    2*acos(cn)/π
K(0.66667) = 1.80967
T(0.66667) = 1.90424
K(0.0028615) = 1.5708
T(0.0028615) = 7.24272
Z(p_0, f_d) := (2*f_d + p_0)/(2*f_d - p_0)
z2p(z_0, f_d) := 2*f_d*(1 - z_0^-1)/(1 + z_0^-1)
cd(0.6, 0.93) = 0.761809
Ω(T_d, ω) := 2/T_d*tan(ω/2)
sn(0.6, 0.93) = 0.917919
# 0.917918 | 0.761809423
f_analog(f_digital., f_d) := f_d/π*tan(π*f_digital./f_d)
f_digit(f_analog, f_d) := f_d/π*atan(π*f_analog/f_d)
f_p := 4/(2*π) = 0.63662  # Гц - частота пропускания
Root2PolynomP(P) :=
    N ← rows(P) + 1
    a[N - 1] ← 0
    [a[0]; a[1]] ← [-P[0]; 1]
    for n ∈ 2 .. N - 1
        a[n] ← 1
        root ← P[n - 1]
        for i ∈ n - 1 .. 1
            a[i] ← a[i - 1] - a[i]*root
        a[0] ← -a[0]*root
    a
Root2PolynomZ(Z) :=
    N ← rows(Z) + 1
    [a[N - 1]; a[N - 2]] ← [-Z[0]; 1]
    for k ∈ 2 .. N - 1
        a[N - 1 - k] ← a[N - 1 - k + 1]
        for i ∈ k - 1 .. 1
            a[N - 1 - i] ← a[N - 1 - (i - 1)] - a[N - 1 - i]*Z[k - 1]
        a[N - 1] ← -a[N - 1]*Z[k - 1]
    a
f_s := 3/(2*π) = 0.477465  # Гц - частота подавления
ω_p := 2*π*f_p = 1.27324*π
# Нормированная полоса среза
ω_p = 4
ω_s := 2*π*f_s = 0.95493*π
# Нормированная полоса заграждения
ω_s = 3
R_p := 1
(-R_p) db = 0.891251  # Неравномерность в полосе пропускания (дБ)
G_p := (-R_p) db = 0.891251
R_s := 40
(-R_s) db = 0.01
# Уровень подавления в полосе заграждения (дБ)
G_s := (-R_s) db = 0.01
F_p := f_analog(f_p, f_d) = 0.645246
F_p = 0.0645246 f_d
f_digit(F_p, f_d) = 0.63662
F_s := f_analog(f_s, f_d) = 0.481078
F_s = 0.0481078 f_d
Ω_p := 2*π*F_p = 4.0542  # Частота среза аналогового фильтра
Ω_s := 2*π*F_s = 3.0227  # Частота заграждения аналогового фильтра
# Порядок фильтра
ε_p := sqrt(10^(R_p/10) - 1) = 0.508847
ε_s := sqrt(10^(R_s/10) - 1) = 99.995
1/ε_s = 0.0100005
ε_s/ε_p = 196.513
Ω_s/Ω_p = 0.745573
ω_p = 4
k_ω := min(ω_p, ω_s)/max(ω_p, ω_s) = 0.75
k_ε := ε_p/ε_s = 0.00508873
ω_s = 3
k_ω := Ω_s/Ω_p  # disabled
# Порядок фильтра
N := T(k_ε)*K(k_ω)/(K(k_ε)*T(k_ω)) = 4.49492
N := ceil(N) = 5
# Число парных полюсов | Наличие/отсутсвтие центрального полюса
L := Trunc(N/2, 1) = 2
r := mod(N, 2) = 1
2*L + r = 5
u(n) := (2*n - 1)/N
un := matrix(L, 1, f(n, m) ← u(n + 1))
transpose(un) = [0.2, 0.6]
m := sqrt(1 - k_ε^2) = 0.999987
k_p := m^N*product(sn(u(n), m)^4, n = 1 .. L) = 0.571562
k_ω := sqrt(1 - k_p^2) = 0.820559
# Нули
zeros := 1i/(k_ω*cd(un, k_ω)) = [1.25381i; 1.76429i]
Im(zeros) = [1.25381; 1.76429]
Ω_p/f_d = 0.40542
Ω_s/f_d = 0.30227
υ_0 := -1i/N*sn_inv(1i/ε_p, k_ε) = 0.181815
# Полюса
conj(z) := Re(z) - 1i*Im(z)
p_p :=
    pp[0] ← 1i*sn(1i*υ_0, k_ω) if r > 0
    for n ∈ 0 .. L - 1
        pp[2*n + r] ← 1i*cd(un[n] - 1i*υ_0, k_ω)
        pp[2*n + 1 + r] ← conj(pp[2*n + r])
    pp
G_p := 1/sqrt(1 + ε_p^2) = 0.891251
p_p = [-0.385353; -0.0499216 + 0.998199i; -0.0499216 - 0.998199i; -0.219111 + 0.741036i; -0.219111 - 0.741036i]
p_0 := stack(zeros, conj(zeros)) = [1.25381i; 1.76429i; -1.25381i; -1.76429i]
G_0 := 1
Polinom(P, p) := product(p - P[i], i = 0 .. rows(P) - 1)
G_0 := product(-p_0[i], i = 0 .. rows(p_0) - 1)/product(-p_p[i], i = 0 .. rows(p_p) - 1) = 21.2885
H_0(p) := G_p^(1 - r)/G_0*product(p - p_0[i], i = 0 .. rows(p_0) - 1)/product(p - p_p[i], i = 0 .. rows(p_p) - 1)
H(p) := H_0(Ω_p/p)
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p_01 := Ω_p/p_0
p_p1 := Ω_p/p_p
p_01 = [-3.23351i; -2.29792i; 3.23351i; 2.29792i]
p_p1 = [-10.5208; -0.202616 - 4.05138i; -0.202616 + 4.05138i; -1.48761 - 5.03113i; -1.48761 + 5.03113i]
H_00(p) := H_0(Ω_p/p)
H_z(z) := H(2*f_d*(1 - z^-1)/(1 + z^-1))
G_01 := product(|p_01[i]|, i = 0 .. rows(p_01) - 1)/product(|p_p1[i]|, i = 0 .. rows(p_p1) - 1) = 0.0115864
H_01(p) := G_p^(1 - r)/G_01*(-1)^r*product(p_01[i], i = 0 .. rows(p_01) - 1)/product(p_p1[i], i = 0 .. rows(p_p1) - 1)*p^r*product(p - p_01[i], i = 0 .. rows(p_01) - 1)/product(p - p_p1[i], i = 0 .. rows(p_p1) - 1)
H_02(p) := G_p^(1 - r)/G_01*Polinom(p_01, p)/Polinom(p_p1, p)
H_z01(z) := H_01(2*f_d*(1 - z^-1)/(1 + z^-1))
H_z22(z) := H_02(2*f_d*(1 - z^-1)/(1 + z^-1))
H_z00(z) := H_00(2*f_d*(1 - z^-1)/(1 + z^-1))
p_01_ :=
    stack(0, p_01) if r > 0
    p_01 otherwise
p_01_ = [0; -3.23351i; -2.29792i; 3.23351i; 2.29792i]
p_01 = [-3.23351i; -2.29792i; 3.23351i; 2.29792i]
z_0 := vectorize(Z(p_01_, f_d))
z_p := vectorize(Z(p_p1, f_d))
M := [0.1*f_s, G_s; f_s, G_s; f_p, G_p]
product(1 + z_0[n], n = r .. rows(z_0) - 1) = 15.3893
product(1 + z_p[n], n = 0 .. rows(z_p) - 1) = 16.226
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G_0z := 2^r*product(1 + z_0[n], n = r .. rows(z_0) - 1)/product(1 + z_p[n], n = 0 .. rows(z_p) - 1) = 1.89687
z_0 = [1; 0.949054 - 0.315114i; 0.973942 - 0.226798i; 0.949054 + 0.315114i; 0.973942 + 0.226798i]
z_p = [0.310583; 0.903396 - 0.381702i; 0.903396 + 0.381702i; 0.764788 - 0.413209i; 0.764788 + 0.413209i]
H_z2(z) := G_p^(1 - r)/G_0z*product(1 - z_0[n]*z^-1, n = 0 .. rows(z_0) - 1)/product(1 - z_p[n]*z^-1, n = 0 .. rows(z_p) - 1)
G_p^(1 - r) = 1
G_p^(1 - r)/G_0z = 0.527184
B := G_p^(1 - r)/G_0z*Root2PolynomZ(z_0)
A := Root2PolynomZ(z_p)
Re(B) = [0.527184; -2.55473; 5.03107; -5.03107; 2.55473; -0.527184]
Re(A) = [1; -3.64695; 5.51731; -4.22822; 1.60775; -0.22573]
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M := [0.1*f_s, (-R_s) db; f_s, (-R_s) db; f_s, (-R_p) db; f_p, (-R_p) db]
arg(z_0) = [0; -18.3677; -13.1087; 18.3677; 13.1087] deg
arg(z_p) = [0; -22.905; 22.905; -28.382; 28.382] deg
hh_z2 := vectorize(h(tt, H(f) ← H_z2(e^(1i*2*π*f/f_d))))
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|H_z(e^(1i*2*π*f_p/f_d))| = 0.891257
20*log(|H_z(e^(1i*2*π*f_p/f_d))|) = -0.999944
ff := 0, f_p/100 .. f_p*1.3
|H_z(e^(1i*2*π*f_s/f_d))| = 0.00924661
20*log(|H_z(e^(1i*2*π*f_s/f_d))|) = -40.6803
Φ(f) := integral(-|d/df1(arg(H_z(e^(1i*2*π*f1/f_d)))/π)|, f1 = 0 .. f)
Φ(f_p)/N = -0.175386
|H_z(e^(1i*2*π*(f_p + f_s)/2/f_d))| = 0.0611943
20*log(|H_z(e^(1i*2*π*(f_p + f_s)/2/f_d))|) = -24.2658
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(f_p + f_s)/2 = 0.557042
