# https://ru.dsplib.org/content/filter_butter_ap/filter_butter_ap.html
Filter(A, B, X) :=
    N ← rows(A)
    S[N - 1] ← 0
    Y[rows(X) - 1] ← 0
    a0 ← 1/A[0]
    for i ∈ 0 .. rows(X) - 1
        x ← X[i]
        y ← 0
        for j ∈ N - 1 .. 1
            [S[j], v] ← [1, 1]*S[j - 1]
            y ← y + v*B[j]*a0
            x ← x - v*A[j]*a0
        S[0] ← x
        Y[i] ← y + x*B[0]*a0
    return Y
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C(n, k) :=
    return 1 if k == 0
    return product((n - k)/i + 1, i = 1 .. k) otherwise
C(6, 2) = 15
f_d := 10  # Гц - частота дискретизации
samples := 100
n := 0 .. samples - 1
dt := 1/f_d = 0.1
df := f_d/samples = 0.1
ConjV(z) := [z; Re(z) - 1i*Im(z)]
h(t, H) := 1/f_d*integral(H(f)*e^(1i*2*π*f*t), f = -f_d/2 .. f_d/2)
tt[n] := n*dt
db(x) := 10^(x/20)
db_P(x) := 10^(x/10)
to_db(x) := 20*log(|x|)
to_dbP(x) := 10*log(|x|)
roundup(x) := Trunc(x, 1) + (Trunc(x, 1) ≠ x)
abs(z) := |z|
circle_x[n] := cos(2*π/(samples - 1)*n)
circle_y[n] := sin(2*π/(samples - 1)*n)
Z(p_0, f_d) := (2*f_d + p_0)/(2*f_d - p_0)
f_analog(f_digital., f_d) := f_d/π*tan(π*f_digital./f_d)
Ω(T_d, ω) := 2/T_d*tan(ω/2)  # Преобразование частот аналогового фильтра в частоты цифрового
Root2PolynomP(P) :=
    N ← rows(P) + 1
    a[N - 1] ← 0
    [a[0]; a[1]] ← [-P[0]; 1]
    for n ∈ 2 .. N - 1
        a[n] ← 1
        root ← P[n - 1]
        for i ∈ n - 1 .. 1
            a[i] ← a[i - 1] - a[i]*root
        a[0] ← -a[0]*root
    return a
ω_p := 2 = 0.63662*π
# Нормированная полоса среза
ω_p = 2
filter(BA, f, N) :=
    tt ← matrix(N, 1, q(n, m) ← n*dt)
    X ← matrix(N, 1, q(n, m) ← f(tt[n]))
    Y ← Filter(BA[:, 1], BA[:, 0], X)
    [tt; X; Y]
Root2PolynomZ(Z) :=
    N ← rows(Z) + 1
    [a[N - 1]; a[N - 2]] ← [-Z[0]; 1]
    for k ∈ 2 .. N - 1
        a[N - 1 - k] ← a[N - 1 - k + 1]
        for i ∈ k - 1 .. 1
            a[N - 1 - i] ← a[N - 1 - (i - 1)] - a[N - 1 - i]*Z[k - 1]
        a[N - 1] ← -a[N - 1]*Z[k - 1]
    return a
ω_s := 4 = 1.27324*π
# Нормированная полоса заграждения
ω_s = 4
f_p := ω_p/(2*π)  # Гц - частота пропускания
f_p = 0.31831
f_s := ω_s/(2*π)  # Гц - частота подавления
f_s = 0.63662
R_p := 1
G_p := (-R_p) db = 0.891251  # Неравномерность в полосе пропускания (дБ)
R_s := 40
G_s := (-R_s) db = 0.01  # Уровень подавления в полосе заграждения (дБ)
RR(h) :=
    N ← rows(h) - 1
    rr[N] ← 0
    for i ∈ 1 .. N
        rr[i] ← rr[i - 1] + h[i]
    rr
sqrt(10^(R_p/10) - 1) = 0.508847
F_p := f_analog(f_p, f_d) = 0.319375
10^(R_p/10) = 1.25893
F_s := f_analog(f_s, f_d) = 0.645246
Ω_p := 2*π*F_p = 2.00669  # Частота среза аналогового фильтра
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20*log(R_p) = 0
db(-R_p) = 0.891251
Ω_s := 2*π*F_s = 4.0542  # Частота заграждения аналогового фильтра
# Порядок фильтра
10^(-R_p/20) = 0.891251
ε_p := sqrt(10^(R_p/10) - 1) = 0.508847
k_ω :=
    [Σ, Δ] ← π/f_d*[f_s + f_p, f_s - f_p]
    (sin(Σ) + sin(Δ))/(sin(Σ) - sin(Δ))
    = 2.02034
ε_s := sqrt(10^(R_s/10) - 1) = 99.995
1/ε_s = 0.0100005
k_ε := ε_s/ε_p = 196.513
ln(k_ε) = 5.28073
k_Ω := F_s/F_p = 2.02034
ln(k_Ω) = 0.703265
k_ε := sqrt((1/G_s^2 - 1)/(1/G_p^2 - 1)) = 196.513
Ω_s = 4.0542
# Порядок фильтра
Ω_p = 2.00669
0.5*ln((1/G_s^2 - 1)/(1/G_p^2 - 1))/ln(tan(π*f_s*dt)/tan(π*f_p*dt)) = 7.50887
N := ln(k_ε)/ln(k_Ω) = 7.50887
N1 := N
N := ceil(N) = 8
α := 1/nthroot(ε_p, N) = 1.08812
N1 = 7.50887
# Число парных полюсов
L := Trunc(N/2, 1) = 4
r := mod(N, 2) = 0
2*L + r = 8
tth(N) :=
    dθ ← 0.5*π/N
    for i ∈ r, r + 2 .. N - 1
        θ[i/2] ← dθ*(i - r + 1)
        [s, c] ← [sin(θ), cos(θ)]
        [p[i]; p[i + 1]] ← -α*[s - 1i*c; s + 1i*c]
    θ
θ(n) := (2*n - 1)/(2*N)*π
θ(n) := π/N*(n - 1/2)
π/2*((i - r) - 1)/N
H_0(p) := 1/ε_p/((p - (-α))^r*product(p^2 + 2*α*sin(θ(n))*p + α^2, n = 1 .. L))
H_1(p) := 1/ε_p/((p - (-α))^r*product((p - α*(-sin(θ(n)) + 1i*cos(θ(n))))*(p - α*(-sin(θ(n)) - 1i*cos(θ(n)))), n = 1 .. L))
Kz(p) := 1/product(2*f_d - p[n], n = 0 .. N - 1)
p0 := poles(r, L)  # disabled
poles(N, α) :=
    r ← mod(N, 2)
    p[0] ← -α if r > 0
    dθ ← 0.5*π/N
    for i ∈ r, r + 2 .. N - 1
        θ ← dθ*(i - r + 1)
        [p[i]; p[i + 1]] ← ConjV(α*e^(1i*(dθ*(i - r + 1 + N))))
    p
p0 := poles(N, α)
tth(N) = [0.19635; 0.589049; 0.981748; 1.37445]
p1 := p0*Ω_p
Kz1 := Kz(p1) = 2.23387e-11
p0 = [-0.212282 + 1.06721i; -0.212282 - 1.06721i; -0.604527 + 0.904738i; -0.604527 - 0.904738i; -0.904738 + 0.604527i; -0.904738 - 0.604527i; -1.06721 + 0.212282i; -1.06721 - 0.212282i]
z_0 := matrix(N, 1, f(n, m) ← -1)
p1 = [-0.425984 + 2.14157i; -0.425984 - 2.14157i; -1.2131 + 1.81553i; -1.2131 - 1.81553i; -1.81553 + 1.2131i; -1.81553 - 1.2131i; -2.14157 + 0.425984i; -2.14157 - 0.425984i]
z_p := vectorize(Z(p1, f_d))
poles(5, α) = [-1.08812; -0.336247 + 1.03486i; -0.336247 - 1.03486i; -0.880307 + 0.639581i; -0.880307 - 0.639581i]
Kx2 := product((1 - z_p[n])/2, n = 0 .. rows(z_p) - 1) = 1.1543e-8
z_p = [0.936998 + 0.203085i; 0.936998 - 0.203085i; 0.871916 + 0.160209i; 0.871916 - 0.160209i; 0.827904 + 0.101645i; 0.827904 - 0.101645i; 0.805888 + 0.0347437i; 0.805888 - 0.0347437i]
H_2(p) := 1/ε_p*1/product(p - p1[n], n = 0 .. N - 1)
H(p) := Ω_p^N*H_2(p)
H_z2(z) := Kz1*Ω_p^N*1/ε_p*(1 + z^-1)^N/product(1 - z_p[n]*z^-1, n = 0 .. N - 1)
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(2*π*F_p)^N*Kz1/ε_p = 1.1543e-8
H(p) := H_2(p/(2*π*F_p))  # disabled
H_z(z) := H(2*f_d*(1 - z^-1)/(1 + z^-1))
H_z(1) = 1
H(1i*2*π*F_p) = 0.65374 + 0.605765i
|H(1i*2*π*F_p)| = 0.891251
product(p - p1[n], n = 0 .. N - 1)
samples := round(5*Δτ_p/dt)  # disabled
P(v) := sum(vectorize(v^2))/rows(v)
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TraceV(V) :=
    S ← ""
    for i ∈ 0 .. rows(V) - 1
        S ← concat(S, "| ", num2str(V[i]))
    S
SkipN := round(5/f_p/dt) = 157
ΔΦ(f) := mod(-arg(H_z(e^(1i*2*π*f/f_d))) + 2*π, 2*π)/(2*π*f)
GroupDelay_0(f) := -1/(2*π)*d/df(arg(H(1i*2*π*f)))
GroupDelay(f) := -1/(2*π)*d/df(arg(H_z(e^(1i*2*π*f/f_d))))
f_0 := f_p + (f_s - f_p)*0
Δτ_p := GroupDelay_0(f_p) = 4.12466
Δτ_p0 := GroupDelay_0(f_p) = 4.12466
Δφ_p := ΔΦ(f_p) = 2.76793
f_0 := f_s + (0.5*f_d - f_s)*0.2  # disabled
Δφ_s := ΔΦ(f_s) = 0.853833
Δτ_s := GroupDelay_0(f_s) = 0.792727
f_0 := f_p*1.0  # disabled
Δφ_0 := ΔΦ(0)  # disabled
Δτ_0 := GroupDelay_0(0) = 2.34751
GroupDelay(0.4*f_p) = 2.4735
samples := 2*round((Δτ_0 + 3/f_p)/dt) = 236
n := 0 .. samples - 1
B := Kz1*Ω_p^N*1/ε_p*Re(Root2PolynomZ(z_0))
[BA[:, 0]; BA[:, 1]] := [Kz1*Ω_p^N*1/ε_p*Re(Root2PolynomZ(z_0)); Re(Root2PolynomZ(z_p))]
kk := 1
tt[n] := n*dt
GroupDelay(f_p) = 4.18105
A := Re(Root2PolynomZ(z_p))
s(t) := sin(2*π*f_0*t)
ss := s(tt)
GroupDelay(f_s) = 0.800144
hh_z := vectorize(h(tt, H(f) ← H_z2(e^(1i*2*π*f/f_d))))
yy := Filter(A, B, ss)
transpose(BA) = [
    1.1543e-8, 9.23441e-8, 3.23204e-7, 6.46409e-7, 8.08011e-7, 6.46409e-7, 3.23204e-7, 9.23441e-8, 1.1543e-8;
    1, -6.88541, 20.8098, -36.0507, 39.1479, -27.2826, 11.9148, -2.98081, 0.327037
]
Δτ_s := GroupDelay_0(f_0)
Δφ_s := ΔΦ(f_0) = 2.76793
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xx :=
    x[samples - 1] ← 0
    x[0] ← 1
    x
h_z2 := Filter(A, B, xx)
r_z2 := RR(h_z2)
rr_z := RR(hh_z)
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s_l(t) := sin(2*π*0.4*f_p*t)
s_p(t) := sin(2*π*f_p*t)
s_ps(t) := sin(2*π*(f_p + f_s)/2*t)
s_s(t) := sin(2*π*f_s*t)
s_h(t) := sin(2*π*(0.5*f_d + f_s)/2*t)
s_c(t) := s_l(t) + s_p(t) + s_ps(t) + s_s(t) + s_h(t)
ss_c := s_c(tt)
yy_c := Filter(A, B, ss_c)
s_c0(t) := s_l(t) + s_p(t)
ss_c0 := s_c0(tt)
yy_c0 := Filter(A, B, ss_c0)
sum(vectorize((yy_c - yy_c0)^2))/rows(tt) = 0.0202755
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ss_l := s_l(tt)
ss_h := s_h(tt)
ss_p := s_p(tt)
ss_s := s_s(tt)
yy_l := Filter(A, B, ss_l)
ff := 0, f_s*1.2/100 .. f_s*1.2
yy_h := Filter(A, B, ss_h)
Φ(f) := integral(-|d/df1(arg(H_z(e^(1i*2*π*f1/f_d)))/(2*π))|, f1 = 0 .. f)
yy_p := Filter(A, B, ss_p)
yy_s := Filter(A, B, ss_s)
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1.25/f_p + Δτ_p = 8.05165
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t_0 := 40
τ := 30
f_0 := f_s*0.6
Δτ_f0 := GroupDelay(f_0)
A_0 := abs(H_z2(e^(1i*2*π*f_0/f_d))) = 0.411643
treangle(t, τ) := (1 - |2*t/τ|)*(|t| < τ/2)
[tt; xx0; yy0] := filter(BA, f(t) ← treangle(t - t_0, τ)*sin(2*π*f_0*(t - t_0)), 1000)
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Chirp(t, f_0, f_1, f_2, T) :=
    [Δf, t_T] ← [f_2 - f_1, mod(t, T) + T*(t < 0)]
    cos(π*(Δf/T*t_T^2 - (Δf - 2*f_0)*t_T + T/4*(Δf - 4*f_0)))
Δf ← f_2 - f_1
t4(t, T) := mod(t, T) + T*(t < 0)
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