# Рассчёт фильтра Чебышева II-рода
# https://ru.dsplib.org/content/filter_cheby2_ap/filter_cheby2_ap.html
Filter(A, B, X) :=
    N ← rows(A)
    S[N - 1] ← 0
    Y[rows(X) - 1] ← 0
    a0 ← 1/A[0]
    for i ∈ 0 .. rows(X) - 1
        x ← X[i]
        y ← 0
        for j ∈ N - 1 .. 1
            [S[j], v] ← [1, 1]*S[j - 1]
            y ← y + v*B[j]*a0
            x ← x - v*A[j]*a0
        S[0] ← x
        Y[i] ← y + x*B[0]*a0
    Y
Root2PolynomP(P) :=
    N ← rows(P) + 1
    a[N - 1] ← 0
    [a[0]; a[1]] ← [-P[0]; 1]
    for n ∈ 2 .. N - 1
        a[n] ← 1
        root ← P[n - 1]
        for i ∈ n - 1 .. 1
            a[i] ← a[i - 1] - a[i]*root
        a[0] ← -a[0]*root
    a
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Root2PolynomZ(Z) :=
    N ← rows(Z) + 1
    [a[N - 1]; a[N - 2]] ← [-Z[0]; 1]
    for k ∈ 2 .. N - 1
        a[N - 1 - k] ← a[N - 1 - k + 1]
        for i ∈ k - 1 .. 1
            a[N - 1 - i] ← a[N - 1 - (i - 1)] - a[N - 1 - i]*Z[k - 1]
        a[N - 1] ← -a[N - 1]*Z[k - 1]
    a
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Integral(f, x1, x2, dx) :=
    x ← x1
    y ← f(x)
    while x ≤ x2
        x ← x + dx
        S ← S + y + (y ← f(x))
    S*0.5*dx
RR(h) :=
    N ← rows(h) - 1
    rr[N] ← 0
    for i ∈ 1 .. N
        rr[i] ← rr[i - 1] + h[i]
    rr
f_d := 10  # Гц - частота дискретизации
dt := 1/f_d = 0.1
samples := 100
n := 0 .. samples - 1
tt[n] := n*dt
h(t, H) := 1/f_d*integral(H(f)*e^(1i*2*π*f*t), f = -f_d/2 .. f_d/2)
df := f_d/samples = 0.1
db(x) := 10^(x/20)
db_P(x) := 10^(x/10)
to_db(x) := 20*log(|x|)
to_dbP(x) := 10*log(|x|)
roundup(x) := Trunc(x, 1) + (Trunc(x, 1) ≠ x)
abs(z) := |z|
circle_x[n] := cos(2*π/(samples - 1)*n)
circle_y[n] := sin(2*π/(samples - 1)*n)
Ki(k) :=
    k_0 ← k/(1 + sqrt(1 - k*k))
    k_0*k_0
K(k) :=
    ki ← Ki(k)
    (1 + ki)*K(ki) if k - ki > 0
    π/2 otherwise
T(k) := K(sqrt(1 - k*k))
sn(u, k) :=
    ki ← Ki(k)
    sin(u*π/2) if k - ki ≤ 0
    otherwise
        w ← sn(u, ki)
        (1 + ki)/(1/w + ki*w)
cd(u, k) :=
    ki ← Ki(k)
    cos(u*π/2) if k - ki ≤ 0
    otherwise
        w ← cd(u, ki)
        (1 + ki)/(1/w + ki*w)
sn_inv(sn, k) :=
    ki ← Ki(k)
    sn_inv(2*sn/((1 + ki)*(1 + sqrt(1 - k*k*sn*sn))), ki) if k - ki > 0
    2*asin(sn)/π
cd_inv(cn, k) :=
    ki ← Ki(k)
    cd_inv(2*cn/((1 + ki)*(1 + sqrt(1 - k*k*cn*cn))), ki) if k - ki > 0
    2*acos(cn)/π
K(0.66667) = 1.80967
T(0.66667) = 1.90424
K(0.0028615) = 1.5708
T(0.0028615) = 7.24272
Ω(T_d, ω) := 2/T_d*tan(ω/2)
Z(p_0, f_d) := (2*f_d + p_0)/(2*f_d - p_0)
z2p(z_0, f_d) := 2*f_d*(1 - z_0^-1)/(1 + z_0^-1)
f_analog(f_digital., f_d) := f_d/π*tan(π*f_digital./f_d)
f_digit(f_analog, f_d) := f_d/π*atan(π*f_analog/f_d)
cd(0.6, 0.93) = 0.761809
sn(0.6, 0.93) = 0.917919
# 0.917918 | 0.761809423
C(N, ω) := cos(N*acos(ω))
sh(x) := sinh(x)
ch(x) := cosh(x)
arsh(x) := asinh(x)
arch(x) := acosh(x)
f_p := 2/(2*π)  # Гц - частота пропускания
f_s := 4/(2*π)  # Гц - частота подавления
ω_p := 2*π*f_p
# Нормированная полоса среза
ω_p = 2
ω_s := 2*π*f_s
# Нормированная полоса заграждения
ω_s = 4
R_p := 1
G_p := (-R_p) db = 0.891251  # Неравномерность в полосе пропускания (дБ)
R_s := 40
G_s := (-R_s) db = 0.01  # Уровень подавления в полосе заграждения (дБ)
F_p := f_analog(f_p, f_d) = 0.319375
F_p = 0.0319375 f_d
f_digit(F_p, f_d) = 0.31831
F_s := f_analog(f_s, f_d) = 0.645246
F_s = 0.0645246 f_d
Ω_p := 2*π*F_p = 2.00669  # Частота среза аналогового фильтра
Ω_s := 2*π*F_s = 4.0542  # Частота заграждения аналогового фильтра
# Порядок фильтра
ε_p := sqrt(10^(R_p/10) - 1) = 0.508847
ε_s := sqrt(10^(R_s/10) - 1) = 99.995
1/ε_s = 0.0100005
G_p := 1/sqrt(1 + ε_p^2) = 0.891251
ε_s/ε_p = 196.513
Ω_s/Ω_p = 2.02034
k_ω := Ω_p/Ω_s = 0.494966
k_ε := ε_p/ε_s = 0.00508873
# Порядок фильтра
N := arch(ε_s/ε_p)/arch(f_s/f_p) = 4.53611
N := ceil(N) = 5
# Число парных полюсов | Наличие/отсутсвтие центрального полюса
L := Trunc(N/2, 1) = 2
r := mod(N, 2) = 1
2*L + r = 5
G_s := 1/sqrt(1 + ε_s^2) = 0.01
G_p := 1/sqrt(1 + ε_p^2) = 0.891251
β := 1/N*arsh(ε_s) = 1.05966
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θ(n) := (2*n - 1)/(2*N)*π
θ(n) := π/N*(n - 1/2)
conj(z) := Re(z) - 1i*Im(z)
poles(r, L) :=
    i ← 0
    if r ≠ 0
        P[i] ← -1/sh(β)
        i ← 1
    for n ∈ 1 .. L
        θ ← π*(n - 0.5)/N
        P[i] ← 1i/cos(θ + 1i*β)
        P[i + 1] ← conj(P[i])
        i ← i + 2
    P
zeros(L) :=
    for n ∈ 1 .. L
        θ ← π*(n - 0.5)/N
        [P[2*n - 2]; P[2*n - 1]] ← [1i/cos(θ); -1i/cos(θ)]
    P
p_p := poles(r, L) = [-0.78777; -0.155916 + 0.61087i; -0.155916 - 0.61087i; -0.524799 + 0.485389i; -0.524799 - 0.485389i]
p_0 := zeros(L) = [1.05146i; -1.05146i; 1.7013i; -1.7013i]
ω_h := ch(1/N*1/ch(1/ε_p)) = 1.00151
f_h := ω_h/(2*π)
G_0 := product(-p_0[i], i = 0 .. rows(p_0) - 1)/product(-p_p[i], i = 0 .. rows(p_p) - 1)
H_0(p) := 1/G_0*product(p - p_0[i], i = 0 .. rows(p_0) - 1)/product(p - p_p[i], i = 0 .. rows(p_p) - 1)
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H(p) := H_0(p/Ω_p)
Ω_p := 2*π*F_p
Ω_p = 2.00669
ff := [0; f_p; f_s; f_d/2] = [0; 0.31831; 0.63662; 5]
Polinom(P, p) := product(p - P[i], i = 0 .. rows(P) - 1)
H_z(z) := H(2*f_d*(1 - z^-1)/(1 + z^-1))
# Масштабируем нули и полюса
p_01 := p_0*Ω_p
p_p1 := p_p*Ω_p
p_01 = [2.10996i; -2.10996i; 3.41399i; -3.41399i]
p_p1 = [-1.58081; -0.312875 + 1.22583i; -0.312875 - 1.22583i; -1.05311 + 0.974027i; -1.05311 - 0.974027i]
G_01 := product(|p_01[i]|, i = 0 .. rows(p_01) - 1)/product(|p_p1[i]|, i = 0 .. rows(p_p1) - 1) = 9.96615
H_01(p) := G_p^(1 - r)/G_01*product(p - p_01[i], i = 0 .. rows(p_01) - 1)/product(p - p_p1[i], i = 0 .. rows(p_p1) - 1)
H_z1(z) := H_01(2*f_d*(1 - z^-1)/(1 + z^-1))
H_02(p) := G_p^(1 - r)/G_01*Polinom(p_01, p)/Polinom(p_p1, p)
H_z22(z) := H_02(2*f_d*(1 - z^-1)/(1 + z^-1))
z_0 := vectorize(Z(p_01, f_d))
z_p := vectorize(Z(p_p1, f_d))
z_0 :=
    stack(-1, z_0) if r > 0
    z_0 otherwise
G_0z := product(1 - z_0[n], n = 0 .. rows(z_0) - 1)/product(1 - z_p[n], n = 0 .. rows(z_p) - 1) = 237.617
H_z2(z) := 1/G_0z*product(1 - z_0[n]*z^-1, n = 0 .. rows(z_0) - 1)/product(1 - z_p[n]*z^-1, n = 0 .. rows(z_p) - 1)
H1(p) := H_01(p)
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ff := 0, f_s*1.1/100 .. f_s*1.1
hh_z2 := vectorize(h(tt, H(f) ← H_z2(e^(1i*2*π*f/f_d))))
Φ(f) := integral(d/df1(arg(H_z(e^(1i*2*π*f1/f_d)))/π), f1 = 0 .. f)
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GroupDelay_0(f) := -1/(2*π)*d/df(arg(H(1i*2*π*f)))
GroupDelay(f) := -1/(2*π)*d/df(arg(H_z(e^(1i*2*π*f/f_d))))
ΔΦ(f) := mod(-arg(H_z(e^(1i*2*π*f/f_d))) + 2*π, 2*π)/(2*π*f)
f_0 := f_h*1.2
Δτ_p := GroupDelay_0(f_p) = 1.31474
Δτ_p0 := GroupDelay_0(f_p) = 1.31474
Δφ_p := ΔΦ(f_p) = 2.78717
f_0 := f_p + (f_s - f_p)*0.1  # disabled
Δφ_s := ΔΦ(f_s) = 0.123439
Δτ_s := GroupDelay_0(f_s) = 0.28034
f_0 := f_s + (0.5*f_d - f_s)*0.2  # disabled
Δφ_0 := ΔΦ(0)  # disabled
Δτ_0 := GroupDelay_0(0) = 2.04709
f_0 := f_p*1.0  # disabled
GroupDelay(0.4*f_p) = 2.8763
samples := 2*round((Δτ_0 + 3/f_p)/dt) = 230
n := 0 .. samples - 1
B := G_p^(1 - r)/G_0z*Re(Root2PolynomZ(z_0))
[BA[:, 0]; BA[:, 1]] := [G_p^(1 - r)/G_0z*Re(Root2PolynomZ(z_0)); Re(Root2PolynomZ(z_p))]
kk := 1
tt[n] := n*dt
GroupDelay(f_p) = 1.31663
A := Re(Root2PolynomZ(z_p))
s(t) := sin(2*π*f_0*t)
ss := s(tt)
GroupDelay(f_s) = 0.283792
hh_z := vectorize(h(tt, H(f) ← H_z2(e^(1i*2*π*f/f_d))))
yy := Filter(A, B, ss)
transpose(BA) = [
    0.00420846, -0.0119635, 0.00777598, 0.00777598, -0.0119635, 0.00420846;
    1, -4.56939, 8.36899, -7.67869, 3.52894, -0.649811
]
Δτ_s := GroupDelay_0(f_0)
Δφ_s := ΔΦ(f_0) = 2.79238
Δτ_s := GroupDelay_0(f_0)
Δφ_s := ΔΦ(f_0) = 2.79238
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xx :=
    x[samples - 1] ← 0
    x[0] ← 1
    x
h_z2 := Filter(A, B, xx)
r_z2 := RR(h_z2)
rr_z := RR(hh_z)
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s_l(t) := sin(2*π*0.4*f_p*t)
s_p(t) := sin(2*π*f_p*t)
s_ps(t) := sin(2*π*(f_p + f_s)/2*t)
s_s(t) := sin(2*π*f_s*t)
s_h(t) := sin(2*π*(0.5*f_d + f_s)/2*t)
s_c(t) := s_l(t) + s_p(t) + s_ps(t) + s_s(t) + s_h(t)
ss_c := s_c(tt)
yy_c := Filter(A, B, ss_c)
s_c0(t) := s_l(t) + s_p(t)
ss_c0 := s_c0(tt)
yy_c0 := Filter(A, B, ss_c0)
sum(vectorize((yy_c - yy_c0)^2))/rows(tt) = 0.00734308
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ss_l := s_l(tt)
ss_h := s_h(tt)
ss_p := s_p(tt)
ss_s := s_s(tt)
yy_l := Filter(A, B, ss_l)
ff := 0, f_s*1.2/100 .. f_s*1.2
yy_h := Filter(A, B, ss_h)
Φ(f) := integral(-|d/df1(arg(H_z(e^(1i*2*π*f1/f_d)))/(2*π))|, f1 = 0 .. f)
yy_p := Filter(A, B, ss_p)
yy_s := Filter(A, B, ss_s)
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1.25/f_p + Δτ_p = 5.24173
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