# Рассчёт Эллиптического фильтра
# https://ru.dsplib.org/content/filter_ellip_ap/filter_ellip_ap.html
Filter(A, B, X) :=
    N ← rows(A)
    S[N - 1] ← 0
    Y[rows(X) - 1] ← 0
    a0 ← 1/A[0]
    for i ∈ 0 .. rows(X) - 1
        x ← X[i]
        y ← 0
        for j ∈ N - 1 .. 1
            [S[j], v] ← [1, 1]*S[j - 1]
            y ← y + v*B[j]*a0
            x ← x - v*A[j]*a0
        S[0] ← x
        Y[i] ← y + x*B[0]*a0
    Y
Root2PolynomP(P) :=
    N ← rows(P) + 1
    a[N - 1] ← 0
    [a[0]; a[1]] ← [-P[0]; 1]
    for n ∈ 2 .. N - 1
        a[n] ← 1
        root ← P[n - 1]
        for i ∈ n - 1 .. 1
            a[i] ← a[i - 1] - a[i]*root
        a[0] ← -a[0]*root
    a
Root2PolynomZ(Z) :=
    N ← rows(Z) + 1
    [a[N - 1]; a[N - 2]] ← [-Z[0]; 1]
    for k ∈ 2 .. N - 1
        a[N - 1 - k] ← a[N - 1 - k + 1]
        for i ∈ k - 1 .. 1
            a[N - 1 - i] ← a[N - 1 - (i - 1)] - a[N - 1 - i]*Z[k - 1]
        a[N - 1] ← -a[N - 1]*Z[k - 1]
    a
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RR(h) :=
    N ← rows(h) - 1
    rr[N] ← 0
    for i ∈ 1 .. N
        rr[i] ← rr[i - 1] + h[i]
    rr
f_d := 10
f_d/2 = 5
samples := 120
dt := 1/f_d = 0.1
n := 0 .. samples - 1
tt[n] := n*dt
h(t, H) := 1/f_d*integral(H(f)*e^(1i*2*π*f*t), f = -f_d/2 .. f_d/2)
df := f_d/samples = 0.0833333
db(x) := 10^(x/20)
db_P(x) := 10^(x/10)
to_db(x) := 20*log(|x|)
to_dbP(x) := 10*log(|x|)
roundup(x) := Trunc(x, 1) + (Trunc(x, 1) ≠ x)
abs(z) := |z|
circle_x[n] := cos(2*π/(samples - 1)*n)
circle_y[n] := sin(2*π/(samples - 1)*n)
Ki(k) :=
    k_0 ← k/(1 + sqrt(1 - k*k))
    k_0*k_0
K(k) :=
    return π/2 if k == 0
    return ∞ if k == 1
    ki ← Ki(k)
    (1 + ki)*K(ki) if k - ki > 0
    π/2 otherwise
T(k) := K(sqrt(1 - k*k))
sn(u, k) :=
    return sin(u*π/2) if k == 0
    return tanh(u) if k == 1
    ki ← Ki(k)
    sin(u*π/2) if k - ki ≤ 0
    otherwise
        w ← sn(u, ki)
        (1 + ki)/(1/w + ki*w)
cd(u, k) :=
    return cos(u*π/2) if k == 0
    return sech(u) if k == 1
    ki ← Ki(k)
    cos(u*π/2) if k - ki ≤ 0
    otherwise
        w ← cd(u, ki)
        (1 + ki)/(1/w + ki*w)
sn_inv(sn, k) :=
    ki ← Ki(k)
    return sn_inv(2*sn/((1 + ki)*(1 + sqrt(1 - k*k*sn*sn))), ki) if k - ki > 0
    2/π*asin(sn) otherwise
KK(k) :=
    return π/2 if k == 0
    return ∞ if k == 1
    ki ← Ki(k)
    (1 + ki)*K(ki) if k - ki > 0
    π/2 otherwise
K(0.66667) = 1.80967
K(0.0028615) = 1.5708
T(0.66667) = 1.90424
T(0.0028615) = 7.24272
cd_inv(cn, k) :=
    ki ← Ki(k)
    return cd_inv(2*cn/((1 + ki)*(1 + sqrt(1 - k*k*cn*cn))), ki) if k - ki > 0
    2/π*acos(cn) otherwise
Z(p_0, f_d) := (2*f_d + p_0)/(2*f_d - p_0)
z2p(z_0, f_d) := 2*f_d*(1 - z_0^-1)/(1 + z_0^-1)
sn(0.6, 0.5) = 0.82852
cd(0.6, 0) = 0.587785
cd(0.6, 0.93) = 0.761809
sn(0.6, 0.93) = 0.917919
sn_inv(sn(0.6, 0.5), 0.5) = 0.6
tanh(0.6) = 0.53705
0.917918
0.761809423
sin(0.6) = 0.564642
cos(0.6*K(0)) = 0.587785
sech(0.6) = 0.843551
Ω(T_d, ω) := 2/T_d*tan(ω/2)
f_analog(f_digital., f_d) := f_d/π*tan(π*f_digital./f_d)
f_digit(f_analog, f_d) := f_d/π*atan(π*f_analog/f_d)
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f_p := 2/(2*π) = 0.31831  # Гц - частота пропускания
f_s := 4/(2*π) = 0.63662  # Гц - частота подавления
ω_p := 2*π*f_p = 0.63662*π
# Нормированная полоса среза
ω_p = 2
ω_s := 2*π*f_s = 1.27324*π
# Нормированная полоса заграждения
ω_s = 4
R_p := 1
G_p := (-R_p) db = 0.891251  # Неравномерность в полосе пропускания (дБ)
R_s := 40
G_s := (-R_s) db = 0.01  # Уровень подавления в полосе заграждения (дБ)
F_p := f_analog(f_p, f_d) = 0.319375
F_p = 0.0319375 f_d
f_digit(F_p, f_d) = 0.31831
F_s := f_analog(f_s, f_d) = 0.645246
F_s = 0.0645246 f_d
Ω_p := 2*π*F_p = 2.00669  # Частота среза аналогового фильтра
Ω_s := 2*π*F_s = 4.0542  # Частота заграждения аналогового фильтра
# Порядок фильтра
ε_p := sqrt(10^(R_p/10) - 1) = 0.508847
ε_s := sqrt(10^(R_s/10) - 1) = 99.995
1/ε_s = 0.0100005
ε_s/ε_p = 196.513
Ω_s/Ω_p = 2.02034
k_ω := ω_p/ω_s = 0.5
k_ω := F_p/F_s = 0.494966
k_ε := ε_p/ε_s = 0.00508873
Order_Elliptic(f_p, f_s, G_p, G_s) :=
    [G2_p, G2_s] ← [G_p^2, G_s^2]
    [k_G2, k_f] ← [G2_s/G2_p*(1 - G2_p)/(1 - G2_s), f_p/f_s]
    K(sqrt(1 - k_G2))/K(sqrt(k_G2))*K(k_f)/K(sqrt(1 - k_f^2))
N_d := Order_Elliptic(F_p, F_s, G_p, G_s)
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# Порядок фильтра
N_d := T(k_ε)*K(k_ω)/(K(k_ε)*T(k_ω)) = 3.29862
N := ceil(N_d) = 4
# Число парных полюсов
# Наличие/отсутсвтие центрального полюса
Order_Elliptic(F_p, F_s, G_p, G_s) = 3.29862
L := Trunc(N/2, 1) = 2
r := mod(N, 2) = 0
2*L + r = 4
N_d - Order_Elliptic(f_p, f_s, G_p, G_s) = -0.0191951
u(n) := (2*n - 1)/N
un := matrix(L, 1, f(n, m) ← u(n + 1))
transpose(un) = [0.25, 0.75]
Order_Elliptic(f_p, f_p*1, G_p, G_s) = 49.473
Order_Elliptic(f_p, f_d/2, G_p, G_s) = 1.61061
Order_Elliptic(1.2e-5, f_s, G_p, G_s) = 0.543567
Order_Elliptic(f_s*1, f_s, G_p, G_s) = 51.5051
m := sqrt(1 - k_ε^2) = 0.999987
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k_p := m^N*product(sn(u(n), m)^4, n = 1 .. L) = 0.751393
k_ω := sqrt(1 - k_p^2) = 0.659855
# Нули
zeros := 1i/(k_ω*cd(un, k_ω)) = [1.60955i; 3.52529i]
Im(zeros) = [1.60955; 3.52529]
Ω_p/f_d = 0.200669
Ω_s/f_d = 0.40542
υ_0 := -1i/N*sn_inv(1i/ε_p, k_ε) = 0.227265
# Полюса
Order_Elliptic(f_p, f_s, G_p, G_s1)
G_s = 0.01
conj(z) := Re(z) - 1i*Im(z)
p_p :=
    pp[0] ← 1i*sn(1i*υ_0, k_ω) if r > 0
    for n ∈ 0 .. L - 1
        pp[2*n + r] ← 1i*cd(un[n] - 1i*υ_0, k_ω)
        pp[2*n + 1 + r] ← conj(pp[2*n + r])
    pp
G_p := 1/sqrt(1 + ε_p^2) = 0.891251
p_p = [-0.105281 + 0.993711i; -0.105281 - 0.993711i; -0.364291 + 0.478603i; -0.364291 - 0.478603i]
p_0 := stack(zeros, conj(zeros)) = [1.60955i; 3.52529i; -1.60955i; -3.52529i]
G_0 := 1
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G_0 := product(-p_0[i], i = 0 .. rows(p_0) - 1)/product(-p_p[i], i = 0 .. rows(p_p) - 1) = 89.1251
H_0(p) := G_p^(1 - r)/G_0*product(p - p_0[i], i = 0 .. rows(p_0) - 1)/product(p - p_p[i], i = 0 .. rows(p_p) - 1)
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Ω_p = 2.00669
# Масштабируем передаточную функцию фильтра на требуемую частоту пропускания
Ω_p := 2*π*F_p
Ω_p = 2.00669
H(p) := H_0(p/Ω_p)
# Делаем преобразование плоскости p в плоскость z путём подстановки p == 2*f_d*(1 - z^-1)/(1 + z^-1)
H_z(z) := H(2*f_d*(1 - z^-1)/(1 + z^-1))
Polinom(P, p) := product(p - P[i], i = 0 .. rows(P) - 1)
# Масштабируем нули и полюса
p_01 := p_0*Ω_p
p_p1 := p_p*Ω_p
p_01 = [3.22987i; 7.07417i; -3.22987i; -7.07417i]
p_0 = [1.60955i; 3.52529i; -1.60955i; -3.52529i]
p_p1 = [-0.211267 + 1.99407i; -0.211267 - 1.99407i; -0.73102 + 0.960409i; -0.73102 - 0.960409i]
p_p = [-0.105281 + 0.993711i; -0.105281 - 0.993711i; -0.364291 + 0.478603i; -0.364291 - 0.478603i]
G_01 := product(-p_01[i], i = 0 .. rows(p_01) - 1)/product(-p_p1[i], i = 0 .. rows(p_p1) - 1) = 89.1251
H_01(p) := G_p^(1 - r)/G_01*product(p - p_01[i], i = 0 .. rows(p_01) - 1)/product(p - p_p1[i], i = 0 .. rows(p_p1) - 1)
H_z1(z) := H_01(2*f_d*(1 - z^-1)/(1 + z^-1))
H_02(p) := G_p^(1 - r)/G_01*Polinom(p_01, p)/Polinom(p_p1, p)
H_z22(z) := H_02(2*f_d*(1 - z^-1)/(1 + z^-1))
p_01 = [3.22987i; 7.07417i; -3.22987i; -7.07417i]
# Преобразуем нули и полюса в плоскость Z(p, f_d) := (2*f_d + p)/(2*f_d - p)
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z_0 := vectorize(Z(p_01, f_d))
z_p := vectorize(Z(p_p1, f_d))
z_0 :=
    stack(-1, z_0) if r > 0
    z_0 otherwise
G_0z := 2^r*product(1 - z_0[n], n = r .. rows(z_0) - 1)/product(1 - z_p[n], n = 0 .. rows(z_p) - 1) = 85.7177
z_0 = [0.949165 + 0.314778i; 0.777604 + 0.628754i; 0.949165 - 0.314778i; 0.777604 - 0.628754i]
z_p = [0.960015 + 0.193378i; 0.960015 - 0.193378i; 0.925344 + 0.0891957i; 0.925344 - 0.0891957i]
H_z2(z) := G_p^(1 - r)/G_0z*product(1 - z_0[n]*z^-1, n = 0 .. rows(z_0) - 1)/product(1 - z_p[n]*z^-1, n = 0 .. rows(z_p) - 1)
H_z2(1) = 0.891251
abs(H_z2(e^(1i*2*π*F_s/f_d))) = 0.00995448
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arg(z_0) = [0.10193; 0.216435; -0.10193; -0.216435]*π
FF := [0; F_p; F_s; f_d/2]
H1(p) := H_01(p)
ff := [0; f_p; f_s; f_d/2]
vectorize(H_z2(e^(1i*2*π*ff/f_d))) = [0.891251; -0.666332 + 0.591887i; -0.00870342 - 0.00491297i; 0.01]
vectorize(|H_z2(e^(1i*2*π*ff/f_d))|) = [0.891251; 0.891251; 0.00999434; 0.01]
vectorize(|H_z2(e^(1i*2*π*FF/f_d))|) = [0.891251; 0.877613; 0.00995448; 0.01]
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20*log(abs(H_z(e^(1i*2*π*f_s/f_d)))) = -40.0049
hh_z2 := vectorize(h(tt, H(f) ← H_z2(e^(1i*2*π*f/f_d))))
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ff := 0, f_s/100 .. f_s
|H_z(e^(1i*2*π*f_p/f_d))| = 0.891251
20*log(|H_z(e^(1i*2*π*f_p/f_d))|) = -1
|H_z(e^(1i*2*π*f_s/f_d))| = 0.00999434
20*log(|H_z(e^(1i*2*π*f_s/f_d))|) = -40.0049
Φ(f) := integral(d/df1(arg(H_z(e^(1i*2*π*f1/f_d)))/π), f1 = 0 .. f)
|H_z(e^(1i*2*π*(f_p + f_s)/2/f_d))| = 0.0113416
20*log(|H_z(e^(1i*2*π*(f_p + f_s)/2/f_d))|) = -38.9065
(f_p + f_s)/2 = 0.477465
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GroupDelay_0(f) := -1/(2*π)*d/df(arg(H(1i*2*π*f)))
GroupDelay(f) := -1/(2*π)*d/df(arg(H_z(e^(1i*2*π*f/f_d))))
ΔΦ(f) := mod(-arg(H_z(e^(1i*2*π*f/f_d))) + 2*π, 2*π)/(2*π*f)
f_0 := f_p + (f_s - f_p)*0.1
Δτ_p := GroupDelay_0(f_p) = 5.27405
Δτ_p0 := GroupDelay_0(f_p) = 5.27405
Δφ_p := ΔΦ(f_p) = 1.93395
f_0 := f_s + (0.5*f_d - f_s)*0.2  # disabled
Δφ_s := ΔΦ(f_s) = 0.656924
Δτ_s := GroupDelay_0(f_s) = 0.161676
f_0 := f_p*1.0  # disabled
Δφ_0 := ΔΦ(0)  # disabled
Δτ_0 := GroupDelay_0(0) = 1.1087
GroupDelay(0.4*f_p) = 1.6799
samples := 2*round((Δτ_0 + 3/f_p)/dt) = 210
n := 0 .. samples - 1
B := G_p^(1 - r)/G_0z*Re(Root2PolynomZ(z_0))
[BA[:, 0]; BA[:, 1]] := [G_p^(1 - r)/G_0z*Re(Root2PolynomZ(z_0)); Re(Root2PolynomZ(z_p))]
kk := 1
tt[n] := n*dt
GroupDelay(f_p) = 5.3096
A := Re(Root2PolynomZ(z_p))
s(t) := sin(2*π*f_0*t)
ss := s(tt)
GroupDelay(f_s) = 0.162234
hh_z := vectorize(h(tt, H(f) ← H_z2(e^(1i*2*π*f/f_d))))
yy := Filter(A, B, ss)
transpose(BA) = [0.0103975, -0.0359082, 0.0514916, -0.0359082, 0.0103975; 1, -3.77072, 5.37662, -3.43418, 0.828805]
Δτ_s := GroupDelay_0(f_0)
Δφ_s := ΔΦ(f_0) = 2.13617
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xx :=
    x[samples - 1] ← 0
    x[0] ← 1
    x
h_z2 := Filter(A, B, xx)
r_z2 := RR(h_z2)
rr_z := RR(hh_z)
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s_l(t) := sin(2*π*0.4*f_p*t)
s_p(t) := sin(2*π*f_p*t)
s_ps(t) := sin(2*π*(f_p + f_s)/2*t)
s_s(t) := sin(2*π*f_s*t)
s_h(t) := sin(2*π*(0.5*f_d + f_s)/2*t)
s_c(t) := s_l(t) + s_p(t) + s_ps(t) + s_s(t) + s_h(t)
ss_c := s_c(tt)
yy_c := Filter(A, B, ss_c)
s_c0(t) := s_l(t) + s_p(t)
ss_c0 := s_c0(tt)
yy_c0 := Filter(A, B, ss_c0)
sum(vectorize((yy_c - yy_c0)^2))/rows(tt) = 0.0160509
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ss_l := s_l(tt)
ss_h := s_h(tt)
ss_p := s_p(tt)
ss_s := s_s(tt)
yy_l := Filter(A, B, ss_l)
ff := 0, f_s*1.2/100 .. f_s*1.2
yy_h := Filter(A, B, ss_h)
Φ(f) := integral(-|d/df1(arg(H_z(e^(1i*2*π*f1/f_d)))/(2*π))|, f1 = 0 .. f)
yy_p := Filter(A, B, ss_p)
yy_s := Filter(A, B, ss_s)
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1.25/f_p + Δτ_p = 9.20104
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