f_d := 5000
samples := 100
n := 0 .. samples - 1
dt := f_d^-1
tt[n] := n*dt
h(t, H) := 1/f_d*integral(H(f)*e^(1i*2*π*f*t), f = -f_d/2 .. f_d/2)
df := f_d/samples = 50
to_db(x) := 20*log(|x|)
roundup(x) := Trunc(x, 1) + (Trunc(x, 1) ≠ x)
conj(z) := Re(z) - 1i*Im(z)
circle_x[n] := cos(2*π/(samples - 1)*n)
db(x) := 10^(x/20)
to_dbP(x) := 10*log(|x|)
abs(z) := |z|
db_P(x) := 10^(x/10)
circle_y[n] := sin(2*π/(samples - 1)*n)
Ki(k) :=
    k_0 ← k/(1 + sqrt(1 - k*k))
    k_0*k_0
sn(u, k) :=
    ki ← Ki(k)
    sin(u*π/2) if k - ki ≤ 0
    otherwise
        w ← sn(u, ki)
        (1 + ki)/(1/w + ki*w)
cd(u, k) :=
    ki ← Ki(k)
    cos(u*π/2) if k - ki ≤ 0
    otherwise
        w ← cd(u, ki)
        (1 + ki)/(1/w + ki*w)
sn_inv(sn, k) :=
    ki ← Ki(k)
    sn_inv(2*sn/((1 + ki)*(1 + sqrt(1 - k*k*sn*sn))), ki) if k - ki > 0
    2*asin(sn)/π
Z(p_0, f_d) := (2*f_d + p_0)/(2*f_d - p_0)
z2p(z_0, f_d) := 2*f_d*(1 - z_0^-1)/(1 + z_0^-1)
K(k) :=
    ki ← Ki(k)
    (1 + ki)*K(ki) if k - ki > 0
    π/2 otherwise
T(k) := K(sqrt(1 - k*k))
Ω(T_d, ω) := 2/T_d*tan(ω/2)
f_analog(f_digital., f_d) := f_d/π*tan(π*f_digital./f_d)
NormP(P_0, P_p) := product(-P_0[i], i = 0 .. rows(P_0) - 1)/product(-P_p[i], i = 0 .. rows(P_p) - 1)
f_digit(f_analog, f_d) := f_d/π*atan(π*f_analog/f_d)
[f_p; f_s] := [500; 1500]
[R_p; R_s] := [1; 30]
EllipticLowpassPoles(f_d, f_p, f_s, R_p, R_s) :=
    [ε_p, ε_s] ← [sqrt(10^(R_p/10) - 1), sqrt(10^(R_s/10) - 1)]
    k_ε ← ε_p/ε_s
    k_ω ← f_p/f_s
    N ← ceil(T(k_ε)*K(k_ω)/(K(k_ε)*T(k_ω)))
    L ← Trunc(N/2, 1)
    u(n) ← (2*n - 1)/N
    un ← matrix(L, 1, f(n, m) ← u(n + 1))
    m ← sqrt(1 - k_ε^2)
    k_p ← m^N*product(sn(u(n), m)^4, n = 1 .. L)
    k_w ← sqrt(1 - k_p^2)
    p0_0 ← 1i/(k_w*cd(un, k_w))
    p0_0 ← stack(p0_0, conj(p0_0))
    p0_p ←
        r ← mod(N, 2)
        υ_0 ← -1i/N*sn_inv(1i/ε_p, k_ε)
        pp[0] ← 1i*sn(1i*υ_0, k_w) if r > 0
        for n ∈ 0 .. L - 1
            pp[2*n + r] ← 1i*cd(un[n] - 1i*υ_0, k_w)
            pp[2*n + 1 + r] ← conj(pp[2*n + r])
        pp
    [G_p, G_0] ← [1/sqrt(1 + ε_p^2), NormP(p0_0, p0_p)]
    Ω_p ← 2*π*f_analog(f_p, f_d)
    [p0_0*Ω_p, G_p^(1 - r); p0_p*Ω_p, G_0]
ButterortLowpassPoles(f_d, f_p, f_s, R_p, R_s) :=
    [ε_p, ε_s] ← [sqrt(10^(R_p/10) - 1), sqrt(10^(R_s/10) - 1)]
    [F_p, F_s] ← [f_analog(f_p, f_d), f_analog(f_s, f_d)]
    N ← ceil(ln(ε_s/ε_p)/ln(F_s/F_p))
    α ← ε_p^(-1/N)
    p0 ←
        r ← mod(N, 2)
        p[0] ← -α if r > 0
        for i ∈ r, r + 2 .. N - 1
            θ ← π*(i - 0.5)/N
            [s, c] ← [sin(θ), cos(θ)]
            [p[i]; p[i + 1]] ← -α*[s - 1i*c; s + 1i*c]
        p
    2*π*F_p*p0
FC(n, k) := (n^2 + n + k - k^2)/(k*2)
FC(3, 1) = 6
FC(3, 2)*FC(3, 1) = 15
FC(3, 3)*FC(3, 2)*FC(3, 1) = 15
[p_0; p_p] := EllipticLowpassPoles(f_d, f_p, f_s, R_p, R_s) = [[6347.6i; -6347.6i], 1; [-1818.52; -667.132 + 3206.91i; -667.132 - 3206.91i], 6.7097]
p_0 = [6347.6i; -6347.6i]
p_p = [-1818.52; -667.132 + 3206.91i; -667.132 - 3206.91i]
