# https://ru.dsplib.org/content/filter_butter_ap/filter_butter_ap.html
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db(x) := 10^(x/20)
db_P(x) := 10^(x/10)
to_db(x) := 20*log(|x|)
to_dbP(x) := 10*log(|x|)
roundup(x) := Trunc(x, 1) + (Trunc(x, 1) ≠ x)
abs(z) := |z|
samples := 100
n := 0 .. samples - 1
circle_x[n] := cos(2*π/(samples - 1)*n)
circle_y[n] := sin(2*π/(samples - 1)*n)
Z(p_0, f_d) := (2*f_d + p_0)/(2*f_d - p_0)
PolynomP(p, P) := product(p - P[n], n = 0 .. rows(P) - 1)
PolynomZ(z, Z) := product(1 - Z[n]*z^-1, n = 0 .. rows(Z) - 1)
HP(p, P_0, P_p) := PolynomP(p, P_0)/PolynomP(p, P_p)
HZ(z, Z_0, Z_p) := PolynomZ(z, Z_0)/PolynomZ(z, Z_p)
f_p := 10  # Гц - частота пропускания
f_d := 5000  # Гц - частота дискретизации
f_s := 40  # Гц - частота подавления
dt := 1/f_d = 0.0002
tt[n] := n*dt
h(t, H) := 1/f_d*integral(H(f)*e^(1i*2*π*f*t), f = -f_d/2 .. f_d/2)
ω_p := 2*π*f_p/f_d = 0.004*π  # Нормированная полоса среза
ω_p = 0.0125664
ω_s := 2*π*f_s/f_d = 0.016*π
# Нормированная полоса заграждения
ω_s = 0.0502655
R_p := 1
(-R_p) db = 0.891251  # Неравномерность в полосе пропускания (дБ)
R_s := 30
(-R_s) db = 0.0316228  # Уровень подавления в полосе заграждения (дБ)
df := f_d/samples = 50
Ω(T_d, ω) := 2/T_d*tan(ω/2)  # Преобразование частот аналогового фильтра в частоты цифрового
f_analog(f_digital., f_d) := f_d/π*tan(π*f_digital./f_d)
F_p := f_analog(f_p, f_d) = 10.0001
F_s := f_analog(f_s, f_d) = 40.0084
Ω_p := 2*π*F_p = 62.8327  # Частота среза аналогового фильтра
Ω_s := 2*π*F_s = 251.38  # Частота заграждения аналогового фильтра
# Порядок фильтра
ε_p := sqrt(10^(R_p/10) - 1) = 0.508847
G_p := 1/sqrt(1 + ε_p^2) = 0.891251
ppf(P_p, P_0, f_min, f_max) :=
    count_p ← rows(P_p)
    count_0 ← rows(P_0)
    ω_min ← 2*π*f_min
    ω_max ← 2*π*f_max
    Δω ← (ω_max - ω_min)/2
    ω2_c ← ω_min*ω_max
    p01[2*count_p] ← 0
    for i ∈ 0 .. count_p - 1
        pdw ← P_p[i]*Δω
        [p1[i*2]; p1[i*2 + 1]] ← [pdw + sqrt(pdw^2 - ω2_c); pdw - sqrt(pdw^2 - ω2_c)]
    for i ∈ 0 .. count_0 - 1
        p0dw ← P_0[i]*Δω
        [p01[i*2]; p01[i*2 + 1]] ← [p0dw + sqrt(p0dw^2 - ω2_c); p0dw - sqrt(p0dw^2 - ω2_c)]
    [p1; p01]
ε_s := sqrt(10^(R_s/10) - 1) = 31.607
1/ε_s = 0.0316386
G_s := 1/sqrt(1 + ε_s^2) = 0.0316228
ε_s/ε_p = 62.1148
Ω_s/Ω_p = 4.00079
# Порядок фильтра
ppf_poles(P, f_min, f_max) :=
    count ← rows(P)
    ω_min ← 2*π*f_min
    ω_max ← 2*π*f_max
    Δω ← (ω_max - ω_min)/2
    ω2_c ← ω_min*ω_max
    for i ∈ 0 .. count - 1
        pdw ← P[i]*Δω
        [p1[i*2]; p1[i*2 + 1]] ← [pdw + sqrt(pdw^2 - ω2_c); pdw - sqrt(pdw^2 - ω2_c)]
    p1
N := ln(ε_s/ε_p)/ln(Ω_s/Ω_p) = 2.97801
N := ceil(N) = 3
α := ε_p^(-1/N) = 1.25258
poles(N) :=
    r ← mod(N, 2)
    L ← (N - r)/2
    α ← 1/nthroot(ε_p, N)
    P[0] ← -α
    i ← r
    for n ∈ 1 .. L
        θ ← π*(n - 0.5)/N
        P[i] ← α*(-sin(θ) + 1i*cos(θ))
        P[i + 1] ← α*(-sin(θ) - 1i*cos(θ))
        i ← i + 2
    P
f_0 := 550
Δf := 900
f_1 := f_0 - Δf/2 = 100
F_1 := f_analog(f_1, f_d) = 100.132
Ω_1 := 2*π*F_1
f_2 := f_0 + Δf/2 = 1000
F_2 := f_analog(f_2, f_d) = 1156.33
Ω_2 := 2*π*F_2
ΔΩ := Ω_2 - Ω_1 = 6636.28
ΔΩ^2 = 44040194
ω_1 := 2*π*f_1
Ω_c := Ω_1*Ω_2 = 4571018
p_p := poles(N)
ω_2 := 2*π*f_2
ω_c := ω_1*ω_2
Δω := ω_2 - ω_1
p_p1 := p_p*Ω_p
K1 := PolynomP(0, p_p1) = 487494
PP(p) := (p^2 + ω_c)/(p*Δω)
p_p2 := ppf_poles(p_p, F_1, F_2)
K2 := PolynomP(1i*sqrt(ω_c), p_p2) = -3.39742e20 - 4.4925e21i
H(p) == product(p - p_0[m], m = 0 .. M - 1)/product(p - p_p[n], n = 0 .. N - 1)
H(p_1) == product((p_1^2 + ω_c)/(p_1*Δω) - p_0[m], m = 0 .. M - 1)/product((p_1^2 + ω_c)/(p_1*Δω) - p_p[n], n = 0 .. N - 1)
H(p_1) == 1/(p_1*Δω)^M*product(p_1^2 + ω_c - p_0[m]*p_1*Δω, m = 0 .. M - 1)/(1/(p_1*Δω)^N*product(p_1^2 + ω_c - p_p[n]*p_1*Δω, n = 0 .. N - 1))
H(p_1) == (p_1*Δω)^N/(p_1*Δω)^M*product(p_1^2 + ω_c - p_0[m]*p_1*Δω, m = 0 .. M - 1)/product(p_1^2 + ω_c - p_p[n]*p_1*Δω, n = 0 .. N - 1)
H(p_1) == (p_1*Δω)^(N - M)*product(p_1^2 + ω_c - p_0[m]*p_1*Δω, m = 0 .. M - 1)/product(p_1^2 + ω_c - p_p[n]*p_1*Δω, n = 0 .. N - 1)
H(p_1) == (p_1*Δω)^(N - M)*product(p1 - p1_0[m], m = 0 .. M1 - 1)/product(p1 - p1_p[n], n = 0 .. N1 - 1)
H(p_1) == (p_1*Δω)^(N - M)*product(p1 - p1_0[m], m = 0 .. 2*M - 1)/product(p1 - p1_p[n], n = 0 .. 2*N - 1)
p_02 := matrix(N, 1, f(n, m) ← 0)
p_0 := matrix(1, 1, f(n, m) ← 0)
z_p2 := Z(p_p2, f_d)
z_02 := Z(p_02, f_d)
HH := ppf(p_p, p_0, F_1, F_2)
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H(p_1) == (p_1*Δω)^N/product(p1 - p1_p[n], n = 0 .. 2*N - 1)
HH[0] = [-592.072; -7720.37; -241.246 - 472.729i; -3914.98 + 7671.52i; -241.246 + 472.729i; -3914.98 - 7671.52i]
z_p2 = [0.888205; 0.128644; 0.948735 - 0.0899522i; 0.102269 + 0.607696i; 0.948735 + 0.0899522i; 0.102269 - 0.607696i]
1/ε_p = 1.96523
H_11(p) := 1/ε_p*ΔΩ^N*p^N/PolynomP(p, p_p2)
H_12(p) := 1/ε_p*Δω^N*PolynomP(p, p_02)/PolynomP(p, p_p2)
H(p) := 1/ε_p/PolynomP(p, p_p)
H_1(p) := K1/PolynomP(p, p_p1)
H_2(p) := H(PP(p))
H_z2(z) := H_11(2*f_d*(1 - z^-1)/(1 + z^-1))
H_z22(z) := 1/ε_p*ΔΩ^N*(2*f_d*(1 - z^-1)/(1 + z^-1))^N/PolynomP(2*f_d*(1 - z^-1)/(1 + z^-1), p_p2)  # disabled
H_z22(z) := 1/ε_p*(2*f_d)^N*ΔΩ^N*(1 - z^-1)^N*(1 + z^-1)^N/((2*f_d - p_p2[0])*(1 - (2*f_d + p_p2[0])/(2*f_d - p_p2[0])*z^-1)*(2*f_d*(1 - z^-1) - p_p2[1]*(1 + z^-1))*(2*f_d*(1 - z^-1) - p_p2[2]*(1 + z^-1))*(2*f_d*(1 - z^-1) - p_p2[3]*(1 + z^-1))*(2*f_d*(1 - z^-1) - p_p2[4]*(1 + z^-1))*(2*f_d*(1 - z^-1) - p_p2[5]*(1 + z^-1)))
H_z22(z) := 1/ε_p*(2*f_d)^N*ΔΩ^N*(1 - z^-1)^N*(1 + z^-1)^N/(product(2*f_d - p_p2[n], n = 0 .. 2*N - 1)*product(1 - (2*f_d + p_p2[n])/(2*f_d - p_p2[n])*z^-1, n = 0 .. 2*N - 1))
(2*f_d + p_p2)/(2*f_d - p_p2) = [0.888205; 0.128644; 0.948735 - 0.0899522i; 0.102269 + 0.607696i; 0.948735 + 0.0899522i; 0.102269 - 0.607696i]
z_p2 = [0.888205; 0.128644; 0.948735 - 0.0899522i; 0.102269 + 0.607696i; 0.948735 + 0.0899522i; 0.102269 - 0.607696i]
H_z22(z) := 1/ε_p*(2*f_d)^N/product(2*f_d - p_p2[n], n = 0 .. 2*N - 1)*ΔΩ^N*(1 - z^-1)^N*(1 + z^-1)^N/product(1 - z_p2[n]*z^-1, n = 0 .. 2*N - 1)
Kz0 := 1/ε_p*(2*f_d)^N/product(2*f_d - p_p2[n], n = 0 .. 2*N - 1)*ΔΩ^N = 0.115313
H_z22(z) := Kz0*(1 - z^-1)^N*(1 + z^-1)^N/product(1 - z_p2[n]*z^-1, n = 0 .. rows(z_p2) - 1)
20*log(|H_z22(e^(1i*2*π*0.01/f_d))|) = -236.526
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