# https://ru.dsplib.org/content/filter_butter_ap/filter_butter_ap.html
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db(x) := 10^(x/20)
db_P(x) := 10^(x/10)
to_db(x) := 20*log(|x|)
to_dbP(x) := 10*log(|x|)
roundup(x) := Trunc(x, 1) + (Trunc(x, 1) ≠ x)
abs(z) := |z|
samples := 100
n := 0 .. samples - 1
circle_x[n] := cos(2*π/(samples - 1)*n)
circle_y[n] := sin(2*π/(samples - 1)*n)
Z(p_0, f_d) := (2*f_d + p_0)/(2*f_d - p_0)
PolynomP(p, P) := product(p - P[n], n = 0 .. rows(P) - 1)
PolynomZ(z, Z) := product(1 - Z[n]*z^-1, n = 0 .. rows(Z) - 1)
HP(p, P_0, P_p) := PolynomP(p, P_0)/PolynomP(p, P_p)
HZ(z, Z_0, Z_p) := PolynomZ(z, Z_0)/PolynomZ(z, Z_p)
f_p := 10  # Гц - частота пропускания
f_d := 5000  # Гц - частота дискретизации
f_s := 40  # Гц - частота подавления
dt := 1/f_d = 0.0002
tt[n] := n*dt
h(t, H) := 1/f_d*integral(H(f)*e^(1i*2*π*f*t), f = -f_d/2 .. f_d/2)
ω_p := 2*π*f_p/f_d = 0.004*π  # Нормированная полоса среза
ω_p = 0.0125664
ω_s := 2*π*f_s/f_d = 0.016*π
# Нормированная полоса заграждения
ω_s = 0.0502655
R_p := 1
(-R_p) db = 0.891251  # Неравномерность в полосе пропускания (дБ)
R_s := 30
(-R_s) db = 0.0316228  # Уровень подавления в полосе заграждения (дБ)
df := f_d/samples = 50
Ω(T_d, ω) := 2/T_d*tan(ω/2)  # Преобразование частот аналогового фильтра в частоты цифрового
f_analog(f_digital., f_d) := f_d/π*tan(π*f_digital./f_d)
F_p := f_analog(f_p, f_d) = 10.0001
F_s := f_analog(f_s, f_d) = 40.0084
Ω_p := 2*π*F_p = 62.8327  # Частота среза аналогового фильтра
Ω_s := 2*π*F_s = 251.38  # Частота заграждения аналогового фильтра
# Порядок фильтра
ε_p := sqrt(10^(R_p/10) - 1) = 0.508847
G_p := 1/sqrt(1 + ε_p^2) = 0.891251
ε_s := sqrt(10^(R_s/10) - 1) = 31.607
1/ε_s = 0.0316386
G_s := 1/sqrt(1 + ε_s^2) = 0.0316228
ε_s/ε_p = 62.1148
Ω_s/Ω_p = 4.00079
# Порядок фильтра
N := ln(ε_s/ε_p)/ln(Ω_s/Ω_p) = 2.97801
N := ceil(N) = 3
α := ε_p^(-1/N) = 1.25258
highpass_poles(P, fp) :=
    count ← rows(P)
    wp ← 2*π*fp
    K ← 1
    for i ∈ 0 .. count - 1
        p1[i] ← wp/P[i]
        K ← K*P[i]
    [p1; K]
poles(N) :=
    r ← mod(N, 2)
    L ← (N - r)/2
    α ← 1/nthroot(ε_p, N)
    P[0] ← -α
    i ← r
    for n ∈ 1 .. L
        θ ← π*(n - 0.5)/N
        P[i] ← α*(-sin(θ) + 1i*cos(θ))
        P[i + 1] ← α*(-sin(θ) - 1i*cos(θ))
        i ← i + 2
    P
p_p := poles(N)
p_p1 := p_p*Ω_p
K1 := PolynomP(0, p_p1) = 487494
p_p2 := ppf_poles(p_p, F_1, F_2)
K2 := PolynomP(1i*sqrt(ω_c), p_p2)
H(p_1) == (p_1*Δω)^(N - M)*product(p_1^2 + ω_c - p_0[m]*p_1*Δω, m = 0 .. M - 1)/product(p_1^2 + ω_c - p_p[n]*p_1*Δω, n = 0 .. N - 1)
H(p_1) == (p_1*Δω)^(N - M)*product(p1 - p1_0[m], m = 0 .. M1 - 1)/product(p1 - p1_p[n], n = 0 .. N1 - 1)
H(p_1) == (p_1*Δω)^(N - M)*product(p1 - p1_0[m], m = 0 .. 2*M - 1)/product(p1 - p1_p[n], n = 0 .. 2*N - 1)
p_02 := matrix(N, 1, f(n, m) ← 0)
p_0 := matrix(1, 1, f(n, m) ← 0)
z_p2 := Z(p_p2, f_d)
z_02 := Z(p_02, f_d)
HH := ppf(p_p, p_0, F_1, F_2)
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H(p_1) == (p_1*Δω)^N/product(p1 - p1_p[n], n = 0 .. 2*N - 1)
1/ε_p = 1.96523
H_11(p) := 1/ε_p*ΔΩ^N*p^N/PolynomP(p, p_p2)
H_12(p) := 1/ε_p*Δω^N*PolynomP(p, p_02)/PolynomP(p, p_p2)
H(p) := 1/ε_p/PolynomP(p, p_p)
H_1(p) := K1/PolynomP(p, p_p1)
H_2(p) := H(PP(p))
H_z2(z) := H_11(2*f_d*(1 - z^-1)/(1 + z^-1))
H_z22(z) := 1/ε_p*ΔΩ^N*(2*f_d*(1 - z^-1)/(1 + z^-1))^N/PolynomP(2*f_d*(1 - z^-1)/(1 + z^-1), p_p2)  # disabled
H_z22(z) := 1/ε_p*(2*f_d)^N*ΔΩ^N*(1 - z^-1)^N*(1 + z^-1)^N/(product(2*f_d - p_p2[n], n = 0 .. 2*N - 1)*product(1 - (2*f_d + p_p2[n])/(2*f_d - p_p2[n])*z^-1, n = 0 .. 2*N - 1))
H_z22(z) := 1/ε_p*(2*f_d)^N/product(2*f_d - p_p2[n], n = 0 .. 2*N - 1)*ΔΩ^N*(1 - z^-1)^N*(1 + z^-1)^N/product(1 - z_p2[n]*z^-1, n = 0 .. 2*N - 1)
Kz0 := 1/ε_p*(2*f_d)^N/product(2*f_d - p_p2[n], n = 0 .. 2*N - 1)*ΔΩ^N
H_z22(z) := Kz0*(1 - z^-1)^N*(1 + z^-1)^N/product(1 - z_p2[n]*z^-1, n = 0 .. rows(z_p2) - 1)
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