db(x) := 10^(x/20)
db_P(x) := 10^(x/10)
to_db(x) := 20*log(|x|)
to_dbP(x) := 10*log(|x|)
roundup(x) := Trunc(x, 1) + (Trunc(x, 1) ≠ x)
abs(z) := |z|
samples := 100
n := 0 .. samples - 1
circle_x[n] := cos(2*π/(samples - 1)*n)
circle_y[n] := sin(2*π/(samples - 1)*n)
f_p := 500  # Гц - частота пропускания
f_d := 5000  # Гц - частота дискретизации
f_p1 := 500
f_d1 := 5000
f_s := 700  # Гц - частота подавления
dt := 1/f_d = 0.0002
tt[n] := n*dt
h(t, H) := 1/f_d*integral(H(f)*e^(1i*2*π*f*t), f = -f_d/2 .. f_d/2)
ω_p := 2*π*f_p/f_d = 0.2*π
# Нормированная полоса среза
ω_p = 0.628319
f_s1 := 1500
ω_s := 2*π*f_s/f_d = 0.28*π
# Нормированная полоса заграждения
ω_s = 0.879646
ω_p1 := 2*π*f_p1/f_d1 = 0.2*π
R_p := 1
(-R_p) db = 0.891251  # Неравномерность в полосе пропускания (дБ)
ω_s1 := 2*π*f_s1/f_d1 = 0.6*π
R_s := 30
(-R_s) db = 0.0316228  # Уровень подавления в полосе заграждения (дБ)
df := f_d/samples = 50
Ω(T_d, ω) := 2/T_d*tan(ω/2)  # Преобразование частот аналогового фильтра в частоты цифрового
f_analog(f_digital., f_d) := f_d/π*tan(π*f_digital./f_d)
F_p := f_analog(f_p, f_d) = 517.126
F_s := f_analog(f_s, f_d) = 748.926
Ω_p := 2*π*F_p = 3249.2  # Частота среза аналогового фильтра
Ω_s := 2*π*F_s = 4705.64  # Частота заграждения аналогового фильтра
# Порядок фильтра
ε_p := sqrt(10^(R_p/10) - 1) = 0.508847
ε_s := sqrt(10^(R_s/10) - 1) = 31.607
1/ε_s = 0.0316386
ε_s/ε_p = 62.1148
Ω_s/Ω_p = 1.44825
# Порядок фильтра
N := ln(ε_s/ε_p)/ln(Ω_s/Ω_p) = 11.1487
N := roundup(N) = 12
α := 1/nthroot(ε_p, N) = 1.05792
# Число парных полюсов
L := Trunc(N/2, 1) = 6
r := mod(N, 2) = 0
2*L + r = 12
θ(n) := (2*n - 1)/(2*N)*π
θ(n) := π/N*(n - 1/2)
poles(r, L) :=
    i ← 0
    if r ≠ 0
        P[i] ← -α
        i ← 1
    for n ∈ 1 .. L
        P[i] ← α*(-sin(θ(n)) + 1i*cos(θ(n)))
        P[i + 1] ← α*(-sin(θ(n)) - 1i*cos(θ(n)))
        i ← i + 2
    P
H_0(p) := 1/ε_p/((p - (-α))^r*product(p^2 + 2*α*sin(θ(n))*p + α^2, n = 1 .. L))
H_1(p) := 1/ε_p/((p - (-α))^r*product((p - α*(-sin(θ(n)) + 1i*cos(θ(n))))*(p - α*(-sin(θ(n)) - 1i*cos(θ(n)))), n = 1 .. L))
p0 := poles(r, L)
Z(p_0, f_d) := (2*f_d + p_0)/(2*f_d - p_0)
z0 := vectorize(Z(p0, f_d))
Kz(p) := 1/product(2*f_d - p[n], n = 0 .. N - 1)
2*π*F_p = 3249.2
p1 := p0*(2*π*F_p)
z1 := vectorize(Z(p1, f_d))
Kz1 := Kz(p1) = 7.43047e-50
|p0[0]| = 1.05792
|p1[0]| = 3437.38
H_z2(z) := (2*π*F_p)^N*Kz1/ε_p*(1 + z^-1)^N/product(1 - z1[n]*z^-1, n = 0 .. N - 1)
H_2(p) := 1/ε_p*1/product(p - p1[n], n = 0 .. N - 1)
H(p) := (2*π*F_p)^N*H_2(p)
Kz1 = 7.43047e-50
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H(p) := H_2(p/(2*π*F_p))  # disabled
H_z(z) := H(2*f_d*(1 - z^-1)/(1 + z^-1))
H_z(1) = 1
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hh_z2 := vectorize(h(tt, H(f) ← H_z2(e^(1i*2*π*f/f_d))))
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3/f_p/dt = 30
