# Рассчёт фильтра Чебышева I-рода
# https://ru.dsplib.org/content/filter_cheby1_ap/filter_cheby1_ap.html
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f_d := 10  # Гц - частота дискретизации
samples := 100
n := 0 .. samples - 1
dt := 1/f_d = 0.1
df := f_d/samples = 0.1
tt[n] := n*dt
db(x) := 10^(x/20)
db_P(x) := 10^(x/10)
to_db(x) := 20*log(|x|)
to_dbP(x) := 10*log(|x|)
roundup(x) := Trunc(x, 1) + (Trunc(x, 1) ≠ x)
abs(z) := |z|
circle_x[n] := cos(2*π/(samples - 1)*n)
circle_y[n] := sin(2*π/(samples - 1)*n)
Ki(k) :=
    k_0 ← k/(1 + sqrt(1 - k*k))
    k_0*k_0
K(k) :=
    ki ← Ki(k)
    (1 + ki)*K(ki) if k - ki > 0
    π/2 otherwise
T(k) := K(sqrt(1 - k*k))
sn(u, k) :=
    ki ← Ki(k)
    sin(u*π/2) if k - ki ≤ 0
    otherwise
        w ← sn(u, ki)
        (1 + ki)/(1/w + ki*w)
cd(u, k) :=
    ki ← Ki(k)
    cos(u*π/2) if k - ki ≤ 0
    otherwise
        w ← cd(u, ki)
        (1 + ki)/(1/w + ki*w)
sn_inv(sn, k) :=
    ki ← Ki(k)
    sn_inv(2*sn/((1 + ki)*(1 + sqrt(1 - k*k*sn*sn))), ki) if k - ki > 0
    2*asin(sn)/π
cd_inv(cn, k) :=
    ki ← Ki(k)
    cd_inv(2*cn/((1 + ki)*(1 + sqrt(1 - k*k*cn*cn))), ki) if k - ki > 0
    2*acos(cn)/π
K(0.66667) = 1.80967
T(0.66667) = 1.90424
K(0.0028615) = 1.5708
T(0.0028615) = 7.24272
Z(p_0, f_d) := (2*f_d + p_0)/(2*f_d - p_0)
z2p(z_0, f_d) := 2*f_d*(1 - z_0^-1)/(1 + z_0^-1)
cd(0.6, 0.93) = 0.761809
sn(0.6, 0.93) = 0.917919
# 0.917918 | 0.761809423
C(N, ω) := cos(N*acos(ω))
sh(x) := sinh(x)
ch(x) := cosh(x)
arsh(x) := asinh(x)
arch(x) := acosh(x)
Integral(f, x1, x2, dx) :=
    x ← x1
    y ← f(x)
    while x ≤ x2
        x ← x + dx
        S ← S + y + (y ← f(x))
    S*0.5*dx
Ω(T_d, ω) := 2/T_d*tan(ω/2)  # Преобразование частот аналогового фильтра в частоты цифрового
h(t, H) := 1/f_d*integral(H(f)*e^(1i*2*π*f*t), f = -f_d/2 .. f_d/2)
h2(t, H) := 1/f_d*Integral(y(f) ← H(f)*e^(1i*2*π*f*t), -f_d/2, f_d/2, f_d/2001)
f_analog(f_digital., f_d) := f_d/π*tan(π*f_digital./f_d)
f_digit(f_analog, f_d) := f_d/π*atan(π*f_analog/f_d)
f_pl := 2/(2*π) = 0.31831
f_sl := 4/(2*π) = 0.63662
f_sh := 12/(2*π) = 1.90986
f_ph := 15/(2*π) = 2.38732
ω_pl := 2*π*f_pl = 2
ω_sl := 2*π*f_sl = 4
ω_sh := 2*π*f_sh = 12
ω_ph := 2*π*f_ph = 15
ω_c := ω_sl*ω_sh = 48
Δω := ω_sh - ω_sl = 8
Ω(T_d, ω) := 2/T_d*tan(ω/2)  # Преобразование частот аналогового фильтра в частоты цифрового
F_pl := f_analog(f_pl, f_d) = 0.319375
F_sl := f_analog(f_sl, f_d) = 0.645246
F_sh := f_analog(f_sh, f_d) = 2.17768
F_ph := f_analog(f_ph, f_d) = 2.96536
F_pl/f_pl - 1 = 0.334672 %
F_sl/f_sl - 1 = 1.35502 %
F_sh/f_sh - 1 = 14.0228 %
F_ph/f_ph - 1 = 24.2129 %
Ω_pl := 2*π*F_pl = 2.00669
Ω_sl := 2*π*F_sl = 4.0542
Ω_sh := 2*π*F_sh = 13.6827
Ω_ph := 2*π*F_ph = 18.6319
Ω_c := Ω_sl*Ω_sh = 55.4726
ΔΩ := Ω_sh - Ω_sl = 9.62854
Ω_0 :=
    Ω_p ←
        Ω_ph if Ω_c/Ω_ph > Ω_pl
        Ω_pl otherwise
    |ΔΩ*Ω_p/(Ω_c - Ω_p^2)|
    = 0.615059
ω_0 :=
    ω_p ←
        ω_ph if ω_c/ω_ph > ω_pl
        ω_pl otherwise
    |Δω*ω_p/(ω_c - ω_p^2)|
    = 0.677966
f_0 := ω_0/(2*π) = 0.107902
F_0 := Ω_0/(2*π) = 0.0978897
Ω_1 := 1
ω_1 := 1
F_1 := Ω_1/(2*π) = 0.159155
f_1 := ω_1/(2*π) = 0.159155
R_p := 1
G_p := (-R_p) db = 0.891251  # Неравномерность в полосе пропускания (дБ)
R_s := 40
G_s := (-R_s) db = 0.01  # Уровень подавления в полосе заграждения (дБ)
Ω_p := Ω_0 = 0.615059  # Частота среза аналогового фильтра
Ω_s := Ω_1 = 1  # Частота заграждения аналогового фильтра
# Порядок фильтра
ε_p := sqrt(10^(R_p/10) - 1) = 0.508847
ε_s := sqrt(10^(R_s/10) - 1) = 99.995
1/ε_s = 0.0100005
G_p := 1/sqrt(1 + ε_p^2) = 0.891251
ε_s/ε_p = 196.513
Ω_s/Ω_p = 1.62586
k_ω := Ω_1/Ω_0 = 1.62586
k_ε := ε_s/ε_p = 196.513
arcos(z) := ln(z + sqrt(z^2 - 1))
# Порядок фильтра
N := arch(k_ε)/arch(k_ω) = 5.59664
N := ceil(N) = 6
# Число парных полюсов | Наличие/отсутсвтие центрального полюса
L := Trunc(N/2, 1) = 3
r := mod(N, 2) = 0
2*L + r = 6
β := 1/N*arsh(1/ε_p) = 0.237996
G_p := 1/sqrt(1 + ε_p^2) = 0.891251
θ(n) := (2*n - 1)/(2*N)*π
θ(n) := π/N*(n - 1/2)
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poles(r, L) :=
    i ← 0
    if r ≠ 0
        P[i] ← -sh(β)
        i ← 1
    for n ∈ 1 .. L
        P[i] ← -sh(β)*sin(θ(n)) + 1i*ch(β)*cos(θ(n))
        P[i + 1] ← -sh(β)*sin(θ(n)) - 1i*ch(β)*cos(θ(n))
        i ← i + 2
    P*Ω_0
p_p := poles(r, L)
G_0 := 1/product(-p_p[i], i = 0 .. N - 1)
p_p = [-0.038245 + 0.611007i; -0.038245 - 0.611007i; -0.104487 + 0.447288i; -0.104487 - 0.447288i; -0.142732 + 0.163719i; -0.142732 - 0.163719i]
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G_0 = 268.062
H_0(p) := G_p^(1 - r)/G_0*1/product(p - p_p[i], i = 0 .. N - 1)
H_0(0) = 0.891251
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# Подставнока
p == Δω*p/(p^2 + ω_c^2)
pzf_w(P_p, ω_c, Δω) :=
    count_p ← rows(P_p)
    for i ∈ 0 .. count_p - 1
        pdw ← 0.5*Δω/P_p[i]
        [p1[i*2]; p1[i*2 + 1]] ← [pdw + sqrt(pdw^2 - ω_c); pdw - sqrt(pdw^2 - ω_c)]
        [p01[i*2]; p01[i*2 + 1]] ← [1i*sqrt(ω_c); -1i*sqrt(ω_c)]
    [p1; p01]
pzf(P_p, f_min, f_max) :=
    count_p ← rows(P_p)
    ω_min ← 2*π*f_min
    ω_max ← 2*π*f_max
    Δω ← ω_max - ω_min
    ω_c ← ω_min*ω_max
    pzf_w(P_p, ω_c, Δω)
Polinom(P, p) := product(p - P[i], i = 0 .. rows(P) - 1)
Z(p, f_d) := (2*f_d + p)/(2*f_d - p)
[p_p1; p_01] := pzf(p_p, F_sl, F_sh)
z_0 := vectorize(Z(p_01, f_d))
z_p := vectorize(Z(p_p1, f_d))
p_01 = [7.44799i; -7.44799i; 7.44799i; -7.44799i; 7.44799i; -7.44799i; 7.44799i; -7.44799i; 7.44799i; -7.44799i; 7.44799i; -7.44799i]
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p_p1 = [-0.134741 + 2.96618i; -0.847787 - 18.6632i; -0.134741 - 2.96618i; -0.847787 + 18.6632i; -0.446533 + 2.35202i; -4.32188 - 22.7646i; -0.446533 - 2.35202i; -4.32188 + 22.7646i; -0.792057 + 0.960761i; -28.3391 - 34.3752i; -0.792057 - 0.960761i; -28.3391 + 34.3752i]
H_2(p) := G_p^(1 - r)*product(p - p_01[n], n = 0 .. rows(p_01) - 1)/product(p - p_p1[n], n = 0 .. rows(p_p1) - 1)
H_z(z) := H_2(2*f_d*(1 - z^-1)/(1 + z^-1))
H_z(z) := H_2(2*f_d*(1 - z^-1)/(1 + z^-1))
G_0z := product(1 - z_0[n], n = 0 .. rows(z_0) - 1)/product(1 - z_p[n], n = 0 .. rows(z_p) - 1) = 26.0265
M_p := [f_pl, 1; f_sl, 1; f_sl, G_s; f_sh, G_s; f_sh, 1; f_ph, 1]
H_z2(z) := G_p^(1 - r)/G_0z*product(1 - z_0[n]*z^-1, n = 0 .. rows(z_0) - 1)/product(1 - z_p[n]*z^-1, n = 0 .. rows(z_p) - 1)
G_p^(1 - r)/G_0z = 0.0342439
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hh_z2 := vectorize(h(tt, H(f) ← H_z2(e^(1i*2*π*f/f_d))))
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z_0 = [0.756418 + 0.654089i; 0.756418 - 0.654089i; 0.756418 + 0.654089i; 0.756418 - 0.654089i; 0.756418 + 0.654089i; 0.756418 - 0.654089i; 0.756418 + 0.654089i; 0.756418 - 0.654089i; 0.756418 + 0.654089i; 0.756418 - 0.654089i; 0.756418 + 0.654089i; 0.756418 - 0.654089i]
Root2PolynomZ(z_0) =  # error: Эта переменная не определена.
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z_p = [0.944418 + 0.286445i; 0.0650977 - 0.953487i; 0.944418 - 0.286445i; 0.0650977 + 0.953487i; 0.930773 + 0.222102i; -0.123362 - 0.820508i; 0.930773 - 0.222102i; -0.123362 + 0.820508i; 0.919713 + 0.0887062i; -0.45043 - 0.390813i; 0.919713 - 0.0887062i; -0.45043 + 0.390813i]
hh_z2 = [
    0.0342439; -0.154255; 0.350377; -0.410581; 0.200389 + 2.84484e-11i; 0.142672 + 1.10806e-10i; -0.183294 + 4.04106e-11i; -0.0013754 - 1.38778e-17i; 0.148071 - 4.94017e-11i; 0.0463216 + 8.12026e-11i
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]
