# Рассчёт фильтра Чебышева II-рода
# https://ru.dsplib.org/content/filter_cheby2_ap/filter_cheby2_ap.html
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f_d := 10  # Гц - частота дискретизации
samples := 100
n := 0 .. samples - 1
dt := 1/f_d = 0.1
tt[n] := n*dt
h(t, H) := 1/f_d*integral(H(f)*e^(1i*2*π*f*t), f = -f_d/2 .. f_d/2)
df := f_d/samples = 0.1
db(x) := 10^(x/20)
db_P(x) := 10^(x/10)
to_db(x) := 20*log(|x|)
to_dbP(x) := 10*log(|x|)
roundup(x) := Trunc(x, 1) + (Trunc(x, 1) ≠ x)
abs(z) := |z|
circle_x[n] := cos(2*π/(samples - 1)*n)
circle_y[n] := sin(2*π/(samples - 1)*n)
Ki(k) :=
    k_0 ← k/(1 + sqrt(1 - k*k))
    k_0*k_0
K(k) :=
    ki ← Ki(k)
    (1 + ki)*K(ki) if k - ki > 0
    π/2 otherwise
T(k) := K(sqrt(1 - k*k))
sn(u, k) :=
    ki ← Ki(k)
    sin(u*π/2) if k - ki ≤ 0
    otherwise
        w ← sn(u, ki)
        (1 + ki)/(1/w + ki*w)
cd(u, k) :=
    ki ← Ki(k)
    cos(u*π/2) if k - ki ≤ 0
    otherwise
        w ← cd(u, ki)
        (1 + ki)/(1/w + ki*w)
sn_inv(sn, k) :=
    ki ← Ki(k)
    sn_inv(2*sn/((1 + ki)*(1 + sqrt(1 - k*k*sn*sn))), ki) if k - ki > 0
    2*asin(sn)/π
cd_inv(cn, k) :=
    ki ← Ki(k)
    cd_inv(2*cn/((1 + ki)*(1 + sqrt(1 - k*k*cn*cn))), ki) if k - ki > 0
    2*acos(cn)/π
K(0.66667) = 1.80967
T(0.66667) = 1.90424
K(0.0028615) = 1.5708
T(0.0028615) = 7.24272
Z(p_0, f_d) := (2*f_d + p_0)/(2*f_d - p_0)
z2p(z_0, f_d) := 2*f_d*(1 - z_0^-1)/(1 + z_0^-1)
cd(0.6, 0.93) = 0.761809
sn(0.6, 0.93) = 0.917919
# 0.917918 | 0.761809423
C(N, ω) := cos(N*acos(ω))
sh(x) := sinh(x)
ch(x) := cosh(x)
arsh(x) := asinh(x)
arch(x) := acosh(x)
f_analog(f_digital., f_d) := f_d/π*tan(π*f_digital./f_d)
conj(z) := Re(z) - 1i*Im(z)
PolynomP(p, P) := product(p - P[n], n = 0 .. rows(P) - 1)
PolynomZ(z, Z) := product(1 - Z[n]*z^-1, n = 0 .. rows(Z) - 1)
f_digit(f_analog, f_d) := f_d/π*atan(π*f_analog/f_d)
HP(p, P_0, P_p) := PolynomP(p, P_0)/PolynomP(p, P_p)
HZ(z, Z_0, Z_p) := PolynomZ(z, Z_0)/PolynomZ(z, Z_p)
f_pl := 2/(2*π) = 0.31831
f_sl := 4/(2*π) = 0.63662
f_sh := 12/(2*π) = 1.90986
f_ph := 15/(2*π) = 2.38732
ω_pl := 2*π*f_pl = 2
ω_sl := 2*π*f_sl = 4
ω_sh := 2*π*f_sh = 12
ω_ph := 2*π*f_ph = 15
ω_c := ω_sl*ω_sh = 48
Δω := ω_sh - ω_sl = 8
Ω(T_d, ω) := 2/T_d*tan(ω/2)  # Преобразование частот аналогового фильтра в частоты цифрового
F_pl := f_analog(f_pl, f_d) = 0.319375
F_sl := f_analog(f_sl, f_d) = 0.645246
F_sh := f_analog(f_sh, f_d) = 2.17768
F_ph := f_analog(f_ph, f_d) = 2.96536
F_pl/f_pl - 1 = 0.334672 %
F_sl/f_sl - 1 = 1.35502 %
F_sh/f_sh - 1 = 14.0228 %
F_ph/f_ph - 1 = 24.2129 %
Ω_pl := 2*π*F_pl = 2.00669
Ω_sl := 2*π*F_sl = 4.0542
Ω_sh := 2*π*F_sh = 13.6827
Ω_ph := 2*π*F_ph = 18.6319
Ω_c := Ω_sl*Ω_sh = 55.4726
ΔΩ := Ω_sh - Ω_sl = 9.62854
Ω_0 :=
    Ω_p ←
        Ω_ph if Ω_c/Ω_ph > Ω_pl
        Ω_pl otherwise
    |ΔΩ*Ω_p/(Ω_c - Ω_p^2)|
    = 0.615059
ω_0 :=
    ω_p ←
        ω_ph if ω_c/ω_ph > ω_pl
        ω_pl otherwise
    |Δω*ω_p/(ω_c - ω_p^2)|
    = 0.677966
f_0 := ω_0/(2*π) = 0.107902
F_0 := Ω_0/(2*π) = 0.0978897
Ω_1 := 1
ω_1 := 1
F_1 := Ω_1/(2*π) = 0.159155
f_1 := ω_1/(2*π) = 0.159155
R_p := 1.5
G_p := (-R_p) db = 0.841395  # Неравномерность в полосе пропускания (дБ)
R_s := 35
G_s := (-R_s) db = 0.0177828  # Уровень подавления в полосе заграждения (дБ)
Ω_p := Ω_0  # Частота среза аналогового фильтра
Ω_s := Ω_1  # Частота заграждения аналогового фильтра
# Порядок фильтра
ε_p := sqrt(10^(R_p/10) - 1) = 0.642291
ε_s := sqrt(10^(R_s/10) - 1) = 56.2252
1/ε_s = 0.0177856
G_p := 1/sqrt(1 + ε_p^2) = 0.841395
ε_s/ε_p = 87.5386
Ω_s/Ω_p = 1.62586
k_ω := Ω_p/Ω_s = 0.615059
k_ε := ε_p/ε_s = 0.0114235
# Порядок фильтра
N := arch(ε_s/ε_p)/arch(Ω_s/Ω_p) = 4.83903
N := ceil(N) = 5
# Число парных полюсов | Наличие/отсутсвтие центрального полюса
L := Trunc(N/2, 1) = 2
r := mod(N, 2) = 1
2*L + r = 5
G_s := 1/sqrt(1 + ε_s^2) = 0.0177828
G_p := 1/sqrt(1 + ε_p^2) = 0.841395
β := 1/N*arsh(ε_s) = 0.944518
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θ(n) := (2*n - 1)/(2*N)*π
θ(n) := π/N*(n - 1/2)
conj(z) := Re(z) - 1i*Im(z)
poles(r, L) :=
    i ← 0
    if r ≠ 0
        P[i] ← -1/sh(β)
        i ← 1
    for n ∈ 1 .. L
        P[i] ← 1i/cos(θ(n) + 1i*β)
        P[i + 1] ← conj(P[i])
        i ← i + 2
    P
zeros(L) :=
    for n ∈ 1 .. L
        [P[2*n - 2]; P[2*n - 1]] ← [1i/cos(θ(n)); -1i/cos(θ(n))]
    P
N = 5
p_p := poles(r, L) = [-0.916293; -0.160934 + 0.671788i; -0.160934 - 0.671788i; -0.574616 + 0.566239i; -0.574616 - 0.566239i]
p_0 := zeros(L) = [1.05146i; -1.05146i; 1.7013i; -1.7013i]
G_0 := product(-p_0[i], i = 0 .. rows(p_0) - 1)/product(-p_p[i], i = 0 .. rows(p_p) - 1)
H_0(p) := 1/G_0*product(p - p_0[i], i = 0 .. rows(p_0) - 1)/product(p - p_p[i], i = 0 .. rows(p_p) - 1)
vectorize(|p_p|) = [0.916293; 0.690796; 0.690796; 0.806728; 0.806728]
G_0 = 11.245
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ω_h := ch(1/N*1/ch(1/ε_p)) = 1.00326
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pzf_w(P_p, P_0, ω_c, Δω) :=
    count_p ← rows(P_p)
    count_0 ← rows(P_0)
    for i ∈ 0 .. count_p - 1
        pdw ← 0.5*Δω/P_p[i]
        [p1[i*2]; p1[i*2 + 1]] ← [pdw + sqrt(pdw^2 - ω_c); pdw - sqrt(pdw^2 - ω_c)]
    for i ∈ 0 .. count_0 - 1
        pdw ← 0.5*Δω/P_0[i]
        [p01[i*2]; p01[i*2 + 1]] ← [pdw + sqrt(pdw^2 - ω_c); pdw - sqrt(pdw^2 - ω_c)]
    if count_p ≠ count_0
        for i ∈ 0 .. (count_p - count_0) - 1
            [p02[i*2]; p02[i*2 + 1]] ← [1i*sqrt(ω_c); -1i*sqrt(ω_c)]
        p01 ← stack(p01, p02)
    [p1; p01]
pzf(P_p, P_0, f_min, f_max) :=
    count_p ← rows(P_p)
    count_0 ← rows(P_0)
    ω_min ← 2*π*f_min
    ω_max ← 2*π*f_max
    Δω ← ω_max - ω_min
    ω_c ← ω_min*ω_max
    pzf_w(P_p, P_0, ω_c, Δω)
H0(p) := G_p^(1 - r)/G_0*product(p - p_0[n], n = 0 .. rows(p_0) - 1)/product(p - p_p[n], n = 0 .. rows(p_p) - 1)
[p_p1; p_01] := pzf(p_p, p_0, F_sl, F_sh)
G_02 := HP(1i*2*π*sqrt(F_sl*F_sh), p_01, p_p1) = 0
H_2(p) := G_p^(1 - r)*product(p - p_01[n], n = 0 .. rows(p_01) - 1)/product(p - p_p1[n], n = 0 .. rows(p_p1) - 1)
H_z(z) := H_2(2*f_d*(1 - z^-1)/(1 + z^-1))
z_0 := vectorize(Z(p_01, f_d))
z_p := vectorize(Z(p_p1, f_d))
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z_0 = [0.916901 + 0.399114i; 0.385376 - 0.92276i; 0.385376 + 0.92276i; 0.916901 - 0.399114i; 0.876191 + 0.481964i; 0.548649 - 0.836053i; 0.548649 + 0.836053i; 0.876191 - 0.481964i; 0.756418 + 0.654089i; 0.756418 - 0.654089i]
z_p = [0.517592 + 0.317228i; 0.517592 - 0.317228i; 0.90215 + 0.298592i; 0.139291 - 0.841101i; 0.90215 - 0.298592i; 0.139291 + 0.841101i; 0.774859 + 0.288676i; 0.253003 - 0.564i; 0.774859 - 0.288676i; 0.253003 + 0.564i]
M_p := [f_pl, 1; f_sl, 1; f_sl, G_s; f_sh, G_s; f_sh, 1; f_ph, 1]
G_0z := product(1 - z_0[n], n = 0 .. rows(z_0) - 1)/product(1 - z_p[n], n = 0 .. rows(z_p) - 1) = 3.9749
H_z2(z) := G_p^(1 - r)/G_0z*product(1 - z_0[n]*z^-1, n = 0 .. rows(z_0) - 1)/product(1 - z_p[n]*z^-1, n = 0 .. rows(z_p) - 1)
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