# Рассчёт фильтра Чебышева II-рода
# https://ru.dsplib.org/content/filter_cheby2_ap/filter_cheby2_ap.html
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db(x) := 10^(x/20)
db_P(x) := 10^(x/10)
to_db(x) := 20*log(|x|)
to_dbP(x) := 10*log(|x|)
roundup(x) := Trunc(x, 1) + (Trunc(x, 1) ≠ x)
abs(z) := |z|
samples := 100
n := 0 .. samples - 1
circle_x[n] := cos(2*π/(samples - 1)*n)
circle_y[n] := sin(2*π/(samples - 1)*n)
Ki(k) :=
    k_0 ← k/(1 + sqrt(1 - k*k))
    k_0*k_0
K(k) :=
    ki ← Ki(k)
    (1 + ki)*K(ki) if k - ki > 0
    π/2 otherwise
T(k) := K(sqrt(1 - k*k))
sn(u, k) :=
    ki ← Ki(k)
    sin(u*π/2) if k - ki ≤ 0
    otherwise
        w ← sn(u, ki)
        (1 + ki)/(1/w + ki*w)
cd(u, k) :=
    ki ← Ki(k)
    cos(u*π/2) if k - ki ≤ 0
    otherwise
        w ← cd(u, ki)
        (1 + ki)/(1/w + ki*w)
sn_inv(sn, k) :=
    ki ← Ki(k)
    sn_inv(2*sn/((1 + ki)*(1 + sqrt(1 - k*k*sn*sn))), ki) if k - ki > 0
    2*asin(sn)/π
cd_inv(cn, k) :=
    ki ← Ki(k)
    cd_inv(2*cn/((1 + ki)*(1 + sqrt(1 - k*k*cn*cn))), ki) if k - ki > 0
    2*acos(cn)/π
K(0.66667) = 1.80967
T(0.66667) = 1.90424
K(0.0028615) = 1.5708
T(0.0028615) = 7.24272
Z(p_0, f_d) := (2*f_d + p_0)/(2*f_d - p_0)
z2p(z_0, f_d) := 2*f_d*(1 - z_0^-1)/(1 + z_0^-1)
cd(0.6, 0.93) = 0.761809
sn(0.6, 0.93) = 0.917919
# 0.917918 | 0.761809423
C(N, ω) := cos(N*acos(ω))
sh(x) := sinh(x)
ch(x) := cosh(x)
arsh(x) := asinh(x)
arch(x) := acosh(x)
f_d := 5000  # Гц - частота дискретизации
Integral(f, x1, x2, dx) :=
    x ← x1
    y ← f(x)
    while x ≤ x2
        x ← x + dx
        S ← S + y + (y ← f(x))
    S*0.5*dx
f_p := 1*f_d/(2*π) = 795.775  # Гц - частота пропускания
f_s := 1.6*f_d/(2*π) = 1273.24
# Гц - частота подавления
dt := 1/f_d = 0.0002
tt[n] := n*dt
h(t, H) := 1/f_d*integral(H(f)*e^(1i*2*π*f*t), f = -f_d/2 .. f_d/2)
h2(t, H) := 1/f_d*Integral(y(f) ← H(f)*e^(1i*2*π*f*t), -f_d/2, f_d/2, f_d/2001)
ω_p := 2*π*f_p/f_d = 0.31831*π
# Нормированная полоса среза
ω_p = 1
ω_s := 2*π*f_s/f_d = 0.509296*π
# Нормированная полоса заграждения
ω_s = 1.6
R_p := 1.5
G_p := (-R_p) db = 0.841395  # Неравномерность в полосе пропускания (дБ)
R_s := 35
G_s := (-R_s) db = 0.0177828  # Уровень подавления в полосе заграждения (дБ)
df := f_d/samples = 50
Ω(T_d, ω) := 2/T_d*tan(ω/2)  # Преобразование частот аналогового фильтра в частоты цифрового
f_analog(f_digital., f_d) := f_d/π*tan(π*f_digital./f_d)
f_digit(f_analog, f_d) := f_d/π*atan(π*f_analog/f_d)
F_p := f_analog(f_p, f_d) = 869.467
F_p = 0.173893 f_d
f_digit(F_p, f_d) = 795.775
F_s := f_analog(f_s, f_d) = 1638.72
F_s = 0.327744 f_d
Ω_p := 2*π*F_p = 5463.02  # Частота среза аналогового фильтра
Ω_s := 2*π*F_s = 10296.4  # Частота заграждения аналогового фильтра
# Порядок фильтра
ε_p := sqrt(10^(R_p/10) - 1) = 0.642291
ε_s := sqrt(10^(R_s/10) - 1) = 56.2252
1/ε_s = 0.0177856
G_p := 1/sqrt(1 + ε_p^2) = 0.841395
ε_s/ε_p = 87.5386
Ω_s/Ω_p = 1.88474
k_ω := ω_p/ω_s = 0.625
k_ε := ε_p/ε_s = 0.0114235
f_p/f_s = 0.625
# Порядок фильтра
N := arch(ε_s/ε_p)/arch(f_s/f_p) = 4.93348
N := ceil(N) = 5
# Число парных полюсов | Наличие/отсутсвтие центрального полюса
L := Trunc(N/2, 1) = 2
r := mod(N, 2) = 1
2*L + r = 5
G_s := 1/sqrt(1 + ε_s^2) = 0.0177828
G_p := 1/sqrt(1 + ε_p^2) = 0.841395
β := 1/N*arsh(ε_s) = 0.944518
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θ(n) := (2*n - 1)/(2*N)*π
θ(n) := π/N*(n - 1/2)
conj(z) := Re(z) - 1i*Im(z)
poles(r, L) :=
    i ← 0
    shβ ← sh(β)
    chβ ← ch(β)
    if r ≠ 0
        P[i] ← -1/k_ω*1/shβ
        i ← 1
    for n ∈ 1 .. L
        sinθ ← sin(θ(n))
        cosθ ← cos(θ(n))
        P[i] ← 1/k_ω*(-sinθ*shβ/(sinθ^2*shβ^2 + cosθ^2*chβ^2) + 1i*cosθ*chβ/(sinθ^2*shβ^2 + cosθ^2*chβ^2))
        P[i + 1] ← conj(P[i])
        i ← i + 2
    P
zeros(L) :=
    for n ∈ 1 .. L
        [P[2*n - 2]; P[2*n - 1]] ← [1/k_ω*1i/cos(θ(n)); -1/k_ω*1i/cos(θ(n))]
    P
-1/sh(β) = -0.916293
1/k_ω = 1.6
N = 5
k_ω = 0.625
p_p := poles(r, L)
p_0 := zeros(L)
p_p = [-1.46607; -0.257494 + 1.07486i; -0.257494 - 1.07486i; -0.919386 + 0.905983i; -0.919386 - 0.905983i]
p_0 = [1.68234i; -1.68234i; 2.72208i; -2.72208i]
G_0 := product(-p_0[i], i = 0 .. rows(p_0) - 1)/product(-p_p[i], i = 0 .. rows(p_p) - 1)
H_0(p) := 1/G_0*product(p - p_0[i], i = 0 .. rows(p_0) - 1)/product(p - p_p[i], i = 0 .. rows(p_p) - 1)
ε_p = 0.642291
0.5988
vectorize(|p_p|) = [1.46607; 1.10527; 1.10527; 1.29077; 1.29077]
G_0 = 7.02816
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ε_p = 0.642291
ε_s = 56.2252
f_s = 1273.24
G_p = 0.841395
f_p = 795.775
G_s = 0.0177828
H_0(1i*0) = 1
# Масштабируем передаточную функцию фильтра на требуемую частоту пропускания
Ω_p := 2*π*F_p
Ω_p = 5463.02
H(p) := H_0(p/Ω_p)
# Делаем преобразование плоскости p в плоскость z путём подстановки p == 2*f_d*(1 - z^-1)/(1 + z^-1)
Polinom(P, p) := product(p - P[i], i = 0 .. rows(P) - 1)
H_z(z) := H(2*f_d*(1 - z^-1)/(1 + z^-1))
Ω_p = 5463.02
# Масштабируем нули и полюса
p_01 := p_0*Ω_p
p_p1 := p_p*Ω_p
G_01 := product(|p_01[i]|, i = 0 .. rows(p_01) - 1)/product(|p_p1[i]|, i = 0 .. rows(p_p1) - 1) = 0.0012865
H_01(p) := 1/G_01*product(p - p_01[i], i = 0 .. rows(p_01) - 1)/product(p - p_p1[i], i = 0 .. rows(p_p1) - 1)
H_z1(z) := H_01(2*f_d*(1 - z^-1)/(1 + z^-1))
H_02(p) := 1/G_01*Polinom(p_01, p)/Polinom(p_p1, p)
H_z22(z) := H_02(2*f_d*(1 - z^-1)/(1 + z^-1))
ff := [0; f_p; f_s; f_d/2] = [0; 795.775; 1273.24; 2500]
# Преобразуем нули и полюса в плоскость Z(p, f_d) := (2*f_d + p)/(2*f_d - p)
[G_p^(1 - r); G_p; G_s; 0] = [1; 0.841395; 0.0177828; 0]
vectorize(|H_z1(e^(1i*2*π*ff/f_d))|) = [1; 0.85784; 0.0166598; 0]
z_0 := vectorize(Z(p_01, f_d))
z_p := vectorize(Z(p_p1, f_d))
z_0 :=
    stack(-1, z_0) if r > 0
    z_0 otherwise
G_0z := product(1 - z_0[n], n = 0 .. rows(z_0) - 1)/product(1 - z_p[n], n = 0 .. rows(z_p) - 1) = 16.1043
1/G_0z = 0.0620952
z_0 = [-1; 0.0841972 + 0.996449i; 0.0841972 - 0.996449i; -0.37722 + 0.926124i; -0.37722 - 0.926124i]
z_p = [0.110545; 0.386049 + 0.713516i; 0.386049 - 0.713516i; 0.200965 + 0.395674i; 0.200965 - 0.395674i]
H_z2(z) := 1/G_0z*product(1 - z_0[n]*z^-1, n = 0 .. rows(z_0) - 1)/product(1 - z_p[n]*z^-1, n = 0 .. rows(z_p) - 1)
1/G_0z = 0.0620952
vectorize(|H_z2(e^(1i*2*π*ff/f_d))|) = [1; 0.85784; 0.0166598; 0]
[1; G_p; G_s; 0] = [1; 0.841395; 0.0177828; 0]
[1; G_p; G_s; 0] - vectorize(|H_z2(e^(1i*2*π*ff/f_d))|) = [0; -0.0164446; 0.00112296; 0]
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20*log(1.644*10^-2) = -35.682
10^(-35/20) = 0.0177828
G_p = 0.841395
f_p = 795.775
f_s = 1273.24
H1(p) := H_01(p)
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f_p = 795.775
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abs(H_z2(e^(1i*2*π*f_d/2/f_d))) = 4.75947e-18
h0 := h2(0, H(f) ← H_z2(e^(1i*2*π*f/f_d))*1/(1 - e^(-1i*2*π*f/f_d))) = -0.437905 + 1.52067e-8i
hh_z2 := vectorize(h(tt, H(f) ← H_z2(e^(1i*2*π*f/f_d))))
hp_z2 := vectorize(h2(tt, H(f) ← H_z2(e^(1i*2*π*f/f_d))*1/(1 - e^(-1i*2*π*f/f_d)))) - h0
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Re(hh_z2) = [
    0.0620952; 0.178252; 0.301244; 0.342659; 0.234799; 0.0537816; -0.0984978; -0.124; -0.0387163; 0.0510643
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]
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ff := 0, f_s/100 .. f_s
Φ(f) := integral(d/df1(arg(H_z(e^(1i*2*π*f1/f_d)))/π), f1 = 0 .. f)
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