# Рассчёт фильтра Чебышева II-рода
# https://ru.dsplib.org/content/filter_cheby2_ap/filter_cheby2_ap.html
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db(x) := 10^(x/20)
db_P(x) := 10^(x/10)
to_db(x) := 20*log(|x|)
to_dbP(x) := 10*log(|x|)
roundup(x) := Trunc(x, 1) + (Trunc(x, 1) ≠ x)
abs(z) := |z|
samples := 100
n := 0 .. samples - 1
circle_x[n] := cos(2*π/(samples - 1)*n)
circle_y[n] := sin(2*π/(samples - 1)*n)
Ki(k) :=
    k_0 ← k/(1 + sqrt(1 - k*k))
    k_0*k_0
K(k) :=
    ki ← Ki(k)
    (1 + ki)*K(ki) if k - ki > 0
    π/2 otherwise
T(k) := K(sqrt(1 - k*k))
sn(u, k) :=
    ki ← Ki(k)
    sin(u*π/2) if k - ki ≤ 0
    otherwise
        w ← sn(u, ki)
        (1 + ki)/(1/w + ki*w)
cd(u, k) :=
    ki ← Ki(k)
    cos(u*π/2) if k - ki ≤ 0
    otherwise
        w ← cd(u, ki)
        (1 + ki)/(1/w + ki*w)
sn_inv(sn, k) :=
    ki ← Ki(k)
    sn_inv(2*sn/((1 + ki)*(1 + sqrt(1 - k*k*sn*sn))), ki) if k - ki > 0
    2*asin(sn)/π
cd_inv(cn, k) :=
    ki ← Ki(k)
    cd_inv(2*cn/((1 + ki)*(1 + sqrt(1 - k*k*cn*cn))), ki) if k - ki > 0
    2*acos(cn)/π
K(0.66667) = 1.80967
T(0.66667) = 1.90424
K(0.0028615) = 1.5708
T(0.0028615) = 7.24272
Z(p_0, f_d) := (2*f_d + p_0)/(2*f_d - p_0)
z2p(z_0, f_d) := 2*f_d*(1 - z_0^-1)/(1 + z_0^-1)
cd(0.6, 0.93) = 0.761809
sn(0.6, 0.93) = 0.917919
# 0.917918 | 0.761809423
C(N, ω) := cos(N*acos(ω))
sh(x) := sinh(x)
ch(x) := cosh(x)
arsh(x) := asinh(x)
arch(x) := acosh(x)
f_d := 5000  # Гц - частота дискретизации
f_p := 0.48*f_d/(2*π) = 381.972  # Гц - частота пропускания
f_s := 1*f_d/(2*π) = 795.775
# Гц - частота подавления
dt := 1/f_d = 0.0002
tt[n] := n*dt
h(t, H) := 1/f_d*integral(H(f)*e^(1i*2*π*f*t), f = -f_d/2 .. f_d/2)
ω_p := 2*π*f_p/f_d = 0.152789*π
# Нормированная полоса среза
ω_p = 0.48
ω_s := 2*π*f_s/f_d = 0.31831*π
# Нормированная полоса заграждения
ω_s = 1
R_p := 2
G_p := (-R_p) db = 0.794328  # Неравномерность в полосе пропускания (дБ)
R_s := 50
G_s := (-R_s) db = 0.00316228  # Уровень подавления в полосе заграждения (дБ)
df := f_d/samples = 50
Ω(T_d, ω) := 2/T_d*tan(ω/2)  # Преобразование частот аналогового фильтра в частоты цифрового
f_analog(f_digital., f_d) := f_d/π*tan(π*f_digital./f_d)
f_digit(f_analog, f_d) := f_d/π*atan(π*f_analog/f_d)
F_p := f_analog(f_p, f_d) = 389.479
F_p = 0.0778957 f_d
f_digit(F_p, f_d) = 381.972
F_s := f_analog(f_s, f_d) = 869.467
F_s = 0.173893 f_d
Ω_p := 2*π*F_p = 2447.17  # Частота среза аналогового фильтра
Ω_s := 2*π*F_s = 5463.02  # Частота заграждения аналогового фильтра
# Порядок фильтра
ε_p := sqrt(10^(R_p/10) - 1) = 0.764783
ε_s := sqrt(10^(R_s/10) - 1) = 316.226
1/ε_s = 0.00316229
G_p := 1/sqrt(1 + ε_p^2) = 0.794328
ε_s/ε_p = 413.485
Ω_s/Ω_p = 2.23239
k_ω := ω_p/ω_s = 0.48
k_ε := ε_p/ε_s = 0.00241847
# Порядок фильтра
N := arch(ε_s/ε_p)/arch(f_s/f_p) = 4.92582
N := ceil(N) = 5
# Число парных полюсов | Наличие/отсутсвтие центрального полюса
L := Trunc(N/2, 1) = 2
r := mod(N, 2) = 1
2*L + r = 5
G_p := 1/sqrt(1 + ε_p^2) = 0.794328
β := 1/N*arsh(ε_s) = 1.28992
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θ(n) := (2*n - 1)/(2*N)*π
θ(n) := π/N*(n - 1/2)
poles(r, L) :=
    i ← 0
    if r ≠ 0
        P[i] ← -1/sh(β)
        i ← 1
    for n ∈ 1 .. L
        re ← -sh(β)*sin(θ(n))
        im ← ch(β)*cos(θ(n))
        r ← re^2 + im^2
        P[i] ← (re + 1i*im)/r
        P[i + 1] ← (re - 1i*im)/r
        i ← i + 2
    P
zeros(L) :=
    for n ∈ 1 .. L
        [P[2*n - 2]; P[2*n - 1]] ← [1i/cos(θ(n)); -1i/cos(θ(n))]
    P
p_p := poles(r, L) = [-0.595733; -0.139357 + 0.499236i; -0.139357 - 0.499236i; -0.429318 + 0.363072i; -0.429318 - 0.363072i]
p_0 := zeros(L) = [1.05146i; -1.05146i; 1.7013i; -1.7013i]
G_0 := product(-p_0[i], i = 0 .. rows(p_0) - 1)/product(-p_p[i], i = 0 .. rows(p_p) - 1)
H_0(p) := G_p^(1 - r)/G_0*product(p - p_0[i], i = 0 .. rows(p_0) - 1)/product(p - p_p[i], i = 0 .. rows(p_p) - 1)
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G_0 = 63.2452
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# Масштабируем передаточную функцию фильтра на требуемую частоту пропускания
Ω_p := 2*π*F_p
Ω_p = 2447.17
H(p) := H_0(p/Ω_p*ω_p)
# Делаем преобразование плоскости p в плоскость z путём подстановки p == 2*f_d*(1 - z^-1)/(1 + z^-1)
Polinom(P, p) := product(p - P[i], i = 0 .. rows(P) - 1)
H_z(z) := H(2*f_d*(1 - z^-1)/(1 + z^-1))
Ω_p = 2447.17
# Масштабируем нули и полюса
p_01 := p_0*Ω_p/ω_p
p_p1 := p_p*Ω_p/ω_p
p_01 = [5360.63i; -5360.63i; 8673.69i; -8673.69i]
p_p1 = [-3037.2; -710.478 + 2545.24i; -710.478 - 2545.24i; -2188.78 + 1851.04i; -2188.78 - 1851.04i]
G_01 := product(|p_01[i]|, i = 0 .. rows(p_01) - 1)/product(|p_p1[i]|, i = 0 .. rows(p_p1) - 1) = 0.0124052
H_01(p) := G_p^(1 - r)/G_01*product(p - p_01[i], i = 0 .. rows(p_01) - 1)/product(p - p_p1[i], i = 0 .. rows(p_p1) - 1)
H_z1(z) := H_01(2*f_d*(1 - z^-1)/(1 + z^-1))
H_02(p) := G_p^(1 - r)/G_01*Polinom(p_01, p)/Polinom(p_p1, p)
H_z22(z) := H_02(2*f_d*(1 - z^-1)/(1 + z^-1))
ff := [0; f_p; f_s; f_d/2] = [0; 381.972; 795.775; 2500]
# Преобразуем нули и полюса в плоскость Z(p, f_d) := (2*f_d + p)/(2*f_d - p)
[G_p^(1 - r); G_p; G_s; 0] = [1; 0.794328; 0.00316228; 0]
vectorize(|H_z1(e^(1i*2*π*ff/f_d))|) = [1; 0.82262; 0.000833321; 0]
z_0 := vectorize(Z(p_01, f_d))
z_p := vectorize(Z(p_p1, f_d))
z_0 :=
    stack(-1, z_0) if r > 0
    z_0 otherwise
G_0 = 63.2452
z_0 = [-1; 0.553562 + 0.832808i; 0.553562 - 0.832808i; 0.141339 + 0.989961i; 0.141339 - 0.989961i]
G_0z := 2^(1 - r)*product(1 - z_0[n], n = 0 .. rows(z_0) - 1)/product(1 - z_p[n], n = 0 .. rows(z_p) - 1) = 132.06
1/G_0z = 0.00757231
r = 1
H_z2(z) := G_p^(1 - r)/G_0z*product(1 - z_0[n]*z^-1, n = 0 .. rows(z_0) - 1)/product(1 - z_p[n]*z^-1, n = 0 .. rows(z_p) - 1)
[G_p^(1 - r); G_p; G_s; 0] = [1; 0.794328; 0.00316228; 0]
vectorize(|H_z2(e^(1i*2*π*ff/f_d))|) = [1; 0.82262; 0.000833321; 0]
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G_p = 0.794328
H1(p) := H_01(p)
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f_p = 381.972
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hh_z2 := vectorize(h(tt, H(f) ← H_z2(e^(1i*2*π*f/f_d))))
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3/f_p/dt = 39.2699
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ff := 0, f_s/100 .. f_s
Φ(f) := integral(d/df1(arg(H_z(e^(1i*2*π*f1/f_d)))/π), f1 = 0 .. f)
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