# Рассчёт Эллиптического фильтра
# https://ru.dsplib.org/content/filter_ellip_ap/filter_ellip_ap.html
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db(x) := 10^(x/20)
db_P(x) := 10^(x/10)
to_db(x) := 20*log(|x|)
to_dbP(x) := 10*log(|x|)
roundup(x) := Trunc(x, 1) + (Trunc(x, 1) ≠ x)
abs(z) := |z|
samples := 100
n := 0 .. samples - 1
circle_x[n] := cos(2*π/(samples - 1)*n)
circle_y[n] := sin(2*π/(samples - 1)*n)
Ki(k) :=
    k_0 ← k/(1 + sqrt(1 - k*k))
    k_0*k_0
K(k) :=
    ki ← Ki(k)
    (1 + ki)*K(ki) if k - ki > 0
    π/2 otherwise
T(k) := K(sqrt(1 - k*k))
sn(u, k) :=
    ki ← Ki(k)
    sin(u*π/2) if k - ki ≤ 0
    otherwise
        w ← sn(u, ki)
        (1 + ki)/(1/w + ki*w)
cd(u, k) :=
    ki ← Ki(k)
    cos(u*π/2) if k - ki ≤ 0
    otherwise
        w ← cd(u, ki)
        (1 + ki)/(1/w + ki*w)
sn_inv(sn, k) :=
    ki ← Ki(k)
    sn_inv(2*sn/((1 + ki)*(1 + sqrt(1 - k*k*sn*sn))), ki) if k - ki > 0
    2*asin(sn)/π
cd_inv(cn, k) :=
    ki ← Ki(k)
    cd_inv(2*cn/((1 + ki)*(1 + sqrt(1 - k*k*cn*cn))), ki) if k - ki > 0
    2*acos(cn)/π
K(0.66667) = 1.80967
T(0.66667) = 1.90424
K(0.0028615) = 1.5708
T(0.0028615) = 7.24272
K(0.9999) = 5.64515
K(1) = 19.4081
Z(p_0, f_d) := (2*f_d + p_0)/(2*f_d - p_0)
z2p(z_0, f_d) := 2*f_d*(1 - z_0^-1)/(1 + z_0^-1)
cd(0.6, 0.93) = 0.761809
sn(0.6, 0.93) = 0.917919
PolynomP(p, P) := product(p - P[n], n = 0 .. rows(P) - 1)
PolynomZ(z, Z) := product(1 - Z[n]*z^-1, n = 0 .. rows(Z) - 1)
0.917918
0.761809423
HP(p, P_0, P_p) := PolynomP(p, P_0)/PolynomP(p, P_p)
HZ(z, Z_0, Z_p) := PolynomZ(z, Z_0)/PolynomZ(z, Z_p)
Ω(T_d, ω) := 2/T_d*tan(ω/2)  # Преобразование частот аналогового фильтра в частоты цифрового
f_analog(f_digital., f_d) := f_d/π*tan(π*f_digital./f_d)
f_digit(f_analog, f_d) := f_d/π*atan(π*f_analog/f_d)
kHz := 10^3
conj(z) := Re(z) - 1i*Im(z)
f_d := 5000  # Гц - частота дискретизации
df := f_d/samples = 50
h(t, H) := 1/f_d*integral(H(f)*e^(1i*2*π*f*t), f = -f_d/2 .. f_d/2)
dt := 1/f_d = 0.0002
tt[n] := n*dt
f_pl := 2*1/(2*π) = 0.31831
f_sl := 4*1/(2*π) = 0.63662
f_sh := 12*1/(2*π) = 1.90986
f_ph := 15*1/(2*π) = 2.38732
ω_pl := 2*π*f_pl = 2
ω_sl := 2*π*f_sl = 4
ω_sh := 2*π*f_sh = 12
ω_ph := 2*π*f_ph = 15
ω_c := ω_sl*ω_sh = 48
Δω := ω_sh - ω_sl = 8
ω_sh = 12
ω_sh_ := ω_c/ω_ph = 3.2
# Гц - частота подавления
f_0 :=
    ω_p ←
        ω_ph if ω_c/ω_ph > ω_pl
        ω_pl otherwise
    1/(2*π)*|Δω*ω_p/(ω_c - ω_p^2)|
    = 0.107902
ω_0 := 2*π*f_0 = 0.677966
# Нормированная полоса среза
frequancy :=
    "high" if ω_c/ω_ph > ω_pl
    "low" otherwise
    = "high"
ω_c/ω_ph > ω_pl = 1
Δω = 8
ω_c > ω_pl*ω_ph = 1
ω_ph = 15
1/(2*π)*|Δω*ω_pl/(ω_c - ω_pl^2)| = 0.0578745
ω_pl = 2
ω_sl*ω_sh > ω_pl*ω_ph = 1
sqrt(ω_sl*ω_sh) = 6.9282
sqrt(ω_pl*ω_ph) = 5.47723
f_1 := 1/(2*π) = 0.159155  # Гц - частота пропускания
ω_1 := 2*π*f_1 = 1  # Нормированная полоса заграждения
R_p := 1  # Неравномерность в полосе пропускания (дБ)
G_p := (-R_p) db = 0.891251
R_s := 40  # Уровень подавления в полосе заграждения (дБ)
G_s := (-R_s) db = 0.01
Ω(T_d, ω) := 2/T_d*tan(ω/2)  # Преобразование частот аналогового фильтра в частоты цифрового
f_analog(f_digital., f_d) := f_d/π*tan(π*f_digital./f_d)
f_digit(f_analog, f_d) := f_d/π*atan(π*f_analog/f_d)
F_pl := f_analog(f_pl, f_d) = 0.31831
F_pl = 6.3662e-5 f_d
f_digit(F_pl, f_d) = 0.31831
F_ph := f_analog(f_ph, f_d) = 2.38733
F_ph = 0.000477465 f_d
f_digit(F_ph, f_d) = 2.38732
F_sl := f_analog(f_sl, f_d) = 0.63662
F_sl = 0.000127324 f_d
F_sh := f_analog(f_sh, f_d) = 1.90986
F_sh = 0.000381972 f_d
Ω_pl := 2*π*F_pl = 2
Ω_ph := 2*π*F_ph = 15  # Частота среза аналогового фильтра
Ω_sl := 2*π*F_sl = 4
Ω_sh := 2*π*F_sh = 12  # Частота заграждения аналогового фильтра
F_0 := f_analog(f_0, f_d) = 0.107902
Ω_0 := 2*π*F_0 = 0.677966
F_1 := f_analog(f_1, f_d) = 0.159155
Ω_1 := 2*π*F_1 = 1
# Порядок фильтра
G_p := 1/sqrt(1 + ε_p^2)  # disabled
ε_p := sqrt(10^(R_p/10) - 1) = 0.508847
1/sqrt(1 + ε_p^2) = 0.891251
G_p = 0.891251
ε_s := sqrt(10^(R_s/10) - 1) = 99.995
1/ε_s = 0.0100005
k_ω := ω_0/ω_1 = 0.677966
ω_0 = 0.677966
ε_s/ε_p = 196.513
Ω_0/Ω_1 = 0.677966
k_ε := ε_p/ε_s = 0.00508873
T(k_ε)*K(k_ω)/(K(k_ε)*T(k_ω)) = 4.09038
N := ceil(T(k_ε)*K(k_ω)/(K(k_ε)*T(k_ω))) = 5
L := Trunc(N/2, 1) = 2
r := mod(N, 2) = 1
u(n) := (2*n - 1)/N
un := matrix(L, 1, f(n, m) ← u(n + 1))
m := sqrt(1 - k_ε^2) = 0.999987
transpose(un) = [0.2, 0.6]
k_p := m^N*product(sn(u(n), m)^4, n = 1 .. L) = 0.571562
k_ω := sqrt(1 - k_p^2) = 0.820559
un = [0.2; 0.6]
k_ω = 0.820559
ω_0 = 0.677966
# Нули
# http://www.dsplib.ru/content/filters/ch8/ch8.html
F_0/f_d = 2.15803e-5
F_1/f_d = 3.1831e-5
zeros := 1i*ω_0/(k_ω*cd(un, k_ω)) = [0.850039i; 1.19613i]
υ_0 := -1i/N*sn_inv(1i/ε_p, k_ε) = 0.181815
p_0 := stack(zeros, conj(zeros))
# Полюса
H0(p) := (0.029832 + 0.045716*p^2 + 0.01*p^4)/(0.033472 + 0.134976*p + 0.460777*p^2 + 0.518148*p^3 + p^4)
p_p :=
    pp[0] ← 1i*sn(1i*υ_0, k_ω) if r > 0
    for n ∈ 0 .. L - 1
        pp[2*n + r] ← 1i*cd(un[n] - 1i*υ_0, k_ω)
        pp[2*n + 1 + r] ← conj(pp[2*n + r])
    pp*ω_0
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G_0 := PolynomP(0, p_0)/PolynomP(0, p_p)
H_0(p) := G_p^(1 - r)/G_0*PolynomP(p, p_0)/PolynomP(p, p_p)
G_p^(1 - r)/G_0*PolynomP(p, p_0) coeffs → [0.0329227679358; 0; 0.0685749630877; 0; 0.0318466291047]
PolynomP(p, p_p) coeffs → [
    0.0329227679358 + 8.24378409982e-31i;
    0.166508345963 + 3.97982203087e-30i;
    0.351897432059 + 2.3310652109e-30i;
    0.849013815752 - 3.15544362088e-30i;
    0.626045835581;
    1
]
p_0 = [0.850039i; 1.19613i; -0.850039i; -1.19613i]
p_p = [-0.261256; -0.0338451 + 0.676745i; -0.0338451 - 0.676745i; -0.14855 + 0.502397i; -0.14855 - 0.502397i]
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f_0 = 0.107902
ω_1/ω_0 = 1.475
f_1 = 0.159155
# Подставнока
p == Δω*p/(p^2 + ω_c^2)
ppf_w(P_p, P_0, ω_c, Δω) :=
    count_p ← rows(P_p)
    count_0 ← rows(P_0)
    for i ∈ 0 .. count_p - 1
        pdw ← 0.5*Δω/P_p[i]
        [p1[i*2]; p1[i*2 + 1]] ← [pdw + sqrt(pdw^2 - ω_c); pdw - sqrt(pdw^2 - ω_c)]
    for i ∈ 0 .. count_0 - 1
        pdw ← 0.5*Δω/P_0[i]
        [p01[i*2]; p01[i*2 + 1]] ← [pdw + sqrt(pdw^2 - ω_c); pdw - sqrt(pdw^2 - ω_c)]
    if count_p ≠ count_0
        for i ∈ 0 .. (count_p - count_0) - 1
            [p02[i*2]; p02[i*2 + 1]] ← [1i*sqrt(ω_c); -1i*sqrt(ω_c)]
        p01 ← stack(p01, p02)
    [p1; p01]
ppf(P_p, P_0, f_min, f_max) :=
    count_p ← rows(P_p)
    count_0 ← rows(P_0)
    ω_min ← 2*π*f_min
    ω_max ← 2*π*f_max
    Δω ← ω_max - ω_min
    ω_c ← ω_min*ω_max
    ppf_w(P_p, P_0, ω_c, Δω)
H0(p) := G_p^(1 - r)/G_0*product(p - p_0[n], n = 0 .. rows(p_0) - 1)/product(p - p_p[n], n = 0 .. rows(p_p) - 1)
[p_p1; p_01] := ppf_w(p_p, p_0, ω_c, Δω)
G_02 := HP(1i*2*π*sqrt(f_sl*f_sh), p_01, p_p1) = 7.07137e-18i
[p_p1; p_01] := ppf(p_p, p_0, F_sl, F_sh)
G_02 := HP(1i*2*π*sqrt(F_sl*F_sh), p_01, p_p1) = 7.07137e-18i
Δω/(2*p_0) + sqrt((Δω/(2*p_0))^2 - ω_c) = [3.66949i; 4.34894i; 13.0808i; 11.0372i]
Δω/(2*p_p) + sqrt((Δω/(2*p_p))^2 - ω_c) = [-1.65722; -0.103707 + 3.19867i; -0.103707 - 3.19867i; -0.575422 + 2.65061i; -0.575422 - 2.65061i]
rows(p_p1) = 10
rows(p_01) = 10
p_01 = [3.66949i; -13.0808i; 4.34894i; -11.0372i; 13.0808i; -3.66949i; 11.0372i; -4.34894i; 6.92821i; -6.92821i]
p_p1 = [-1.65722; -28.9641; -0.103707 + 3.19867i; -0.48602 - 14.9905i; -0.103707 - 3.19867i; -0.48602 + 14.9905i; -0.575422 + 2.65061i; -3.75437 - 17.294i; -0.575422 - 2.65061i; -3.75437 + 17.294i]
H_2(p) := G_p^(1 - r)*product(p - p_01[n], n = 0 .. rows(p_01) - 1)/product(p - p_p1[n], n = 0 .. rows(p_p1) - 1)
H_23(p) := H_0(Δω*p/(p^2 + ω_c))
Δω/(2*p_0) - sqrt((Δω/(2*p_0))^2 - ω_c) = [-13.0808i; -11.0372i; -3.66949i; -4.34894i]
Δω/(2*p_p) - sqrt((Δω/(2*p_p))^2 - ω_c) = [-28.9641; -0.48602 - 14.9905i; -0.48602 + 14.9905i; -3.75437 - 17.294i; -3.75437 + 17.294i]
rows(p_01) = 10
rows(p_p1) = 10
exp(sum(ln(-p_0)) - sum(ln(-p_p))) = 31.4005
H_3(p) := G_p^(1 - r)/G_0*product(-p_0[n], n = 0 .. rows(p_0) - 1)/product(-p_p[n], n = 0 .. rows(p_p) - 1)*product((p - (Δω/(2*p_0[n]) + sqrt((Δω/(2*p_0[n]))^2 - ω_c)))*(p - (Δω/(2*p_0[n]) - sqrt((Δω/(2*p_0[n]))^2 - ω_c))), n = 0 .. rows(p_0) - 1)/product((p - (Δω/(2*p_p[n]) + sqrt((Δω/(2*p_p[n]))^2 - ω_c)))*(p - (Δω/(2*p_p[n]) - sqrt((Δω/(2*p_p[n]))^2 - ω_c))), n = 0 .. rows(p_p) - 1)*product((p - 1i*sqrt(ω_c))*(p + 1i*sqrt(ω_c)), n = 0 .. rows(p_p) - rows(p_0) - 1)
product(-p_0[n], n = 0 .. rows(p_0) - 1)/product(-p_p[n], n = 0 .. rows(p_p) - 1) = 31.4005
H_2(1i*sqrt(ω_c)) = 4.25332e-15 - 1.47093e-8i
H_3(p) := G_p^(1 - r)/G_0*product(-p_0[n], n = 0 .. rows(p_0) - 1)/product(-p_p[n], n = 0 .. rows(p_p) - 1)*product({
    pdw ← 0.5*Δω/p_0[n]
    ((p - (pdw + sqrt(pdw^2 - ω_c)))*(p - (pdw - sqrt(pdw^2 - ω_c))))
}, n = 0 .. rows(p_0) - 1)/product({
    pdw ← 0.5*Δω/p_p[n]
    ((p - (pdw + sqrt(pdw^2 - ω_c)))*(p - (pdw - sqrt(pdw^2 - ω_c))))
}, n = 0 .. rows(p_p) - 1)*((p - 1i*sqrt(ω_c))*(p + 1i*sqrt(ω_c)))^(rows(p_p) - rows(p_0))
P_2(p) := product(p - p_01[n], n = 0 .. rows(p_01) - 1)
|P_2(1i*sqrt(ω_c))| = 233.696
1i*sqrt(ω_c) = 6.9282i
Q_2(p) := product(p - p_p1[n], n = 0 .. rows(p_p1) - 1)
|Q_2(1i*sqrt(ω_c))| = 1.58876e10
rows(p_01) = 10
|P_2(1i*sqrt(ω_c))|/|Q_2(1i*sqrt(ω_c))| = 1.47093e-8
|H_2(1i*sqrt(ω_c))| = 1.47093e-8
product(1i*sqrt(ω_c) - p_01[n], n = 0 .. 9) = 233.696
|P_2(1i*sqrt(ω_c))|/|Q_2(1i*sqrt(ω_c))| = 1.47093e-8
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