# Рассчёт Эллиптического фильтра
# https://ru.dsplib.org/content/filter_ellip_ap/filter_ellip_ap.html
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db(x) := 10^(x/20)
db_P(x) := 10^(x/10)
to_db(x) := 20*log(|x|)
to_dbP(x) := 10*log(|x|)
roundup(x) := Trunc(x, 1) + (Trunc(x, 1) ≠ x)
abs(z) := |z|
samples := 100
n := 0 .. samples - 1
circle_x[n] := cos(2*π/(samples - 1)*n)
circle_y[n] := sin(2*π/(samples - 1)*n)
Ki(k) :=
    k_0 ← k/(1 + sqrt(1 - k*k))
    k_0*k_0
K(k) :=
    ki ← Ki(k)
    (1 + ki)*K(ki) if k - ki > 0
    π/2 otherwise
T(k) := K(sqrt(1 - k*k))
sn(u, k) :=
    ki ← Ki(k)
    sin(u*π/2) if k - ki ≤ 0
    otherwise
        w ← sn(u, ki)
        (1 + ki)/(1/w + ki*w)
cd(u, k) :=
    ki ← Ki(k)
    cos(u*π/2) if k - ki ≤ 0
    otherwise
        w ← cd(u, ki)
        (1 + ki)/(1/w + ki*w)
sn_inv(sn, k) :=
    ki ← Ki(k)
    sn_inv(2*sn/((1 + ki)*(1 + sqrt(1 - k*k*sn*sn))), ki) if k - ki > 0
    2*asin(sn)/π
cd_inv(cn, k) :=
    ki ← Ki(k)
    cd_inv(2*cn/((1 + ki)*(1 + sqrt(1 - k*k*cn*cn))), ki) if k - ki > 0
    2*acos(cn)/π
K(0.66667) = 1.80967
T(0.66667) = 1.90424
K(0.0028615) = 1.5708
T(0.0028615) = 7.24272
Z(p_0, f_d) := (2*f_d + p_0)/(2*f_d - p_0)
z2p(z_0, f_d) := 2*f_d*(1 - z_0^-1)/(1 + z_0^-1)
cd(0.6, 0.93) = 0.761809
sn(0.6, 0.93) = 0.917919
PolynomP(p, P) := product(p - P[n], n = 0 .. rows(P) - 1)
PolynomZ(z, Z) := product(1 - Z[n]*z^-1, n = 0 .. rows(Z) - 1)
0.917918
0.761809423
HP(p, P_0, P_p) := PolynomP(p, P_0)/PolynomP(p, P_p)
HZ(z, Z_0, Z_p) := PolynomZ(z, Z_0)/PolynomZ(z, Z_p)
Ω(T_d, ω) := 2/T_d*tan(ω/2)  # Преобразование частот аналогового фильтра в частоты цифрового
f_analog(f_digital., f_d) := f_d/π*tan(π*f_digital./f_d)
f_digit(f_analog, f_d) := f_d/π*atan(π*f_analog/f_d)
kHz := 10^3
conj(z) := Re(z) - 1i*Im(z)
f_d := 100  # Гц - частота дискретизации
df := f_d/samples = 1
h(t, H) := 1/f_d*integral(H(f)*e^(1i*2*π*f*t), f = -f_d/2 .. f_d/2)
dt := 1/f_d = 0.01
tt[n] := n*dt
f_sl := 4 = 4
f_pl := 5 = 5
f_ph := 15 = 15
f_sh := 18 = 18
ω_sl := 2*π*f_sl = 25.1327
ω_pl := 2*π*f_pl = 31.4159
ω_ph := 2*π*f_ph = 94.2478
ω_sh := 2*π*f_sh = 113.097
ω_c := ω_pl*ω_ph = 2960.88
Δω := ω_ph - ω_pl = 62.8319
f_pl*f_ph = 75
f_sl*f_sh = 72
ω_c/ω_sh > ω_sl = 1
ω_sh_ := ω_c/ω_sh = 26.1799
ω_sh = 113.097
(ω_c - ω_sh^2)/(Δω*ω_sh) = -1.38333
|(ω_c - ω_sh^2)/(Δω*ω_sh)| = 1.38333
f_0 := 1/(2*π) = 0.159155
# Гц - частота пропускания
ω_0 := 2*π*f_0 = 1  # Нормированная полоса среза
# http://www.dsplib.ru/content/filters/ch8/ch8.html
f_1 :=
    ω_s ←
        ω_sh if ω_c/ω_sh > ω_sl
        ω_sl otherwise
    1/(2*π)*|(ω_c - ω_s^2)/(Δω*ω_s)|
    = 0.220164  # Гц - частота подавления
ω_1 := 2*π*f_1 = 1.38333  # Нормированная полоса заграждения
1/(2*π)*|(f_pl*f_ph - f_sh^2)/((f_ph - f_pl)*f_sh)| = 0.220164
R_p := 1  # Неравномерность в полосе пропускания (дБ)
G_p := (-R_p) db = 0.891251
R_s := 40  # Уровень подавления в полосе заграждения (дБ)
G_s := (-R_s) db = 0.01
# Порядок фильтра
ε_p := sqrt(10^(R_p/10) - 1) = 0.508847
ε_s := sqrt(10^(R_s/10) - 1) = 99.995
k_ω := ω_0/ω_1 = 0.722892
k_ε := ε_p/ε_s = 0.00508873
G_p := 1/sqrt(1 + ε_p^2) = 0.891251
T(k_ε)*K(k_ω)/(K(k_ε)*T(k_ω)) = 4.33287
N := ceil(T(k_ε)*K(k_ω)/(K(k_ε)*T(k_ω))) = 5
L := Trunc(N/2, 1) = 2
r := mod(N, 2) = 1
u(n) := (2*n - 1)/N
un := matrix(L, 1, f(n, m) ← u(n + 1))
m := sqrt(1 - k_ε^2) = 0.999987
k_p := m^N*product(sn(u(n), m)^4, n = 1 .. L) = 0.571562
k_ω := sqrt(1 - k_p^2) = 0.820559
# Нули
zeros := 1i/(k_ω*cd(un, k_ω)) = [1.25381i; 1.76429i]
υ_0 := -1i/N*sn_inv(1i/ε_p, k_ε) = 0.181815
p_0 := stack(zeros, conj(zeros))
H0(p) := (0.22985 + 0.22005*p^2 + 0.04697*p^4)/(0.22985 + 0.78813*p + 1.12923*p^2 + 1.84712*p^3 + 0.92340*p^4 + p^5)
# Полюса
p_p :=
    pp[0] ← 1i*sn(1i*υ_0, k_ω) if r > 0
    for n ∈ 0 .. L - 1
        pp[2*n + r] ← 1i*cd(un[n] - 1i*υ_0, k_ω)
        pp[2*n + 1 + r] ← conj(pp[2*n + r])
    pp
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G_0 := PolynomP(0, p_0)/PolynomP(0, p_p)
H_0(p) := G_p^(1 - r)/G_0*PolynomP(p, p_0)/PolynomP(p, p_p)
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# Подставнока
p == (p^2 + ω_c^2)/(Δω*p)
ppf_poles(P, f_min, f_max) :=
    count ← rows(P)
    ω_min ← 2*π*f_min
    ω_max ← 2*π*f_max
    Δω ← ω_max - ω_min
    ω2_c ← ω_min*ω_max
    for i ∈ 0 .. count - 1
        pdw ← P[i]*Δω/2
        [p1[i*2]; p1[i*2 + 1]] ← [pdw + sqrt(pdw^2 - ω2_c); pdw - sqrt(pdw^2 - ω2_c)]
    p1
ppf_w(P_p, P_0, ω_c, Δω) :=
    count_p ← rows(P_p)
    count_0 ← rows(P_0)
    p01[count_0*2 + (count_p - count_0) - 1] ← 0
    for i ∈ 0 .. count_p - 1
        pdw ← 0.5*P_p[i]*Δω
        [p1[i*2]; p1[i*2 + 1]] ← [pdw + sqrt(pdw^2 - ω_c); pdw - sqrt(pdw^2 - ω_c)]
    for i ∈ 0 .. count_0 - 1
        pdw ← 0.5*P_0[i]*Δω
        [p01[i*2]; p01[i*2 + 1]] ← [pdw + sqrt(pdw^2 - ω_c); pdw - sqrt(pdw^2 - ω_c)]
    [p1; p01]
ppf(P_p, P_0, f_min, f_max) :=
    count_p ← rows(P_p)
    count_0 ← rows(P_0)
    ω_min ← 2*π*f_min
    ω_max ← 2*π*f_max
    Δω ← ω_max - ω_min
    ω_c ← ω_min*ω_max
    ppf_w(P_p, P_0, ω_c, Δω)
[p_p1; p_01] := ppf_w(p_p, p_0, ω_c, Δω)
G_02 := HP(1i*2*π*sqrt(f_pl*f_ph), p_01, p_p1) = 0.338817
[p_p1; p_01] := ppf(p_p, p_0, f_pl, f_ph)
G_02 := HP(1i*2*π*sqrt(f_pl*f_ph), p_01, p_p1) = 0.338817
H_2(p) := 1/G_02*HP(p, p_01, p_p1)
H2(p) := (1.4862*10^7*p + 2.0305*10^6*p^3 + 71846*p^5 + 360.97*p^7 + 0.469721*p^9)/(2.373*10^9 + 2.9217*10^8*p + 2.3613*10^8*p^2 + 2.1934*10^7*p^3 + 7.9269*10^6*p^4 + 5.0402*10^5*p^5 + 1.0569*10^5*p^6 + 3899.4*p^7 + 559.71*p^8 + 9.2340*p^9 + p^10)
z_p2 := Z(p_p1, f_d)
z_02 := Z(p_01, f_d)
pp_0 := stack(-1, z_02) = [-1; 0.557757 + 0.830004i; 0.962131 - 0.272589i; 0.386112 + 0.922452i; 0.975559 - 0.219738i; 0.962131 + 0.272589i; 0.557757 - 0.830004i; 0.975559 + 0.219738i; 0.386112 - 0.922452i; 1]
F_1 := f_analog(f_pl, f_d)
F_2 := f_analog(f_ph, f_d)
z0 := e^(-1i*2*π*sqrt(f_pl*f_ph)/f_d) = 0.855573 - 0.517682i
Ω_1 := 2*π*F_1
Ω_2 := 2*π*F_2 = 101.905
ΔΩ := Ω_2 - Ω_1
Kz0(z) := (1 + z^-1)^r*product(1 - z_02[n]*z^-1, n = 0 .. rows(z_02) - 1)/product(1 - z_p2[n]*z^-1, n = 0 .. rows(z_p2) - 1)
|Kz0(e^(1i*2*π*sqrt(f_pl*f_ph)/f_d))| = 73.8316
H_z22(z) := 1/73.8316*(1 + z^-1)*product(1 - z_02[n]*z^-1, n = 0 .. rows(z_02) - 1)/product(1 - z_p2[n]*z^-1, n = 0 .. rows(z_p2) - 1)
20*log(|H_z22(e^(1i*2*π*f_ph/f_d))|) = -26.5196
|H_z22(e^(1i*2*π*sqrt(f_pl*f_ph)/f_d))| = 1
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# Подстановка ФНЧ-ПЗФ
p == Δω*p/(p^2 + ω_c)
p_p = [-0.385353; -0.0499216 + 0.998199i; -0.0499216 - 0.998199i; -0.219111 + 0.741036i; -0.219111 - 0.741036i]
p_0 = [1.25381i; 1.76429i; -1.25381i; -1.76429i]
Δω*p/(p^2 + ω_c)
H_3(p) := G_p^(1 - r)/G_0*(Δω*p/(p^2 + ω_c) - p_0[0])*(Δω*p/(p^2 + ω_c) - p_0[1])*(Δω*p/(p^2 + ω_c) - p_0[2])*(Δω*p/(p^2 + ω_c) - p_0[3])/((Δω*p/(p^2 + ω_c) - p_p[0])*(Δω*p/(p^2 + ω_c) - p_p[1])*(Δω*p/(p^2 + ω_c) - p_p[2])*(Δω*p/(p^2 + ω_c) - p_p[3])*(Δω*p/(p^2 + ω_c) - p_p[4]))
H_3(p) := G_p^(1 - r)/G_0*(Δω*p/(p^2 + ω_c) - p_0[0])*(Δω*p/(p^2 + ω_c) - p_0[1])*(Δω*p/(p^2 + ω_c) - p_0[2])*(Δω*p/(p^2 + ω_c) - p_0[3])/(1/(p^2 + ω_c)*(Δω*p - (p^2 + ω_c)*p_p[0])*(Δω*p/(p^2 + ω_c) - p_p[1])*(Δω*p/(p^2 + ω_c) - p_p[2])*(Δω*p/(p^2 + ω_c) - p_p[3])*(Δω*p/(p^2 + ω_c) - p_p[4]))
H_3(p) := G_p^(1 - r)/G_0*(Δω*p/(p^2 + ω_c) - p_0[0])*(Δω*p/(p^2 + ω_c) - p_0[1])*(Δω*p/(p^2 + ω_c) - p_0[2])*(Δω*p/(p^2 + ω_c) - p_0[3])/(1/(p^2 + ω_c)*(-p_p[0]*p^2 + Δω*p - p_p[0]*ω_c)*(Δω*p/(p^2 + ω_c) - p_p[1])*(Δω*p/(p^2 + ω_c) - p_p[2])*(Δω*p/(p^2 + ω_c) - p_p[3])*(Δω*p/(p^2 + ω_c) - p_p[4]))
H_3(p) := G_p^(1 - r)/G_0*(Δω*p/(p^2 + ω_c) - p_0[0])*(Δω*p/(p^2 + ω_c) - p_0[1])*(Δω*p/(p^2 + ω_c) - p_0[2])*(Δω*p/(p^2 + ω_c) - p_0[3])/(1/(p^2 + ω_c)^2*(-p_p[0]*p^2 + Δω*p - p_p[0]*ω_c)*(-p_p[1]*p^2 + Δω*p - p_p[1]*ω_c)*(Δω*p/(p^2 + ω_c) - p_p[2])*(Δω*p/(p^2 + ω_c) - p_p[3])*(Δω*p/(p^2 + ω_c) - p_p[4]))
H_3(p) := G_p^(1 - r)/G_0*(Δω*p/(p^2 + ω_c) - p_0[0])*(Δω*p/(p^2 + ω_c) - p_0[1])*(Δω*p/(p^2 + ω_c) - p_0[2])*(Δω*p/(p^2 + ω_c) - p_0[3])/(1/(p^2 + ω_c)^5*(-p_p[0]*p^2 + Δω*p - p_p[0]*ω_c)*(-p_p[1]*p^2 + Δω*p - p_p[1]*ω_c)*(-p_p[2]*p^2 + Δω*p - p_p[2]*ω_c)*(-p_p[3]*p^2 + Δω*p - p_p[3]*ω_c)*(-p_p[4]*p^2 + Δω*p - p_p[4]*ω_c))
H_3(p) := G_p^(1 - r)/G_0*1/(p^2 + ω_c)^4*(-p_0[0]*p^2 + Δω*p - p_0[0]*ω_c)*(-p_0[1]*p^2 + Δω*p - p_0[1]*ω_c)*(-p_0[2]*p^2 + Δω*p - p_0[2]*ω_c)*(-p_0[3]*p^2 + Δω*p - p_0[3]*ω_c)/(1/(p^2 + ω_c)^5*(-p_p[0]*p^2 + Δω*p - p_p[0]*ω_c)*(-p_p[1]*p^2 + Δω*p - p_p[1]*ω_c)*(-p_p[2]*p^2 + Δω*p - p_p[2]*ω_c)*(-p_p[3]*p^2 + Δω*p - p_p[3]*ω_c)*(-p_p[4]*p^2 + Δω*p - p_p[4]*ω_c))
H_3(p) := G_p^(1 - r)/G_0*(p^2 + ω_c)^5/(p^2 + ω_c)^4*(-p_0[0]*p^2 + Δω*p - p_0[0]*ω_c)*(-p_0[1]*p^2 + Δω*p - p_0[1]*ω_c)*(-p_0[2]*p^2 + Δω*p - p_0[2]*ω_c)*(-p_0[3]*p^2 + Δω*p - p_0[3]*ω_c)/((-p_p[0]*p^2 + Δω*p - p_p[0]*ω_c)*(-p_p[1]*p^2 + Δω*p - p_p[1]*ω_c)*(-p_p[2]*p^2 + Δω*p - p_p[2]*ω_c)*(-p_p[3]*p^2 + Δω*p - p_p[3]*ω_c)*(-p_p[4]*p^2 + Δω*p - p_p[4]*ω_c))
H_3(p) := G_p^(1 - r)/G_0*(p^2 + ω_c)*(-p_0[0]*p^2 + Δω*p - p_0[0]*ω_c)*(-p_0[1]*p^2 + Δω*p - p_0[1]*ω_c)*(-p_0[2]*p^2 + Δω*p - p_0[2]*ω_c)*(-p_0[3]*p^2 + Δω*p - p_0[3]*ω_c)/((-p_p[0]*p^2 + Δω*p - p_p[0]*ω_c)*(-p_p[1]*p^2 + Δω*p - p_p[1]*ω_c)*(-p_p[2]*p^2 + Δω*p - p_p[2]*ω_c)*(-p_p[3]*p^2 + Δω*p - p_p[3]*ω_c)*(-p_p[4]*p^2 + Δω*p - p_p[4]*ω_c))
(-p_p[□])*p^2 + Δω*p + (-p_p[□]*ω_c) == 0
(p - ((-Δω + sqrt(Δω^2 - 4*(-p_p[0])*(-p_p[0]*ω_c)))/(2*(-p_p[0]))))*(p - ((-Δω - sqrt(Δω^2 - 4*(-p_p[0])*(-p_p[0]*ω_c)))/(2*(-p_p[0]))))
p == (-Δω □ sqrt(Δω^2 - 4*(-p_p[□])*(-p_p[□]*ω_c)))/(2*(-p_p[□]))
H_3(p) := G_p^(1 - r)/G_0*(p - 1i*sqrt(ω_c))*(p + 1i*sqrt(ω_c))*(-p_0[0]*p^2 + Δω*p - p_0[0]*ω_c)*(-p_0[1]*p^2 + Δω*p - p_0[1]*ω_c)*(-p_0[2]*p^2 + Δω*p - p_0[2]*ω_c)*(-p_0[3]*p^2 + Δω*p - p_0[3]*ω_c)/((-p_p[0]*p^2 + Δω*p - p_p[0]*ω_c)*(-p_p[1]*p^2 + Δω*p - p_p[1]*ω_c)*(-p_p[2]*p^2 + Δω*p - p_p[2]*ω_c)*(-p_p[3]*p^2 + Δω*p - p_p[3]*ω_c)*(-p_p[4]*p^2 + Δω*p - p_p[4]*ω_c))
p == (-Δω □ sqrt(Δω^2 - 4*p_p[□]^2*ω_c))/(2*(-p_p[□]))
H_3(p) := G_p^(1 - r)/G_0*(p - 1i*sqrt(ω_c))*(p + 1i*sqrt(ω_c))*(-p_0[0]*p^2 + Δω*p - p_0[0]*ω_c)*(-p_0[1]*p^2 + Δω*p - p_0[1]*ω_c)*(-p_0[2]*p^2 + Δω*p - p_0[2]*ω_c)*(-p_0[3]*p^2 + Δω*p - p_0[3]*ω_c)/(((-p_p[0])*p^2 + Δω*p + (-p_p[0]*ω_c))*(-p_p[1]*p^2 + Δω*p - p_p[1]*ω_c)*(-p_p[2]*p^2 + Δω*p - p_p[2]*ω_c)*(-p_p[3]*p^2 + Δω*p - p_p[3]*ω_c)*(-p_p[4]*p^2 + Δω*p - p_p[4]*ω_c))
p == (Δω □ sqrt(Δω^2 - 4*p_p[□]^2*ω_c))/(2*p_p[□])
H_3(p) := G_p^(1 - r)/G_0*(p - 1i*sqrt(ω_c))*(p + 1i*sqrt(ω_c))*(-p_0[0]*p^2 + Δω*p - p_0[0]*ω_c)*(-p_0[1]*p^2 + Δω*p - p_0[1]*ω_c)*(-p_0[2]*p^2 + Δω*p - p_0[2]*ω_c)*(-p_0[3]*p^2 + Δω*p - p_0[3]*ω_c)/({
    a ← -p_p[0]
    b ← Δω
    c ← -p_p[0]*ω_c
    D ← b^2 - 4*a*c
    -p_p[0]*(p - (-b + sqrt(D))/(2*a))*(p - (-b - sqrt(D))/(2*a))
}*(-p_p[1]*p^2 + Δω*p - p_p[1]*ω_c)*(-p_p[2]*p^2 + Δω*p - p_p[2]*ω_c)*(-p_p[3]*p^2 + Δω*p - p_p[3]*ω_c)*(-p_p[4]*p^2 + Δω*p - p_p[4]*ω_c))
p == (Δω/(2*p_p[□]) □ sqrt((Δω/(2*p_p[□]))^2 - ω_c))
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(p - (Δω/(2*p_p[0]) - sqrt((Δω/(2*p_p[0]))^2 - ω_c)))*(p - (Δω/(2*p_p[0]) + sqrt((Δω/(2*p_p[0]))^2 - ω_c)))
H_3(p) := G_p^(1 - r)/G_0*((p - 1i*sqrt(ω_c))*(p + 1i*sqrt(ω_c)))^r*(-p_0[0]*p^2 + Δω*p - p_0[0]*ω_c)*(-p_0[1]*p^2 + Δω*p - p_0[1]*ω_c)*(-p_0[2]*p^2 + Δω*p - p_0[2]*ω_c)*(-p_0[3]*p^2 + Δω*p - p_0[3]*ω_c)/((-p_p[0])*(p - (Δω/(2*p_p[0]) - sqrt((Δω/(2*p_p[0]))^2 - ω_c)))*(p - (Δω/(2*p_p[0]) + sqrt((Δω/(2*p_p[0]))^2 - ω_c)))*(-p_p[1]*p^2 + Δω*p - p_p[1]*ω_c)*(-p_p[2]*p^2 + Δω*p - p_p[2]*ω_c)*(-p_p[3]*p^2 + Δω*p - p_p[3]*ω_c)*(-p_p[4]*p^2 + Δω*p - p_p[4]*ω_c))
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