# Рассчёт Эллиптического фильтра
# https://ru.dsplib.org/content/filter_ellip_ap/filter_ellip_ap.html
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db(x) := 10^(x/20)
db_P(x) := 10^(x/10)
to_db(x) := 20*log(|x|)
to_dbP(x) := 10*log(|x|)
roundup(x) := Trunc(x, 1) + (Trunc(x, 1) ≠ x)
abs(z) := |z|
samples := 100
n := 0 .. samples - 1
circle_x[n] := cos(2*π/(samples - 1)*n)
circle_y[n] := sin(2*π/(samples - 1)*n)
Ki(k) :=
    k_0 ← k/(1 + sqrt(1 - k*k))
    k_0*k_0
K(k) :=
    ki ← Ki(k)
    (1 + ki)*K(ki) if k - ki > 0
    π/2 otherwise
T(k) := K(sqrt(1 - k*k))
sn(u, k) :=
    ki ← Ki(k)
    sin(u*π/2) if k - ki ≤ 0
    otherwise
        w ← sn(u, ki)
        (1 + ki)/(1/w + ki*w)
cd(u, k) :=
    ki ← Ki(k)
    cos(u*π/2) if k - ki ≤ 0
    otherwise
        w ← cd(u, ki)
        (1 + ki)/(1/w + ki*w)
sn_inv(sn, k) :=
    ki ← Ki(k)
    sn_inv(2*sn/((1 + ki)*(1 + sqrt(1 - k*k*sn*sn))), ki) if k - ki > 0
    2*asin(sn)/π
cd_inv(cn, k) :=
    ki ← Ki(k)
    cd_inv(2*cn/((1 + ki)*(1 + sqrt(1 - k*k*cn*cn))), ki) if k - ki > 0
    2*acos(cn)/π
K(0.66667) = 1.80967
T(0.66667) = 1.90424
K(0.0028615) = 1.5708
T(0.0028615) = 7.24272
Z(p_0, f_d) := (2*f_d + p_0)/(2*f_d - p_0)
z2p(z_0, f_d) := 2*f_d*(1 - z_0^-1)/(1 + z_0^-1)
cd(0.6, 0.93) = 0.761809
sn(0.6, 0.93) = 0.917919
PolynomP(p, P) := product(p - P[n], n = 0 .. rows(P) - 1)
PolynomZ(z, Z) := product(1 - Z[n]*z^-1, n = 0 .. rows(Z) - 1)
0.917918
0.761809423
HP(p, P_0, P_p) := PolynomP(p, P_0)/PolynomP(p, P_p)
HZ(z, Z_0, Z_p) := PolynomZ(z, Z_0)/PolynomZ(z, Z_p)
f_p := 10
# Гц - частота пропускания
f_d := 5000  # Гц - частота дискретизации
f_s := 80
# Гц - частота подавления
dt := 1/f_d = 0.0002
tt[n] := n*dt
Δff := f_s - f_p = 70
h(t, H) := 1/f_d*integral(H(f)*e^(1i*2*π*f*t), f = -f_d/2 .. f_d/2)
ω_p := 2*π*f_p/f_d = 0.004*π  # Нормированная полоса среза
ω_p = 0.0125664
ω_s := 2*π*f_s/f_d = 0.032*π
# Нормированная полоса заграждения
ω_s = 0.100531
R_p := 1
G_p := (-R_p) db = 0.891251  # Неравномерность в полосе пропускания (дБ)
R_s := 45
G_s := (-R_s) db = 0.00562341  # Уровень подавления в полосе заграждения (дБ)
df := f_d/samples = 50
Ω(T_d, ω) := 2/T_d*tan(ω/2)  # Преобразование частот аналогового фильтра в частоты цифрового
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f_analog(f_digital., f_d) := f_d/π*tan(π*f_digital./f_d)
f_digit(f_analog, f_d) := f_d/π*atan(π*f_analog/f_d)
F_p := f_analog(f_p, f_d) = 10.0001
F_p = 0.00200003 f_d
f_digit(F_p, f_d) = 10
F_s := f_analog(f_s, f_d) = 80.0674
F_s = 0.0160135 f_d
Ω_p := 2*π*F_p = 62.8327  # Частота среза аналогового фильтра
Ω_s := 2*π*F_s = 503.079  # Частота заграждения аналогового фильтра
# Порядок фильтра
ε_p := sqrt(10^(R_p/10) - 1) = 0.508847
ε_s := sqrt(10^(R_s/10) - 1) = 177.825
1/ε_s = 0.0056235
ε_s/ε_p = 349.467
Ω_s/Ω_p = 8.00664
k_ω := ω_p/ω_s = 0.125
k_ε := ε_p/ε_s = 0.0028615
# Порядок фильтра
N := T(k_ε)*K(k_ω)/(K(k_ε)*T(k_ω)) = 2.09217
N := ceil(N) = 3
# Число парных полюсов | Наличие/отсутсвтие центрального полюса
L := Trunc(N/2, 1) = 1
r := mod(N, 2) = 1
2*L + r = 3
u(n) := (2*n - 1)/N
un := matrix(L, 1, f(n, m) ← u(n + 1))
transpose(un) = [0.333333]
m := sqrt(1 - k_ε^2) = 0.999996
k_p := m^N*product(sn(u(n), m)^4, n = 1 .. L) = 0.938009
k_ω := sqrt(1 - k_p^2) = 0.346611
# Нули
zeros := 1i/(k_ω*cd(un, k_ω)) = [3.30539i]
Im(zeros) = [3.30539]
Ω_p/f_d = 0.0125665
Ω_s/f_d = 0.100616
υ_0 := -1i/N*sn_inv(1i/ε_p, k_ε) = 0.303026
# Полюса
conj(z) := Re(z) - 1i*Im(z)
p_p :=
    pp[0] ← 1i*sn(1i*υ_0, k_ω) if r > 0
    for n ∈ 0 .. L - 1
        pp[2*n + r] ← 1i*cd(un[n] - 1i*υ_0, k_ω)
        pp[2*n + 1 + r] ← conj(pp[2*n + r])
    pp
G_p := 1/sqrt(1 + ε_p^2) = 0.891251
p_p = [-0.514159; -0.233503 + 0.973368i; -0.233503 - 0.973368i]
p_0 := stack(zeros, conj(zeros)) = [3.30539i; -3.30539i]
G_0 := 1
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ppf(P_p, P_0, f_min, f_max) :=
    count_p ← rows(P_p)
    count_0 ← rows(P_0)
    ω_min ← 2*π*f_min
    ω_max ← 2*π*f_max
    Δω ← ω_max - ω_min
    ω_c ← ω_min*ω_max
    p01[count_0*2 + (count_p - count_0) - 1] ← 0
    for i ∈ 0 .. count_p - 1
        pdw ← P_p[i]*Δω
        [p1[i*2]; p1[i*2 + 1]] ← [(P_p[i]*Δω + sqrt((P_p[i]*Δω)^2 - 4*ω_c))/2; (P_p[i]*Δω - sqrt((P_p[i]*Δω)^2 - 4*ω_c))/2]
    for i ∈ 0 .. count_0 - 1
        p0dw ← P_0[i]*Δω
        [p01[i*2]; p01[i*2 + 1]] ← [(P_0[i]*Δω + sqrt((P_0[i]*Δω)^2 - 4*ω_c))/2; (P_0[i]*Δω - sqrt((P_0[i]*Δω)^2 - 4*ω_c))/2]
    [p1; p01]
ppf_poles(P, f_min, f_max) :=
    count ← rows(P)
    ω_min ← 2*π*f_min
    ω_max ← 2*π*f_max
    Δω ← (ω_max - ω_min)/2
    ω2_c ← ω_min*ω_max
    for i ∈ 0 .. count - 1
        pdw ← P[i]*Δω
        [p1[i*2]; p1[i*2 + 1]] ← [pdw + sqrt(pdw^2 - ω2_c); pdw - sqrt(pdw^2 - ω2_c)]
    p1
p01[2*count_p - 1] ← 0
f_0 := 550
Δf := 900
f_1 := 100 = 100
F_1 := f_analog(f_1, f_d) = 100.132
f_2 := 500 = 500
F_2 := f_analog(f_2, f_d) = 517.126
ω_1 := 2*π*f_1
Ω_1 := 2*π*F_1
ω_2 := 2*π*f_2
Ω_2 := 2*π*F_2
ΔΩ := Ω_2 - Ω_1 = 2620.05
Ω_c := Ω_1*Ω_2 = 2044221
ΔΩ^2 = 6864664
ω_c := ω_1*ω_2
Δω := ω_2 - ω_1
p_p2 := ppf_poles(p_p, F_1, F_2)
p_02 := ppf_poles(p_0, F_1, F_2)
p_0 = [3.30539i; -3.30539i]
[p_p1; p_01] := ppf(p_p, p_0, F_1, F_2)
H2(p) := HP(p, p_01, p_p1)
G_0 := product(-p_0[i], i = 0 .. rows(p_0) - 1)/product(-p_p[i], i = 0 .. rows(p_p) - 1) = 21.2077
H_0(p) := G_p^(1 - r)/G_0*product(p - p_0[i], i = 0 .. rows(p_0) - 1)/product(p - p_p[i], i = 0 .. rows(p_p) - 1)
Norm(Pp, P0) := product(-P0[i], i = 0 .. rows(P0) - 1)/product(-Pp[i], i = 0 .. rows(Pp) - 1)
p_p = [-0.514159; -0.233503 + 0.973368i; -0.233503 - 0.973368i]
p_p1 = [-673.561 + 1261.16i; -673.561 - 1261.16i; -100.847 - 627.143i; -510.942 + 3177.42i; -100.847 + 627.143i; -510.942 - 3177.42i]
p_01 = [8890.23i; -229.94i; 229.94i; -8890.23i; 0]
G_p^(1 - r)/G_0 = 0.0471526
(p^2 + ω_c)/(p*Δω)
H_1(p) := G_p^(1 - r)/G_0*(p*ΔΩ)^r*(p - (p_0[0]*ΔΩ + sqrt((p_0[0]*ΔΩ)^2 - 4*Ω_c))/2)*(p - (p_0[0]*ΔΩ - sqrt((p_0[0]*ΔΩ)^2 - 4*Ω_c))/2)*(p^2 + Ω_c - p*ΔΩ*p_0[1])/((p^2 + Ω_c - p*ΔΩ*p_p[0])*(p^2 + Ω_c - p*ΔΩ*p_p[1]))
G_1 := product(1i*sqrt(Ω_c) - p_01[i], i = 0 .. rows(p_01) - 1)/product(1i*sqrt(Ω_c) - p_p1[i], i = 0 .. rows(p_p1) - 1)
product(-p_01[i], i = 0 .. rows(p_01) - 1) = 0
H_1(p) := G_p^(1 - r)/G_1*PolynomP(p, p_01)/PolynomP(p, p_p1)
1/G_1 = 123.542
ΔΩ^r/G_0 = 123.542
H_1(p) := G_p^(1 - r)/G_0*((p^2 + ω_c)/(p*Δω) - p_0[0])*((p^2 + ω_c)/(p*Δω) - p_0[1])/(((p^2 + ω_c)/(p*Δω) - p_p[0])*((p^2 + ω_c)/(p*Δω) - p_p[1])*((p^2 + ω_c)/(p*Δω) - p_p[2]))  # disabled
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