# Рассчёт Эллиптического фильтра
# https://ru.dsplib.org/content/filter_ellip_ap/filter_ellip_ap.html
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db(x) := 10^(x/20)
db_P(x) := 10^(x/10)
to_db(x) := 20*log(|x|)
to_dbP(x) := 10*log(|x|)
roundup(x) := Trunc(x, 1) + (Trunc(x, 1) ≠ x)
abs(z) := |z|
samples := 100
n := 0 .. samples - 1
circle_x[n] := cos(2*π/(samples - 1)*n)
circle_y[n] := sin(2*π/(samples - 1)*n)
Ki(k) :=
    k_0 ← k/(1 + sqrt(1 - k*k))
    k_0*k_0
K(k) :=
    ki ← Ki(k)
    (1 + ki)*K(ki) if k - ki > 0
    π/2 otherwise
T(k) := K(sqrt(1 - k*k))
sn(u, k) :=
    ki ← Ki(k)
    sin(u*π/2) if k - ki ≤ 0
    otherwise
        w ← sn(u, ki)
        (1 + ki)/(1/w + ki*w)
cd(u, k) :=
    ki ← Ki(k)
    cos(u*π/2) if k - ki ≤ 0
    otherwise
        w ← cd(u, ki)
        (1 + ki)/(1/w + ki*w)
sn_inv(sn, k) :=
    ki ← Ki(k)
    sn_inv(2*sn/((1 + ki)*(1 + sqrt(1 - k*k*sn*sn))), ki) if k - ki > 0
    2*asin(sn)/π
cd_inv(cn, k) :=
    ki ← Ki(k)
    cd_inv(2*cn/((1 + ki)*(1 + sqrt(1 - k*k*cn*cn))), ki) if k - ki > 0
    2*acos(cn)/π
K(0.66667) = 1.80967
T(0.66667) = 1.90424
K(0.0028615) = 1.5708
T(0.0028615) = 7.24272
Z(p_0, f_d) := (2*f_d + p_0)/(2*f_d - p_0)
z2p(z_0, f_d) := 2*f_d*(1 - z_0^-1)/(1 + z_0^-1)
cd(0.6, 0.93) = 0.761809
sn(0.6, 0.93) = 0.917919
# 0.917918 | 0.761809423
f_p := 1/1*5000/π = 1591.55
# Гц - частота пропускания
f_d := 5000  # Гц - частота дискретизации
f_s := 1/2*5000/π = 795.775
# Гц - частота подавления
dt := 1/f_d = 0.0002
tt[n] := n*dt
h(t, H) := 1/f_d*integral(H(f)*e^(1i*2*π*f*t), f = -f_d/2 .. f_d/2)
ω_p := 2*π*f_p/f_d = 0.63662*π
# Нормированная полоса среза
ω_p = 2
ω_s := 2*π*f_s/f_d = 0.31831*π
# Нормированная полоса заграждения
ω_s = 1
R_p := 1
G_p := (-R_p) db = 0.891251  # Неравномерность в полосе пропускания (дБ)
R_s := 30
G_s := (-R_s) db = 0.0316228  # Уровень подавления в полосе заграждения (дБ)
df := f_d/samples = 50
Ω(T_d, ω) := 2/T_d*tan(ω/2)  # Преобразование частот аналогового фильтра в частоты цифрового
f_analog(f_digital., f_d) := f_d/π*tan(π*f_digital./f_d)
f_digit(f_analog, f_d) := f_d/π*atan(π*f_analog/f_d)
F_p := f_analog(f_p, f_d) = 2478.69
F_p = 0.495738 f_d
f_digit(F_p, f_d) = 1591.55
F_s := f_analog(f_s, f_d) = 869.467
F_s = 0.173893 f_d
Ω_p := 2*π*F_p = 15574.1  # Частота среза аналогового фильтра
Ω_s := 2*π*F_s = 5463.02  # Частота заграждения аналогового фильтра
# Порядок фильтра
ε_p := sqrt(10^(R_p/10) - 1) = 0.508847
ε_s := sqrt(10^(R_s/10) - 1) = 31.607
1/ε_s = 0.0316386
ε_s/ε_p = 62.1148
Ω_s/Ω_p = 0.350777
k_ω := min(ω_p, ω_s)/max(ω_p, ω_s) = 0.5
k_ε := ε_p/ε_s = 0.0160992
# Порядок фильтра
N := T(k_ε)*K(k_ω)/(K(k_ε)*T(k_ω)) = 2.74463
N := ceil(N) = 3
# Число парных полюсов | Наличие/отсутсвтие центрального полюса
L := Trunc(N/2, 1) = 1
r := mod(N, 2) = 1
2*L + r = 3
u(n) := (2*n - 1)/N
un := matrix(L, 1, f(n, m) ← u(n + 1))
transpose(un) = [0.333333]
m := sqrt(1 - k_ε^2) = 0.99987
k_p := m^N*product(sn(u(n), m)^4, n = 1 .. L) = 0.816604
k_ω := sqrt(1 - k_p^2) = 0.577199
# Нули
zeros := 1i/(k_ω*cd(un, k_ω)) = [1.95359i]
Im(zeros) = [1.95359]
Ω_p/f_d = 3.11482
Ω_s/f_d = 1.0926
υ_0 := -1i/N*sn_inv(1i/ε_p, k_ε) = 0.303026
# Полюса
conj(z) := Re(z) - 1i*Im(z)
p_p :=
    pp[0] ← 1i*sn(1i*υ_0, k_ω) if r > 0
    for n ∈ 0 .. L - 1
        pp[2*n + r] ← 1i*cd(un[n] - 1i*υ_0, k_ω)
        pp[2*n + 1 + r] ← conj(pp[2*n + r])
    pp
G_p := 1/sqrt(1 + ε_p^2) = 0.891251
p_p = [-0.559682; -0.205322 + 0.986987i; -0.205322 - 0.986987i]
p_0 := stack(zeros, conj(zeros)) = [1.95359i; -1.95359i]
G_0 := 1
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G_0 := product(-p_0[i], i = 0 .. rows(p_0) - 1)/product(-p_p[i], i = 0 .. rows(p_p) - 1) = 6.7097
H_0(p) := G_p^(1 - r)/G_0*product(p - p_0[i], i = 0 .. rows(p_0) - 1)/product(p - p_p[i], i = 0 .. rows(p_p) - 1)
Ω_p = 15574.1
G_p^(1 - r)/G_0*product(p - p_0[i], i = 0 .. rows(p_0) - 1) coeffs → [0.568805239719 - 1.38777878078e-17i; 0; 0.14903787474 - 3.63624639251e-18i]
product(p - p_p[i], i = 0 .. rows(p_p) - 1) coeffs → [0.568805239719; 1.24613065212; 0.970326667387; 1]
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# Масштабируем передаточную функцию фильтра на требуемую частоту пропускания
Ω_p := 2*π*F_p
H(p) := H_0(Ω_p/p)
# Делаем преобразование плоскости p в плоскость z путём подстановки p == 2*f_d*(1 - z^-1)/(1 + z^-1)
H_z(z) := H(2*f_d*(1 - z^-1)/(1 + z^-1))
Polinom(P, p) := product(p - P[i], i = 0 .. rows(P) - 1)
# Масштабируем нули и полюса
p_01 := Ω_p/p_0
p_p1 := Ω_p/p_p
p_01 = [-7972.03i; 7972.03i]
p_0 = [1.95359i; -1.95359i]
p_p1 = [-27826.6; -3146.42 - 15124.9i; -3146.42 + 15124.9i]
p_p = [-0.559682; -0.205322 + 0.986987i; -0.205322 - 0.986987i]
H_00(p) := H_0(Ω_p/p)
G_01 := product(|p_01[i]|, i = 0 .. rows(p_01) - 1)/product(|p_p1[i]|, i = 0 .. rows(p_p1) - 1) = 9.56961e-6
H_01(p) := G_p^(1 - r)/G_01*(-1)^r*product(p_01[i], i = 0 .. rows(p_01) - 1)/product(p_p1[i], i = 0 .. rows(p_p1) - 1)*p^r*product(p - p_01[i], i = 0 .. rows(p_01) - 1)/product(p - p_p1[i], i = 0 .. rows(p_p1) - 1)
H_02(p) := G_p^(1 - r)/G_01*Polinom(p_01, p)/Polinom(p_p1, p)
# Преобразуем нули и полюса в плоскость Z(p, f_d) := (2*f_d + p)/(2*f_d - p)
H_z01(z) := H_01(2*f_d*(1 - z^-1)/(1 + z^-1))
H_z22(z) := H_02(2*f_d*(1 - z^-1)/(1 + z^-1))
H_z00(z) := H_00(2*f_d*(1 - z^-1)/(1 + z^-1))
p_01_ :=
    stack(0, p_01) if r > 0
    p_01 otherwise
p_01_ = [0; -7972.03i; 7972.03i]
z_0 := vectorize(Z(p_01_, f_d))
z_p := vectorize(Z(p_p1, f_d))
z_0 :=
    stack(-1, z_0) if r > 0
    z_0 otherwise  # disabled
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G_0z := 2^r*product(1 + z_0[n], n = r .. rows(z_0) - 1)/product(1 + z_p[n], n = 0 .. rows(z_p) - 1) = 9.28798
z_0 = [1; 0.222843 - 0.974854i; 0.222843 + 0.974854i]
z_p = [-0.471272; -0.345282 - 0.753249i; -0.345282 + 0.753249i]
G_p^(1 - r)/G_0z = 0.107666
Z0 := [1; 0.222843384951 - 0.97485425874i; 0.222843384951 + 0.97485425874i]
H_z2(z) := G_p^(1 - r)/G_0z*product(1 - z_0[n]*z^-1, n = 0 .. rows(z_0) - 1)/product(1 - z_p[n]*z^-1, n = 0 .. rows(z_p) - 1)
Zp := [-0.47127210256; -0.34528162486 - 0.753249415834i; -0.34528162486 + 0.753249415834i]
G_0z = 9.28798
G_p^(1 - r)/G_0z*product(1 - Z0[n]*z^-1, n = 0 .. rows(Z0) - 1) coeffs → [-0.10766599018; 0.155651297571; -0.155651297571; 0.10766599018]
product(1 - Zp[n]*z^-1, n = 0 .. rows(Zp) - 1) coeffs → [0.323577349784 + 6.31088724177e-30i; 1.01204727757 - 6.31088724177e-30i; 1.16183535228; 1]
# Коэффициент передачи на частоте
# 0 Гц | подавления | среза | дискретизации
abs(H_z2(e^(1i*2*π*0/f_d))) = 0
abs(H_z2(e^(1i*2*π*f_s/f_d))) = 0.0306851
abs(H_z2(e^(1i*2*π*f_p/f_d))) = 0.891309
abs(H_z2(e^(1i*2*π*f_d/2/f_d))) = 1
ff := [0; f_s; f_p; f_d/2]
FF := [0; F_s; F_p; f_d/2]
vectorize(|H_z2(e^(1i*2*π*ff/f_d))|) = [0; 0.0306851; 0.891309; 1]
vectorize(|H_z2(e^(1i*2*π*FF/f_d))|) = [0; 0.0276426; 0.999585; 1]
abs(H_z01(e^(1i*2*π*0/f_d))) = 0
abs(H_z01(e^(1i*2*π*f_s/f_d))) = 0.0306851
abs(H_z01(e^(1i*2*π*f_p/f_d))) = 0.891309
abs(H_z01(e^(1i*2*π*f_d/2/f_d))) = 1
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arg(z_0) = [0; -77.1239; 77.1239] deg
arg(z_p) = [180; -114.626; 114.626] deg
H1(p) := H_01(p)
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20*log(abs(H_z(e^(1i*2*π*f_s/f_d)))) = -30.2614
hh_z2 := vectorize(h(tt, H(f) ← H_z2(e^(1i*2*π*f/f_d))))
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ff := 0, f_s/100 .. f_s
|H_z(e^(1i*2*π*f_p/f_d))| = 0.891309
20*log(|H_z(e^(1i*2*π*f_p/f_d))|) = -0.999437
|H_z(e^(1i*2*π*f_s/f_d))| = 0.0306851
20*log(|H_z(e^(1i*2*π*f_s/f_d))|) = -30.2614
Φ(f) := integral(d/df1(arg(H_z(e^(1i*2*π*f1/f_d)))/π), f1 = 0 .. f)
|H_z(e^(1i*2*π*(f_p + f_s)/2/f_d))| = 0.0453083
20*log(|H_z(e^(1i*2*π*(f_p + f_s)/2/f_d))|) = -26.8764
(f_p + f_s)/2 = 1193.66
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