# Рассчёт Эллиптического фильтра
# https://ru.dsplib.org/content/filter_ellip_ap/filter_ellip_ap.html
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db(x) := 10^(x/20)
db_P(x) := 10^(x/10)
to_db(x) := 20*log(|x|)
to_dbP(x) := 10*log(|x|)
roundup(x) := Trunc(x, 1) + (Trunc(x, 1) ≠ x)
abs(z) := |z|
samples := 100
n := 0 .. samples - 1
circle_x[n] := cos(2*π/(samples - 1)*n)
circle_y[n] := sin(2*π/(samples - 1)*n)
Ki(k) :=
    k_0 ← k/(1 + sqrt(1 - k*k))
    k_0*k_0
K(k) :=
    ki ← Ki(k)
    (1 + ki)*K(ki) if k - ki > 0
    π/2 otherwise
T(k) := K(sqrt(1 - k*k))
sn(u, k) :=
    ki ← Ki(k)
    sin(u*π/2) if k - ki ≤ 0
    otherwise
        w ← sn(u, ki)
        (1 + ki)/(1/w + ki*w)
cd(u, k) :=
    ki ← Ki(k)
    cos(u*π/2) if k - ki ≤ 0
    otherwise
        w ← cd(u, ki)
        (1 + ki)/(1/w + ki*w)
sn_inv(sn, k) :=
    ki ← Ki(k)
    sn_inv(2*sn/((1 + ki)*(1 + sqrt(1 - k*k*sn*sn))), ki) if k - ki > 0
    2*asin(sn)/π
cd_inv(cn, k) :=
    ki ← Ki(k)
    cd_inv(2*cn/((1 + ki)*(1 + sqrt(1 - k*k*cn*cn))), ki) if k - ki > 0
    2*acos(cn)/π
K(0.66667) = 1.80967
T(0.66667) = 1.90424
K(0.0028615) = 1.5708
T(0.0028615) = 7.24272
Z(p_0, f_d) := (2*f_d + p_0)/(2*f_d - p_0)
z2p(z_0, f_d) := 2*f_d*(1 - z_0^-1)/(1 + z_0^-1)
cd(0.6, 0.93) = 0.761809
sn(0.6, 0.93) = 0.917919
# 0.917918 | 0.761809423
f_p := 5000/(2*π) = 795.775
# Гц - частота пропускания
f_d := 5000  # Гц - частота дискретизации
f_s := 1.5*5000/(2*π) = 1193.66  # Гц - частота подавления
dt := 1/f_d = 0.0002
tt[n] := n*dt
h(t, H) := 1/f_d*integral(H(f)*e^(1i*2*π*f*t), f = -f_d/2 .. f_d/2)
ω_p := 2*π*f_p/f_d = 0.31831*π
# Нормированная полоса среза
ω_p = 1
ω_s := 2*π*f_s/f_d = 0.477465*π
# Нормированная полоса заграждения
ω_s = 1.5
R_p := 1
G_p := (-R_p) db = 0.891251  # Неравномерность в полосе пропускания (дБ)
R_s := 45
G_s := (-R_s) db = 0.00562341  # Уровень подавления в полосе заграждения (дБ)
df := f_d/samples = 50
Ω(T_d, ω) := 2/T_d*tan(ω/2)  # Преобразование частот аналогового фильтра в частоты цифрового
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f_analog(f_digital., f_d) := f_d/π*tan(π*f_digital./f_d)
f_digit(f_analog, f_d) := f_d/π*atan(π*f_analog/f_d)
F_p := f_analog(f_p, f_d) = 869.467
F_p = 0.173893 f_d
f_digit(F_p, f_d) = 795.775
F_s := f_analog(f_s, f_d) = 1482.68
F_s = 0.296536 f_d
Ω_p := 2*π*F_p = 5463.02  # Частота среза аналогового фильтра
Ω_s := 2*π*F_s = 9315.96  # Частота заграждения аналогового фильтра
# Порядок фильтра
ε_p := sqrt(10^(R_p/10) - 1) = 0.508847
ε_s := sqrt(10^(R_s/10) - 1) = 177.825
1/ε_s = 0.0056235
ε_s/ε_p = 349.467
Ω_s/Ω_p = 1.70528
k_ω := ω_p/ω_s = 0.666667
k_ε := ε_p/ε_s = 0.0028615
# Порядок фильтра
N := T(k_ε)*K(k_ω)/(K(k_ε)*T(k_ω)) = 4.38185
N := ceil(N) = 5
# Число парных полюсов | Наличие/отсутсвтие центрального полюса
L := Trunc(N/2, 1) = 2
r := mod(N, 2) = 1
2*L + r = 5
u(n) := (2*n - 1)/N
un := matrix(L, 1, f(n, m) ← u(n + 1))
transpose(un) = [0.2, 0.6]
m := sqrt(1 - k_ε^2) = 0.999996
k_p := m^N*product(sn(u(n), m)^4, n = 1 .. L) = 0.641934
k_ω := sqrt(1 - k_p^2) = 0.76676
# Нули
zeros := 1i/(k_ω*cd(un, k_ω)) = [1.34682i; 1.94552i]
Im(zeros) = [1.34682; 1.94552]
Ω_p/f_d = 1.0926
Ω_s/f_d = 1.86319
υ_0 := -1i/N*sn_inv(1i/ε_p, k_ε) = 0.181815
# Полюса
conj(z) := Re(z) - 1i*Im(z)
p_p :=
    pp[0] ← 1i*sn(1i*υ_0, k_ω) if r > 0
    for n ∈ 0 .. L - 1
        pp[2*n + r] ← 1i*cd(un[n] - 1i*υ_0, k_ω)
        pp[2*n + 1 + r] ← conj(pp[2*n + r])
    pp
G_p := 1/sqrt(1 + ε_p^2) = 0.891251
p_p = [-0.364132; -0.0567363 + 0.997077i; -0.0567363 - 0.997077i; -0.223931 + 0.715629i; -0.223931 - 0.715629i]
p_0 := stack(zeros, conj(zeros)) = [1.34682i; 1.94552i; -1.34682i; -1.94552i]
G_0 := 1
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G_0 := product(|p_0[i]|, i = 0 .. rows(p_0) - 1)/product(|p_p[i]|, i = 0 .. rows(p_p) - 1) = 33.6222
H_0(p) := G_p^(1 - r)/G_0*product(p - p_0[i], i = 0 .. rows(p_0) - 1)/product(p - p_p[i], i = 0 .. rows(p_p) - 1)
Ω_p = 5463.02
# Масштабируем передаточную функцию фильтра на требуемую частоту пропускания
Ω_p := 2*π*F_p
H(p) := H_0(p/Ω_p)
# Делаем преобразование плоскости p в плоскость z путём подстановки p == 2*f_d*(1 - z^-1)/(1 + z^-1)
Polinom(P, p) := product(p - P[i], i = 0 .. rows(P) - 1)
H_z(z) := H(2*f_d*(1 - z^-1)/(1 + z^-1))
Ω_p = 5463.02
# Масштабируем нули и полюса
p_01 := p_0*Ω_p
p_p1 := p_p*Ω_p
p_01 = [7357.71i; 10628.4i; -7357.71i; -10628.4i]
p_0 = [1.34682i; 1.94552i; -1.34682i; -1.94552i]
p_p1 = [-1989.26; -309.952 + 5447.06i; -309.952 - 5447.06i; -1223.34 + 3909.5i; -1223.34 - 3909.5i]
p_p = [-0.364132; -0.0567363 + 0.997077i; -0.0567363 - 0.997077i; -0.223931 + 0.715629i; -0.223931 - 0.715629i]
G_01 := product(|p_01[i]|, i = 0 .. rows(p_01) - 1)/product(|p_p1[i]|, i = 0 .. rows(p_p1) - 1) = 0.0061545
H_01(p) := G_p^(1 - r)/G_01*product(p - p_01[i], i = 0 .. rows(p_01) - 1)/product(p - p_p1[i], i = 0 .. rows(p_p1) - 1)
H_z1(z) := H_01(2*f_d*(1 - z^-1)/(1 + z^-1))
H_02(p) := G_p^(1 - r)/G_01*Polinom(p_01, p)/Polinom(p_p1, p)
H_z22(z) := H_02(2*f_d*(1 - z^-1)/(1 + z^-1))
# Преобразуем нули и полюса в плоскость Z(p, f_d) := (2*f_d + p)/(2*f_d - p)
z_0 := vectorize(Z(p_01, f_d))
z_p := vectorize(Z(p_p1, f_d))
z_0 :=
    stack(-1, z_0) if r > 0
    z_0 otherwise
G_0 = 33.6222
p_01[2] = -7357.71i
product(1 - z_0[n], n = r .. rows(z_0) - 1) = 2.98081
G_0z := 2^r*product(1 - z_0[n], n = r .. rows(z_0) - 1)/product(1 - z_p[n], n = 0 .. rows(z_p) - 1) = 43.1704
1/G_0z = 0.023164
1/2/G_01 = 81.2414
Z(p_p1[1], f_d) = 0.516554 + 0.801241i
sort(z_0) = [-1; -0.0608725 + 0.998146i; -0.0608725 - 0.998146i; 0.297556 - 0.954704i; 0.297556 + 0.954704i]
z_0 = [-1; 0.297556 + 0.954704i; -0.0608725 + 0.998146i; 0.297556 - 0.954704i; -0.0608725 - 0.998146i]
z_p = [0.66816; 0.516554 + 0.801241i; 0.516554 - 0.801241i; 0.589173 + 0.553567i; 0.589173 - 0.553567i]
z_p2 := z_p[1] = 0.516554 + 0.801241i
G_p^(1 - r)/G_0z = 0.023164
z2p(z_p2, f_d) = -309.952 + 5447.06i
H_z2(z) := G_p^(1 - r)/G_0z*product(1 - z_0[n]*z^-1, n = 0 .. rows(z_0) - 1)/product(1 - z_p[n]*z^-1, n = 0 .. rows(z_p) - 1)
H_z2(1) = 1
abs(H_z2(e^(1i*2*π*F_s/f_d))) = 0.00406496
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arg(z_0) = [1; 0.403828; 0.519388; -0.403828; -0.519388]*π
FF := [0; F_p; F_s; f_d/2]
ff := [0; f_p; f_s; f_d/2]
ff = [0; 795.775; 1193.66; 2500]
FF = [0; 869.467; 1482.68; 2500]
G_p = 0.891251
G_s = 0.00562341
vectorize(|H_z2(e^(1i*2*π*ff/f_d))|) = [1; 0.891253; 0.00345496; 0]
vectorize(|H_z2(e^(1i*2*π*FF/f_d))|) = [1; 0.162503; 0.00406496; 0]
G_p = 0.891251
H1(p) := H_01(p)
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hh_z2 := vectorize(h(tt, H(f) ← H_z2(e^(1i*2*π*f/f_d))))
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3/f_p/dt = 18.8496
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ff := 0, f_s/100 .. f_s
Φ(f) := integral(d/df1(arg(H_z(e^(1i*2*π*f1/f_d)))/π), f1 = 0 .. f)
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